Simulations: Version=67
  DataStore
  Simulation Template
    Clock: Start=1980-07-01; End=1981-06-30
    Weather: FileName=%root%\Examples\WeatherFiles\lincoln.met
    SoilArbitrator
    Summary
    Zone Field: Area=1; Slope=0
      Folder Managers
        Memo SwardHelper
          General purpose is semi-automatically gathering information across all the plants in the Field

          - user input of "All" for all plants in the Field or a comma-seperated list of the plants wanted (could use this to ignore a tree/shrub or something)

          **Outputs**
          - Sward.TotalBiomass (kg DM /ha)
          - Sward.TotalN (kg N /ha)
          - Sward.GrazeableBiomass (kg DM /ha)
          - Sward.GrazeableN (kg N /ha)
          - Sward.GrazeableCN (kg C /kg N)

          digestibility

          ? remove biomass
          ? automated methods to dissagregate?
        Manager DefoliationManager
          AutomaticManagementIsEnabled = True
          DefoliationRotationStartDate = 01/01/1900 00:00:00
          DefoliationRotationEndDate = 12/31/2100 00:00:00
          DefoliateType = Cut
          DefoliationTriggerType = TargetStandingBiomass
          IntervalBetweenDefoliations = 21
          TargetStandingBiomass = 200
          DurationOfEachDefoliation = 1
          RemoveAmountType = ResidualDM
          AmountForEachDefoliation = 150
          RemoveAllBiomassIsEnabled = False
          DMRemoveType = UserDefinedFraction
          FractionDMToRemove = 1
          NRemoveType = UserDefinedFraction
          FractionNToRemove = 1
          ReturnType = AsResidue
          NDungType = DefineCNratio
          ProportionN2Dung = 0.4
          CNRatioDung = 20
          UrineDepth = 250
```csharp
// Performs defoliations, or removes biomass, from any existing plant (PMF and/or AgPasture) based on a set of given rules.  
// Defoliations can be triggered automatically by this manager or be called from another Script or a Schedule model.
// Developed by RCichota, last updated in 31/Mar/2019

namespace Models
{
	using System;
	using System.Xml.Serialization;
	using System.Collections.Generic;
	using APSIM.Shared.Utilities;
	using Models.Core;
	using Models.Soils;
	using Models.PMF;
	using Models.Interfaces;
	using Models.PMF.Interfaces;

    [Serializable]
    public class Script : Model
    {
        //> Links to other Apsim models
        [Link] private Clock clock;
        [Link] private Zone myZone;
        [Link] private Soil mySoil;
        [ScopedLinkByName] private ISolute Urea;
        [Link] private ISummary mySummary;
        //Auxiliary 'links'
        private List<Plant> PMFSpecies = new List<Plant>();
        private List<AgPasture.PastureSpecies> AgPSpecies = new List<AgPasture.PastureSpecies>();

        //> Events raised by this manager
        public event BiomassRemovedDelegate BiomassRemoved;

        //> User inputs from properties tab
        [Separator("Generic defoliation management - removes biomass from PMF and AgPasture species, plus residue management")]
        [Description("Allow this manager to control defoliations? ")] public bool AutomaticManagementIsEnabled { get; set; }
        [Description("Date to start the defoliation management (dd/mm/yyyy): ")] public DateTime DefoliationRotationStartDate { get; set; }
        [Description("Date to end the defoliation management (dd/mm/yyyy): ")] public DateTime DefoliationRotationEndDate { get; set; }

        [Separator("Parameters defining how the defoliation is managed")]
        [Description("What type of defoliation should be triggered? ")] public DefoliationTypes DefoliateType { get; set; }  //I don't get what the purpose of this is
        [Description("How the defoliations should be triggered? ")] public DefoliationTriggerTypes DefoliationTriggerType { get; set; }
        [Description("  Minimum number of days between defoliations, used if trigger is an interval: ")] public int IntervalBetweenDefoliations { get; set; }
        [Description("  Minimum standing biomass to start defoliations, used if trigger is DM target(g/m2): ")]
        public int TargetStandingBiomass { get; set; }
        [Description("Duration of each defoliation event (days): ")]
        public int DurationOfEachDefoliation { get; set; }
        [Description("Which amount is being defined? ")]
        public DefoliateAmountTypes RemoveAmountType { get; set; }
        [Description("DM amount to use (g/m2): ")]
        public double AmountForEachDefoliation { get; set; }
        [Description("For PMF species, allow all biomass to be removed? ")]
        public bool RemoveAllBiomassIsEnabled { get; set; }

        [Separator("Parameters defining the management of the defoliated biomass")]
        [Description("How much of the DM defoliated is to be removed from the field? ")]
        public DMRemovalTypes DMRemoveType { get; set; }
        [Description("  Fraction of DM to remove off field, if using UserDefinedFraction (0-1): ")]
        public double FractionDMToRemove { get; set; }
        [Description("How much of the N defoliated is to be removed from the field? ")]
        public NRemovalTypes NRemoveType { get; set; }
        [Description("  Fraction of N to remove off field, if using UserDefinedFraction (0-1): ")]
        public double FractionNToRemove { get; set; }
        [Description("How the non-removed material is returned to the field? ")]
        public ReturnAsTypes ReturnType { get; set; }

        [Separator("Parameters for partitioning non-removed N into urine and dung")]
        [Description("How the partition of N to dung and urine is defined? ")]
        public DungNContentTypes NDungType { get; set; }
        [Description("  Proportion of N returned in dung, if using DefineProportion (0-1): ")]
        public double ProportionN2Dung { get; set; }
        [Description("  The C:N of dung, if using DefineCNratio (typically around 20): ")]
        public double CNRatioDung { get; set; }
        [Description("Soil depth down to which urine should be applied (mm): ")]
        public double UrineDepth { get; set; }

        //> Outputs from this manager
        [XmlIgnore][Units("g/m2")] // Pasture DM defoliated (removed from plants) today
        public double DefoliatedWt{ get; set; }
        [XmlIgnore][Units("g/m2")] // N in the pasture material defoliated today
        public double DefoliatedN{ get; set; }
        [XmlIgnore][Units("g/m2")] // Pasture DM harvested (removed from plants minus direct residue) today
        public double HarvestedWt{ get; set; }
        [XmlIgnore][Units("g/m2")] // N in the pasture material harvested today
        public double HarvestedN{ get; set; }
        [XmlIgnore][Units("g/m2")] // Pasture DM actually removed from the field
        public double RemovedWt{ get; set; }
        [XmlIgnore][Units("g/m2")] // N in the pasture material removed from the field
        public double RemovedN{ get; set; }
        [XmlIgnore][Units("g/m2")] // Pasture DM returned by this manager to the field
        public double ReturnedWt{ get; set; }
        [XmlIgnore][Units("g/m2")] // N in the pasture material returned by this manager to the field
        public double ReturnedN{ get; set; }
        [XmlIgnore][Units("g/m2")] // Non-removed N returned as dung (to SurfaceOM)
        public double NReturnedInDung{ get; set; }
        [XmlIgnore][Units("g/m2")] // Non-removed N returned as urine (soil urea)
        public double NReturnedInUrine{ get; set; }
        [XmlIgnore][Units("days")] // Number of days since the end of last defoliation event
        public int DaysSinceLastDefoliation{ get; set; }
        [XmlIgnore][Units("g/m2")] // Total standing aboveground DM before a defoliation
        public double PreHarvestDM{ get; set; }
        [XmlIgnore][Units("g/m2")] // Total standing aboveground DM after a defoliation
        public double PostHarvestDM{ get; set; }
        [XmlIgnore][Units("g/m2")] // Total pasture DM harvested over a complete defoliation event
        public double RotationHarvestedDM{ get; set; }

        //> Internal variables
        private string baseDefoliationType;			  // type of defoliation, as set in UI (Cut, Graze, or harvest)
        private string typeOfDefoliation;			  // type of defoliation, as defined in Defoliate() (Cut, Graze, or harvest)
        private string baseAmountType;				  // type of DM amount, as set in UI (ResidualDM or DMToRemove)
        private string typeOfAmount;				  // type of DM amount, as defined in Defoliate() (ResidualDM, DMToRemove, or UseDefoliationFractions)
        private double amountGiven;					  // DM amount given, to use in the defoliation management (g/m2)
        private double herbageToRemove;				  // total herbage to remove per day (g/m2)
        private RemovalFractions defoliationFractions;// fraction of each organ to defoliate (PMF species)
        private double[] urineFraction;				  // fraction of urine to be applied in each soil layer
        private int durationOfDefoliation;			  // duration of a defoliation event
        private int daysDefoliating;				  // counter for days within a defoliation event
        private double cumAmountHarvested;			  // cumulative defoliated amount within each event
        // auxiliary boolean
        private bool aDefoliationHasHappened = false; // flag whether a defoliation has happened in this simulation run

        // auxiliary - lists of species and removal fractions
        private string[] swardSpeciesName;			  // name of each species in the sward
        private string[] swardSpeciesType;			  // type of each species in the sward (PMF or AgPasture)
        private double[] speciesFraction;			  // biomass fraction of harvestable material of each species

        [EventSubscribe("Commencing")]
        private void OnSimulationCommencing(object sender, EventArgs e)
        {
            // check the type of defoliation given
            if (DefoliateType == DefoliationTypes.Cut)
                baseDefoliationType = "Cut";
            else if (DefoliateType == DefoliationTypes.Graze)
                baseDefoliationType = "Graze";
            else
                baseDefoliationType = "Harvest";

            // check the type of amount given
            if (RemoveAmountType == DefoliateAmountTypes.DMToRemove)
                baseAmountType = "DMToRemove";
            else if (RemoveAmountType == DefoliateAmountTypes.ResidualDM)
                baseAmountType = "ResidualDM";
            else
                baseAmountType = "UseDefoliationFractions";

            // check the interval between events
            if (IntervalBetweenDefoliations < 1)
                throw new Exception("The interval between defoliation events must be at least one day");

            // check the duration for each defoliation
            if(DurationOfEachDefoliation <= 0)
                throw new Exception("The duration of defoliations cannot be zero or negative!");

            // check the fraction of defoliated material to remove from the field
            if (DMRemoveType == DMRemovalTypes.RemoveAll)
                FractionDMToRemove = 1.0;
            else if (DMRemoveType == DMRemovalTypes.RemoveNone)
                FractionDMToRemove = 0.0;
            else if (DMRemoveType == DMRemovalTypes.BasedOnDigestibility)
                FractionDMToRemove = -1.0;  // will be calculated dynamically
            else // DMRemoveType == DMRemovalTypes.UserDefinedFraction
            {
                if (FractionDMToRemove < 0.0)
                    throw new Exception("The fraction of DM defoliated to remove from the field cannot be negative!");
            }

            // check the fraction of defoliated N to remove from the field
            if (NRemoveType == NRemovalTypes.RemoveAll)
                FractionNToRemove = 1.0;
            else if (NRemoveType == NRemovalTypes.RemoveNone)
                FractionNToRemove = 0.0;
            else if (NRemoveType == NRemovalTypes.ProportionalToDM)
            	FractionNToRemove = FractionDMToRemove;
            else // NRemoveType == NRemovalTypes.UserDefinedFraction
            {
                if (FractionNToRemove < 0.0)
                    throw new Exception("The fraction of defoliated N to remove from the field cannot be negative!");
            }

            // set up the links to all plant species
            foreach (Plant species in Apsim.Children(myZone, typeof(Plant)))
                PMFSpecies.Add(species);
            foreach (AgPasture.PastureSpecies species in Apsim.Children(myZone, typeof(AgPasture.PastureSpecies)))
                AgPSpecies.Add(species);

            int numPlants = PMFSpecies.Count + AgPSpecies.Count;
            swardSpeciesName = new string[numPlants];
            swardSpeciesType = new string[numPlants];
            int i = 0;
            foreach (Plant species in Apsim.Children(myZone, typeof(Plant)))
            {
                swardSpeciesName[i] = species.Name;
                swardSpeciesType[i] = "PMF";
                i += 1;
            }
            foreach (AgPasture.PastureSpecies species in Apsim.Children(myZone, typeof(AgPasture.PastureSpecies)))
            {
                swardSpeciesName[i] = species.Name;
                swardSpeciesType[i] = "AgPasture";
                i += 1;
            }

            // make sure that management starts when RotationStartDate < simulationStartDay
            if ((clock.Today > DefoliationRotationStartDate) && (clock.Today < DefoliationRotationEndDate))
                DefoliationRotationStartDate = clock.Today;

            // initialise some variables
            speciesFraction = new double[numPlants];
            defoliationFractions = new RemovalFractions();
            DaysSinceLastDefoliation = 0;
            durationOfDefoliation = -1;
            daysDefoliating = 0;
            resetMyOutputs();

            // set the fraction of urine for each layer
            if (ReturnType == ReturnAsTypes.AsDungUrine)
            {
	            double depthFromSurface = 0.0;
	            for (int layer = 0; layer < mySoil.Thickness.Length; layer++)
	            {
	                depthFromSurface += mySoil.Thickness[layer];
	            	if (depthFromSurface >= UrineDepth)
	            	{ // bottom layer found
	            		urineFraction = new double[layer + 1];
		                double atZ0;
		                double atZ1;
			            double distFactor = 1.5;
		                double totalProp = UrineDepth * Math.Pow(1.0, distFactor) / (distFactor + 1.0);
	            		depthFromSurface = 0.0;
		                atZ1 = (UrineDepth - depthFromSurface) * Math.Pow(1.0 - depthFromSurface / UrineDepth, distFactor) / (distFactor + 1.0);
	            		for (int z = 0; z < layer+1; z++)
		                {
		                    atZ0 = atZ1;
		                    depthFromSurface += mySoil.Thickness[z];
		                    atZ1 = (UrineDepth - depthFromSurface) * Math.Pow(1.0 - depthFromSurface / UrineDepth, distFactor) / (distFactor + 1);
		                    if (1.0 - (depthFromSurface / UrineDepth) < 0.0)
		                        atZ1 = 0;
		                    urineFraction[z] = (atZ0 - atZ1) / totalProp;
		                }
	                    layer = mySoil.Thickness.Length;
	                }
	            }
            }

            // write message in summary
            mySummary.WriteMessage(this," Automatic defoliation manager initialised");
            if (AutomaticManagementIsEnabled)
            {
	            mySummary.WriteMessage(this, "   Defoliations will happen between " + DefoliationRotationStartDate.ToShortDateString()
                     					 + " and " + DefoliationRotationEndDate.ToShortDateString() + ".");
                mySummary.WriteMessage(this, "   Biomass from the sward will be defoliated simulating a \"" + baseDefoliationType + "\" rotation.");
                if (DefoliationTriggerType == DefoliationTriggerTypes.TargetStandingBiomass)
                    mySummary.WriteMessage(this, "   Events will happen whenever aboveground biomass surpasses " + TargetStandingBiomass.ToString("#0.0") + " g/m2.");
                else
                    mySummary.WriteMessage(this, "   Events will happen every " + IntervalBetweenDefoliations + " days, if there is enough biomass.");
                if(baseAmountType == "ResidualDM")
                	mySummary.WriteMessage(this, "   Removing biomass down to a residual amount of " + AmountForEachDefoliation.ToString("#.0") + " g/m2 over " 
                	                         + DurationOfEachDefoliation + " days.");
                else
                	mySummary.WriteMessage(this, "   Removing " + AmountForEachDefoliation.ToString("#.0") + " g/m2 of biomass per day over " 
                	                         + DurationOfEachDefoliation + " days.");
	        }
            else
            {
	            mySummary.WriteMessage(this,"   Automatic defoliations are currently disabled, though defoliations can be triggered by another manager");
                mySummary.WriteMessage(this,"   If called, the manager will remove biomass from the sward simulating a \"" + baseDefoliationType + "\" event.");
            }

            if(ReturnType == ReturnAsTypes.AsDungUrine)
            {
            	mySummary.WriteMessage(this,"   Non-removed material will be returned as dung and urine. Urine added to soil according to proportions: "
            	+ string.Join(", ",urineFraction));
            }
            else
            	mySummary.WriteMessage(this,"   Non-removed material will be returned as residue.");
        }

        [EventSubscribe("DoManagement")]
        private void OnDoManagement(object sender, EventArgs e)
        {
            // check whether we need to continue defoliationg, i.e. within a multi-day defoliation event (need to check this first in the day)
            if ((daysDefoliating > 0) && (daysDefoliating < durationOfDefoliation))
            {
                // reset outputs
                resetMyOutputs();

                // re-check the amount to defoliate
	            double harvestableBiomass = harvestableSwardBiomass("All", "Harvestable");
                if (typeOfAmount == "DMToRemove")
                {
					if(harvestableBiomass > 0.001)
	                    herbageToRemove = Math.Min(harvestableBiomass, (amountGiven - cumAmountHarvested) / (durationOfDefoliation - daysDefoliating));
                }
                else if (typeOfAmount == "ResidualDM")
                {
	            	double currentDM = standingSwardBiomassWt;
	                if (currentDM > amountGiven)
	                    herbageToRemove = Math.Min(harvestableBiomass, (currentDM - amountGiven) / (durationOfDefoliation - daysDefoliating));
                }

                // remove plant biomass and return residue
	            if (Math.Abs(herbageToRemove) >= 0.001)
                {
	                // set biomass removal
mySummary.WriteMessage(this, "   Defoliation initialised on DoManagement - " + clock.Today.Date.ToShortDateString());
	                defoliateSward(herbageToRemove, typeOfDefoliation);

	                // return residue or excreta
		            if(ReturnedWt + ReturnedN > 0.0)
		            {
		                if (ReturnType == ReturnAsTypes.AsResidue)
		                    returnResidues();
		                else
		                    returnExcreta();
					}

	                // gather amount removed this event
	                cumAmountHarvested += HarvestedWt;
	            }

                daysDefoliating += 1;
            }

            // check whether a defoliation ended yesterday
            if (daysDefoliating < 0)
            { // clean up variables
                resetMyOutputs();
                daysDefoliating = 0;
            }

        	// check whether automatic defoliations are enabled
        	if (AutomaticManagementIsEnabled)
        	{
                // check whether we are within the period in which defoliations can happen
	            if ((clock.Today.Date >= DefoliationRotationStartDate.Date) && (clock.Today.Date <= DefoliationRotationEndDate.Date))
	            {
	                if (clock.Today.Date == DefoliationRotationStartDate.Date)
	                    DaysSinceLastDefoliation = IntervalBetweenDefoliations;

                    // check whether we should start a defoliation event
                    if (DefoliationTriggerType == DefoliationTriggerTypes.FixedInterval)
                    {
                        if (DaysSinceLastDefoliation == IntervalBetweenDefoliations)
		                    Defoliate(baseDefoliationType, AmountForEachDefoliation, baseAmountType, DurationOfEachDefoliation);
                    }
                    else if (DefoliationTriggerType == DefoliationTriggerTypes.TargetInterval)
                    {
                        if (DaysSinceLastDefoliation >= IntervalBetweenDefoliations)
                            Defoliate(baseDefoliationType, AmountForEachDefoliation, baseAmountType, DurationOfEachDefoliation);
                    }
                    else  //DefoliationTriggerType == DefoliationTriggerTypes.TargetStandingBiomass
                    {
                        if (standingSwardBiomassWt >= TargetStandingBiomass)
                            Defoliate(baseDefoliationType, AmountForEachDefoliation, baseAmountType, DurationOfEachDefoliation);
                    }
	            }
                //// Note: Only the code above, responsible for triggering automatic events, is limited by 'AutomaticManagementIsEnabled'. 
                ////       The rest of the code is still available to perform one-off defoliations.
                ////       It can be called from another manager or a schedulle thingy via Defoliate().
            }
        }

        [EventSubscribe("DoManagementCalculations")]
        private void OnDoManagementCalculations(object sender, EventArgs e)
        {
            // check whether a defoliation event has just been completed
            if (daysDefoliating == durationOfDefoliation)
            {
            	// get amount of biomass remaining and zero counters
                PostHarvestDM = standingSwardBiomassWt;
                RotationHarvestedDM = cumAmountHarvested;
                aDefoliationHasHappened = true;
                daysDefoliating = -1;
            }

            // count the days after a defoliation
            if (aDefoliationHasHappened && (daysDefoliating == 0))
                DaysSinceLastDefoliation += 1;
        }

        /// <summary>Sets up a defoliation event.</summary>
        /// <param name="defoliationType">Type of defoliation (cut, graze, or harvest)</param>
        /// <param name="amountDM">Amount of biomass to use (g/m2)</param>
        /// <param name="amountType">How the DM amount is interpreted (toRemove, residual)</param>
        /// <param name="duration">Number of days to defoliate over</param>
        public void Defoliate(string defoliationType, double amountDM, string amountType, int duration)
        {
            // check whether there are plants in the sward that can be defoliated
            if (swardHasLivingPlants)
            {
	            // check the defoliation type
	            if (defoliationType.ToLower() == "cut")
	                typeOfDefoliation = "Cut";
	            else if (defoliationType.ToLower() == "graze")
	                typeOfDefoliation = "Graze";
	            else if (defoliationType.ToLower() == "harvest")
	                typeOfDefoliation = "Harvest";
	            else
	                throw new Exception("Defoliation type should be either \"Cut\", \"Graze\", or \"Harvest\"!");

	            // check DM amount given
	            if (amountDM < 0.0)
	                throw new Exception("Amount to defoliate cannot be negative!");
	            else
	                amountGiven = amountDM;

	            // check the type of amount given
	            if (amountType.ToLower() == "dmtoremove")
	                typeOfAmount = "DMToRemove";
	            else if (amountType.ToLower() == "residualdm")
	                typeOfAmount = "ResidualDM";
	            else if (amountType.ToLower() == "usedefoliationfractions")
	                typeOfAmount = "UseDefoliationFractions";
	            else
		            throw new Exception("Amount type should be \"DMToRemove\", \"ResidualDM\", or \"UseDefoliationFractions\"!");

	            // check duration given
	            if (duration <= 0)
	                throw new Exception("Duration of defoliation cannot be zero or negative!");
	            else
	            	durationOfDefoliation = duration;

	            // check existing biomass and amount to remove
	            PreHarvestDM = standingSwardBiomassWt;
	            herbageToRemove = 0.0;
		        double harvestableBiomass = harvestableSwardBiomass("All", "Harvestable");
	        	if (typeOfAmount == "UseDefoliationFractions")
	        	{ // amount given is ignored, removal based on fractions
	        		amountGiven = 0.0;
	                if (harvestableBiomass > 0.0)
	                    herbageToRemove = -1.0;

	                mySummary.WriteMessage(this, "   Defoliation triggered, removing biomass using the removal fractions (set or default), during " + durationOfDefoliation + " days");
	        	}
	        	else if (typeOfAmount == "DMToRemove")
	        	{
	        		if (amountGiven > 0.001)
		            { // a meaningful amount was given, check whether all can be removed
						if (harvestableBiomass > 0.001)
		                	herbageToRemove = Math.Min(harvestableBiomass, amountGiven / durationOfDefoliation);

		                mySummary.WriteMessage(this, "   Defoliation triggered, attempting to remove " + amountGiven.ToString("#0.0") + " g/m2 of biomass over " + durationOfDefoliation + " days");
		            }
		        }
	            else if (typeOfAmount == "ResidualDM")
	            {
	            	// check how much biomass will be removed
	                if (PreHarvestDM > amountGiven)
	                    herbageToRemove = Math.Min(harvestableBiomass, (PreHarvestDM - amountGiven) / durationOfDefoliation);

	                mySummary.WriteMessage(this, "   Defoliation triggered, attempting to remove biomass down to " + amountGiven.ToString("#0.0") + " g/m2 over " + durationOfDefoliation + " days");
		        }

	            // can defoliation begin?
	            if (Math.Abs(herbageToRemove) >= 0.001)
				{
		            // set off first defoliation
mySummary.WriteMessage(this, "   Defoliation initialised on Defoliate - " + clock.Today.Date.ToShortDateString());
		            defoliateSward(herbageToRemove, typeOfDefoliation);

		            // return residue or excreta
		            if(ReturnedWt + ReturnedN > 0.0)
		            {
			            if (ReturnType == ReturnAsTypes.AsResidue)
			                returnResidues();
			            else
			                returnExcreta();
					}

		            // gather values for this event
		            cumAmountHarvested = HarvestedWt;
		            daysDefoliating = 1;
		            DaysSinceLastDefoliation = 0;
				}
				else
				{
		            // abort command as there is not enough biomass, check interval type
	                if (DefoliationTriggerType == DefoliationTriggerTypes.FixedInterval)
	                { // count the event as if it did happen
	                    cumAmountHarvested = 0.0;
	                    daysDefoliating = 1;
	                    DaysSinceLastDefoliation = 0;
	                }

	                mySummary.WriteMessage(this, "   Defoliation did not happend because current biomass (" + PreHarvestDM.ToString("#0.0") + " g/m2) is too low (total harvestable = " + harvestableBiomass.ToString("#0.0") + " g/m2)");
				}
			}
			else
			{
				mySummary.WriteMessage(this, "   Defoliation did not happend because there is no growing plants in the sward");
			}
        }

        /// <summary>Resets the values of outputs.</summary>
        private void resetMyOutputs()
        {
            DefoliatedWt = 0.0;
            DefoliatedN = 0.0;
            HarvestedWt = 0.0;
            HarvestedN = 0.0;
            RemovedWt = 0.0;
            RemovedN = 0.0;
            ReturnedWt = 0.0;
            ReturnedN = 0.0;
            NReturnedInDung = 0.0;
            NReturnedInUrine = 0.0;
            RotationHarvestedDM = 0.0;
        }

        /// <summary>Flags whether there is any living plant in the sward.</summary>
        private bool swardHasLivingPlants
        {
	        get
	        {
	        	bool result = false;
	        	foreach (Plant species in PMFSpecies)
                   	result |= species.IsAlive;
                foreach (AgPasture.PastureSpecies species in AgPSpecies)
                   	result |= species.IsAlive;
                return result;
	        }
        }

        /// <summary>Amount of plant biomass aboveground (g/m2).</summary>
        private double standingSwardBiomassWt
        {
        	get
        	{
        		double result = 0.0;
                foreach (Plant species in PMFSpecies)
                   result += (double)myZone.Get(species.Name+".AboveGround.Wt");
                foreach (AgPasture.PastureSpecies species in AgPSpecies)
                    result += species.StandingHerbageWt*0.1;
                return result;
            }
        }

        /// <summary>Amount of N in plant's biomass aboveground (g/m2).</summary>
        private double standingSwardBiomassN
        {
        	get
        	{
        		double result = 0.0;
                foreach (Plant species in PMFSpecies)
                   result += (double)myZone.Get(species.Name+".AboveGround.N");
                foreach (AgPasture.PastureSpecies species in AgPSpecies)
                    result += species.StandingHerbageN*0.1;
                return result;
            }
        }

        /// <summary>Amount of plant biomass from all organs available for defoliation (g/m2).</summary>
        /// <remarks>Assumes that organs with a BiomassRemoval.FractionToRemove > 0 are harvestable.
        /// For AgPasture, harvestable is based on minimum DM.</remarks>
        /// <param name="plantName">The name of the plant to retrieve its biomass</param>
        /// <param name="fractionType">The type of fraction to use (harvestable or total)</param>
        private double harvestableSwardBiomass(string plantName, string fractionType)
        {
        	double amountWt = 0.0;
    		double fraction = 0.0;
            foreach (Plant species in PMFSpecies)
            {
            	if ((plantName == "All") || (species.Name == plantName))
            	{
	            	if (species.AboveGround.Wt > 0.0)
	            	{
		                foreach (IOrgan organ in Apsim.Children(species, typeof(IOrgan)))
			    		{ // consider only amounts toRemove
				            fraction = (double)myZone.Get(species.Name + "." + organ.Name + ".BiomassRemovalDefaults." + typeOfDefoliation + ".FractionLiveToRemove");
			    			if ((fractionType == "Total") && (fraction > 0.0))
			    				fraction = 1.0;
			    			else if (RemoveAllBiomassIsEnabled && (fraction > 0.0))
			                	fraction = 0.95;
							amountWt += (double)myZone.Get(species.Name + "." + organ.Name + ".Live.Wt") * fraction;
			            	fraction = (double)myZone.Get(species.Name + "." + organ.Name + ".BiomassRemovalDefaults." + typeOfDefoliation + ".FractionDeadToRemove");
			    			if ((fractionType == "Total") && (fraction > 0.0))
			    				fraction = 1.0;
			    			else if (RemoveAllBiomassIsEnabled && (fraction > 0.0))
			                	fraction = 0.95;
							amountWt += (double)myZone.Get(species.Name + "." + organ.Name + ".Dead.Wt") * fraction;
		            	}
	            	}
            	}
			}

            foreach (AgPasture.PastureSpecies species in AgPSpecies)
            {
            	if ((plantName == "All") || (species.Name == plantName))
            	{
            		if (fractionType == "Total")
            			amountWt += species.AboveGroundWt*0.1;
            		else
	                	amountWt += species.HarvestableWt*0.1;
	            }
            }

            return amountWt;
        }

        /// <summary>Triggers the actual biomass removal and gather DM and N amounts.</summary>
        /// <param name="amountToRemove">The total DM amount to remove (g/m2)</param>
        /// <param name="removalType">The type of removal (Cut, Graze, Harvest)</param>
        private void defoliateSward(double amountToRemove, string removalType)
        {
            // get the amounts of biomass and N before today's defoliation
            double preRemovalDM = standingSwardBiomassWt;
            double preRemovalN = standingSwardBiomassN;
            double fractionToRemove = 0.0;

            // gather the actual biomass removal fractions, checking whether they need to be adjusted
            double totalHarvestableAmount = harvestableSwardBiomass("All", "Harvestable");
            if (amountToRemove > 0.0)
            { // an amount was given for defoliation, adjust removal fractions for each species in order to remove the amount specified
            	fractionToRemove = amountToRemove / totalHarvestableAmount;
            }
            else if (amountToRemove < 0.0)
            { // defoliation is not based on an amount, removal is determined simply by the removal fractions
                fractionToRemove = 1.0;
            }

            for (int i = 0; i < swardSpeciesName.Length; i++)
            {
                speciesFraction[i] = harvestableSwardBiomass(swardSpeciesName[i], "Harvestable") / totalHarvestableAmount;
                if (swardSpeciesType[i] == "PMF")
                {
                	// check whether the plant is alive
	                bool speciesIsAlive = (bool)myZone.Get(swardSpeciesName[i]+".IsEmerged");
	                if (speciesIsAlive)
	                {
	                	// set removal fractions (these overrides the default removals in the plant)
		                setRemoveFraction(swardSpeciesName[i], fractionToRemove);

			            // do the actual biomass removal
		                foreach (Plant species in PMFSpecies)
		                {
		                	if(species.Name == swardSpeciesName[i])
		                	{
		                		species.RemoveBiomass(removalType, defoliationFractions);
		                		break;
		                	}
		                }
		            }
	            }
	            else
	            {
                	// check whether the plant is alive
	                bool speciesIsAlive = (bool)myZone.Get(swardSpeciesName[i]+".IsAlive");
	                if (speciesIsAlive)
	                {
	                	// set removal amount (needs to be in kg/ha)
	                	double amountRequired = (double)myZone.Get(swardSpeciesName[i]+".HarvestableWt");
	                	if (amountToRemove > 0.0)
	                		amountRequired = amountToRemove * speciesFraction[i] * 10.0;

	                    // do the actual biomass removal
		                foreach (AgPasture.PastureSpecies species in AgPSpecies)
		                {
		                	if(species.Name == swardSpeciesName[i])
		                	{
			                    species.Graze(amount: amountRequired, type: "SetRemoveAmount");
			                    break;
                    		}
                    	}
                    }
                }
            }

            // get the amounts of biomass and N after today's defoliation
            double postRemovalDM = standingSwardBiomassWt;
            double postRemovalN = standingSwardBiomassN;

            // get total defoliation (total plant stuff lost)
            DefoliatedWt = preRemovalDM - postRemovalDM;
            DefoliatedN = preRemovalN - postRemovalN;

            // get amounts harvested, removed, and returned
            manageDefoliatedBiomass();
        }

        /// <summary>Sets the biomass removal fractions for PMF plants.</summary>
        /// <param name="plantName">The name of PMF species</param>
        /// <param name="fractionHarvestable">The fraction of harvestable biomass to be removed (0-1)</param>
        private void setRemoveFraction(string plantName, double fractionHarvestable)
        {
            foreach (Plant species in PMFSpecies)
            {
            	if ((species.Name == plantName) && (species.IsAlive))
            	{
    				double fractionToRemove;
    				double fractionToResidue;

                    // set removal fractions (these overrides the default removals in the plant)
	                foreach (IOrgan organ in Apsim.Children(species, typeof(IOrgan)))
	                {
	                	// first get the removal for Live material
			            fractionToRemove = (double)myZone.Get(species.Name + "." + organ.Name + ".BiomassRemovalDefaults." + typeOfDefoliation + ".FractionLiveToRemove");
	                	if (RemoveAllBiomassIsEnabled && (fractionToRemove > 0.0))
		                	fractionToRemove = 0.95;
						fractionToRemove = fractionHarvestable * fractionToRemove;
		                fractionToRemove = Math.Min(1.0, fractionToRemove);
		                defoliationFractions.SetFractionToRemove(organ.Name, fractionToRemove, "Live");
		                if (RemoveAllBiomassIsEnabled)
		                	fractionToResidue = 0.0;
		                else
		                	fractionToResidue = (double)myZone.Get(species.Name + "." + organ.Name + ".BiomassRemovalDefaults." + typeOfDefoliation + ".FractionLiveToResidue");
	            		fractionToResidue = Math.Min(fractionHarvestable * fractionToResidue, 1.0 - fractionToRemove);
		                defoliationFractions.SetFractionToResidue(organ.Name, fractionToResidue, "Live");

	                	// then get the removal for Dead material
	                	fractionToRemove = (double)myZone.Get(species.Name + "." + organ.Name + ".BiomassRemovalDefaults." + typeOfDefoliation + ".FractionDeadToRemove");
	                	if (RemoveAllBiomassIsEnabled && (fractionToRemove > 0.0))
		                	fractionToRemove = 0.95;
						fractionToRemove = fractionHarvestable * fractionToRemove;
		                fractionToRemove = Math.Min(1.0, fractionToRemove);
		                defoliationFractions.SetFractionToRemove(organ.Name, fractionToRemove, "Dead");
		                if (RemoveAllBiomassIsEnabled)
		                	fractionToResidue = 0.0;
		                else
			            	fractionToResidue = (double)myZone.Get(species.Name + "." + organ.Name + ".BiomassRemovalDefaults." + typeOfDefoliation + ".FractionDeadToResidue");
	            		fractionToResidue = Math.Min(fractionHarvestable * fractionToResidue, 1.0 - fractionToRemove);
		                defoliationFractions.SetFractionToResidue(organ.Name, fractionToResidue, "Dead");
	            	}
            	}
			}
        }

        /// <summary>Gathers the DM and N amounts harvested, to be removed, and to be returned.</summary>
        private void manageDefoliatedBiomass()
        {
	    	double digestibilityStructural = 0.65;
	    	double digestibilityNonStrucutural = 1.0;

            if (DefoliatedWt > 0.0)
            {
            	double speciesHarvestedWt;
            	double speciesHarvestedN;
            	double speciesFractionToRemove;
                HarvestedWt = 0.0;
                HarvestedN = 0.0;
                RemovedWt = 0.0;
                RemovedN = 0.0;

                foreach (Plant species in PMFSpecies)
                {
                	if(species.AboveGround.Wt > 0.0)
                	{
			            // get the amount harvested (plant stuff removed from plants)
                		speciesHarvestedWt = 0.0;
                		speciesHarvestedN = 0.0;
		                foreach (IOrgan organ in Apsim.Children(species, typeof(IOrgan)))
		                {
		                	speciesHarvestedWt += (double)myZone.Get(species.Name+"."+organ.Name+".Removed.Wt");
		                	speciesHarvestedN += (double)myZone.Get(species.Name+"."+organ.Name+".Removed.N");
						}

	                    HarvestedWt += speciesHarvestedWt;
	                    HarvestedN += speciesHarvestedN;

						// get the DM fraction to be removed
						if(FractionDMToRemove>=0.0)
						{
							speciesFractionToRemove = FractionDMToRemove;
						}
						else
			            { // use digestibility to define the fraction
		                	double fracStructural = species.AboveGround.StructuralWt/species.AboveGround.Wt;
		                	speciesFractionToRemove = (1.0 - fracStructural)*digestibilityNonStrucutural + fracStructural*digestibilityStructural;
		                	speciesFractionToRemove = Math.Min(1.0, Math.Max(0.0, speciesFractionToRemove));
			            }

			            // get the amounts actually removed from field
		                RemovedWt += speciesHarvestedWt * speciesFractionToRemove;
		                RemovedN += speciesHarvestedN * FractionNToRemove;
                   }
                }

                foreach (AgPasture.PastureSpecies species in AgPSpecies)
                {
                	if(species.AboveGroundWt > 0.0)
                	{
                		// get the amount harvested
	                    speciesHarvestedWt = species.HarvestedWt*0.1;
	                    speciesHarvestedN = species.HarvestedN*0.1;
	                    HarvestedWt += speciesHarvestedWt;
	                    HarvestedN += speciesHarvestedN;

						// get fraction to be removed
						if(FractionDMToRemove>=0.0)
						{
							speciesFractionToRemove = FractionDMToRemove;
						}
						else
			            { // use digestibility to define the fraction
			                speciesFractionToRemove = species.HarvestedDigestibility;
			            }

			            // get the amounts actually removed from field
		                RemovedWt += speciesHarvestedWt * speciesFractionToRemove;
		                RemovedN += speciesHarvestedN * FractionNToRemove;
                    }
                }

	            // get the amounts to be returned to the field (as residue or dung+urine)
	            ReturnedWt = HarvestedWt - RemovedWt;
	            ReturnedN = HarvestedN - RemovedN;
	            if (ReturnType == ReturnAsTypes.AsDungUrine)
	            {
	                if (NDungType == DungNContentTypes.DefineProportion)
	                    NReturnedInDung = ReturnedN * ProportionN2Dung;
	                else
	                    NReturnedInDung = Math.Min(ReturnedN, ReturnedWt * 0.4 / CNRatioDung);
	                NReturnedInDung = Math.Min(NReturnedInDung, ReturnedN);
	                NReturnedInUrine = ReturnedN - NReturnedInDung;
	            }
	            else
	            {
	                NReturnedInDung = 0.0;
	                NReturnedInUrine = 0.0;
	            }
            }
        }

        /// <summary>Returns the material not removed off field as residue.</summary>
        private void returnResidues()
        {
            if ((ReturnedWt > 0.0) || (ReturnedN > 0.0))
            {
                PMF.BiomassRemovedType BiomassResidue = new PMF.BiomassRemovedType();
                string[] type = new string[] { "Grass" };
                float[] dltdm = new float[] { (float)(10.0 * ReturnedWt) };
                float[] dltn = new float[] { (float)(10.0 * ReturnedN) };
                float[] dltp = new float[] { 0 };
                float[] fraction = new float[] { 1 };     // fraction is always 1.0 here

                BiomassResidue.crop_type = "Grass";
                BiomassResidue.dm_type = type;
                BiomassResidue.dlt_crop_dm = dltdm;
                BiomassResidue.dlt_dm_n = dltn;
                BiomassResidue.dlt_dm_p = dltp;
                BiomassResidue.fraction_to_residue = fraction;
                BiomassRemoved.Invoke(BiomassResidue);
            }
        }

        /// <summary>Returns the material not removed off field as dung and urine).</summary>
        private void returnExcreta()
        {
            if ((ReturnedWt > 0.0) || (NReturnedInDung > 0.0))
            {
                PMF.BiomassRemovedType BiomassDung = new PMF.BiomassRemovedType();
                string[] type = new string[] { "RuminantDung_PastureFed" };
                float[] dltdm = new float[] { (float)(10.0 * ReturnedWt) };
                float[] dltn = new float[] { (float)(10.0 * NReturnedInDung) };
                float[] dltp = new float[] { 0 };
                float[] fraction = new float[] { 1 };     // fraction is always 1.0 here

                BiomassDung.crop_type = "RuminantDung_PastureFed";
                BiomassDung.dm_type = type;
                BiomassDung.dlt_crop_dm = dltdm;
                BiomassDung.dlt_dm_n = dltn;
                BiomassDung.dlt_dm_p = dltp;
                BiomassDung.fraction_to_residue = fraction;
                BiomassRemoved.Invoke(BiomassDung);
            }

            if (NReturnedInUrine > 0.0)
            {
                double[] myUrineDeposition = new double[mySoil.Thickness.Length];
                for (int z = 0; z < urineFraction.Length; z++)
                    myUrineDeposition[z] = NReturnedInUrine * 10.0 * urineFraction[z];
                Urea.AddKgHaDelta(SoluteSetterType.Fertiliser, myUrineDeposition);
            }
        }

        // Auxiliary bits and pieces  - - - - - - - - - - - - - - - - - - - - - - - - - - - - - - - - -

        /// <summary>Type of defoliation to use</summary>
        public enum DefoliationTypes
        {
            /// <summary>Cut</summary>
            Cut,
            /// <summary>Graze</summary>
            Graze,
            /// <summary>Harvest</summary>
            Harvest
        }

        /// <summary>Flag how defoliations will be triggered</summary>
        public enum DefoliationTriggerTypes
        {
            /// <summary>Setting a fixed interval</summary>
            FixedInterval,
            /// <summary>Setting a target (minimum) inteval</summary>
            TargetInterval,
            /// <summary>Setting a target (maximum) standing biomass</summary>
            TargetStandingBiomass
        }

        /// <summary>How the DM amount given is interpreted</summary>
        public enum DefoliateAmountTypes
        {
            /// <summary>Setting a DM amount to remove</summary>
            DMToRemove,
            /// <summary>Setting the residual DM amount</summary>
            ResidualDM,
            /// <summary>Remove according to crop's BiomassRemovalFractions</summary>
            None_UseDefoliationFractions
        }

        /// <summary>Fraction of defoliated DM to remove from field</summary>
        public enum DMRemovalTypes
        {
            /// <summary>Remove all DM</summary>
            RemoveAll,
            /// <summary>Remove no DM</summary>
            RemoveNone,
            /// <summary>Remove a user-defined fraction</summary>
            UserDefinedFraction,
            /// <summary>Remove a fraction based on plant digestibility</summary>
            BasedOnDigestibility
        }

        /// <summary>Fraction of N in the defoliated material to remove from field</summary>
        public enum NRemovalTypes
        {
            /// <summary>Remove all N</summary>
            RemoveAll,
            /// <summary>Remove no N</summary>
            RemoveNone,
            /// <summary>Remove a user-defined fraction</summary>
            UserDefinedFraction,
            /// <summary>Remove a fraction equal to DM removed</summary>
            ProportionalToDM
        }

        /// <summary>Define how the non-removed material is returned to the field</summary>
        public enum ReturnAsTypes
        {
            /// <summary>Return plant material as residue</summary>
            AsResidue,
            /// <summary>Return meterial as dung and urine</summary>
            AsDungUrine
        }

        /// <summary>Define how the proportion of N in dung is defined</summary>
        public enum DungNContentTypes
        {
            /// <summary>Define the proportion of N returned as dung</summary>
            DefineProportion,
            /// <summary>Define the C:N of dung</summary>
            DefineCNratio
        }
	}
}
```
        Manager FertiliseOnFixedDates
          EachYear = True
          Dates = 5-jan,5-feb,5-mar,5-apr,5-aug,5-sep,5-oct,5-nov,5-dec
          UseCritNThreshold = False
          CritNThreshold = 50
          CritNDepth = 75
          Depth = 50
          Amount = 15
          FertiliserType = UreaN
```csharp
using System;
using Models.Core;
using Models.Soils;
using Models.Soils.Nutrients;
using Models.PMF;
using APSIM.Shared.Utilities;
using System.Linq;

namespace Models
{
    [Serializable]
    public class Script : Model
    {
        [Link] Clock clock;
        [Link] Fertiliser fertiliser;
        [Link] ISummary summary;
        [Link] Soil soil;

        private Nutrient nutrient;
        private SoilNitrogen soilN;

        [Separator("Fertiliser will be applied on the date(s) below")]
        [Description("Apply fertiliser on the same day(s) each year? If no, then must include the year of appliaction below")]
        public bool EachYear { get; set; }

        [Description("Dates for one or more fertiliser applications (dd-mmm or dd-mmm-yyyy) as a list with a comma between dates")]
        public string[] Dates { get; set; }

        [Separator("Test for the mineral N in the soil and don't apply the fertiliser if greater than X kgN/ha is stored in the soil above a depth of Y mm")]
        [Description("Use a critical soil mineral N to prevent application above a threshold?")]
        public bool UseCritNThreshold { get; set; }

        [Description("Don't add fertiliser if N in the soil to the depth below exceeds (kg/ha)")]
        public double CritNThreshold { get; set; }

        [Description("Depth to which the amount of N in the soil should be calculated (mm)")]
        public double CritNDepth { get; set; }

        [Separator("Fertiliser application details")]
        [Description("Depth at which to apply the fertiliser (mm)")]
        public double Depth { get; set; }

        [Description("Amount of fertiliser to apply (kg N /ha) per application")]
        public double Amount { get; set; }

        [Description("Fertiliser type - select from the list")]
        public Fertiliser.Types FertiliserType { get; set; }


        [EventSubscribe("StartOfSimulation")]
        private void FindSoilNOrNutrient(object sender, EventArgs e)
        {
        	nutrient = Apsim.Find(this, typeof(Nutrient)) as Nutrient;
        	soilN = Apsim.Find(this, typeof(SoilNitrogen)) as SoilNitrogen;

        	if (nutrient == null && soilN == null)
        		throw new Exception(string.Format("Error in script {0}: Unable to find nutrient or soilN.", Name));
        }

        [EventSubscribe("DoManagement")]
        private void OnDoManagement(object sender, EventArgs e)
        {
        	if (OnApplicationDate())
        	{
        		if (NContentBelowThreshold())
        			fertiliser.Apply(Amount, FertiliserType, Depth);
        		else
        			summary.WriteMessage(this, "Skipping fertiliser application due to soil mineral N content being above critical threshold.");
    		}
        }

        /// <summary>Checks if today's date is one of the specified fertiliser application dates.</summary>
        private bool OnApplicationDate()
        {
        	if (EachYear)
        		return Dates.Any(d => DateUtilities.DatesEqual(d, clock.Today));
        	
        	DateTime[] dates = Dates.Select(d => DateTime.ParseExact(d, "d-MMM-yyyy", null)).ToArray();
        	return dates.Any(d => SameDate(d, clock.Today));
        }

        /// <summary>Checks if N content in soil is below critical threshold.</summary>
        private bool NContentBelowThreshold()
        {
        	if (!UseCritNThreshold)
        		return true;
        	
        	double[] weights = GetLayerWeights();
        	double cumSoilN = 0;

        	for (int i = 0; i < soil.Thickness.Length; i++)
        	{
        		if (nutrient != null)
        			cumSoilN += weights[i] * nutrient.MineralN[i];
        		else if (soilN != null)
        			cumSoilN += weights[i] * soilN.mineral_n[i];
    		}

        	return cumSoilN <= CritNThreshold;
        }

        private double[] GetLayerWeights()
		{
			double[] weights = new double[soil.Thickness.Length];
			double cumDepth = 0;

			for (int i = 0; i < soil.Thickness.Length; i++)
			{
				cumDepth += soil.Thickness[i];
				if (cumDepth < CritNDepth)
					weights[i] = 1;
				else if (cumDepth - soil.Thickness[i] <= CritNDepth)
					weights[i] = (CritNDepth - (cumDepth - soil.Thickness[i])) / soil.Thickness[i];
				else
					weights[i] = 0;
			}

			return weights;
		}

		private bool SameDate(DateTime d1, DateTime d2)
		{
			return d1.Year == d2.Year && d1.DayOfYear == d2.DayOfYear;
		}
    }
}
```
        Manager AutomaticIrrigation
          allowIrrigation = True
          seasonStart = 1-sep
          seasonEnd = 30-apr
          seasonsAllocation = 10000
          triggerDeficit = 25
          targetDeficit = 99
          returndays = 2
          maximumAmount = 30
          depthPAWC = 300
```csharp
using System;
using Models.Core;
using Models.PMF;
using Models.Soils;
using System.Xml.Serialization;
using Models.PMF;
using APSIM.Shared.Utilities;

        
namespace Models
{
    [Serializable] 
    [System.Xml.Serialization.XmlInclude(typeof(Model))]
    public class Script : Model
    {
        //Communication to other modules
        [Link] ISummary summary = null;
        [Link] Irrigation Irrigation;
        [Link] Clock Clock;
        [Link] Soil Soil;
        [Link(IsOptional = true)] IPlant existingCrop;
       
        //User inputs from properties tab
        [Description("Turn irrigation on?")]
        public bool allowIrrigation { get; set; }
        [Description("Start of irrigation season (dd-MMM)")]
        public string seasonStart { get; set; }
        [Description("End of irrigation season (dd-MMM)")]
        public string seasonEnd { get; set; }
        [Description("Season allocation (mm)")]
        public double seasonsAllocation { get; set; }
        [Description("Deficit to trigger irrigation (% PAWC)")]
        public double triggerDeficit { get; set; }
        [Description("Deficit to stop irrigaton (% PAWC)")]
        public double targetDeficit { get; set; }
        [Description("Minimum days for irrigation to return")]
        public double returndays { get; set; }
        [Description("Maximum irrigation application (mm/day)")]
        public double maximumAmount { get; set; }
        [Description("Depth to calculate PAWC (mm)")]
        public double depthPAWC { get; set; }

        //Class members
        [XmlIgnore] public double TopSWdeficit { get; set; }
        [XmlIgnore] public double TopSWC { get; set; }
        [XmlIgnore] public double DaysSinceIrrigation { get; set; }
        [XmlIgnore] public double AmountToApply { get; set; }
        [XmlIgnore] public double SeasonAppliedAmount { get; set; }
        
        private bool IrrigationIsAllowed { get; set; }
        private bool SeasonIsOpen { get; set; }
        private bool CropIsActive { get; set; }
        private bool IrrigatorIsAvailable { get; set; }
        private bool SoilIsDry { get; set; }

        private DateTime StartDate;
        private DateTime EndDate;
        private double TopDUL;
        private double TopLL;
        private int nLayers;
    
        //Calculate static soil variables
        [EventSubscribe("StartOfSimulation")]
        private void OnStartOfSimulation(object sender, EventArgs e)
        {   
            //Set the season dates
            StartDate = DateTime.Parse(seasonStart + "-" + Clock.Today.Year.ToString());
            EndDate = DateTime.Parse(seasonEnd + "-" + Clock.Today.Year.ToString());
            
            //Can we irrigate at all?
            IrrigationIsAllowed = false; 
            if (allowIrrigation)
                IrrigationIsAllowed = true; 

            //Calculate soil water variables
            double depthFromSurface = 0.0;
            double fracLayer = 0.0;
            nLayers = Soil.Thickness.Length;
            for (int layer = 0; layer < nLayers; layer++)
            {
                fracLayer = Math.Min(1.0, (depthPAWC - depthFromSurface) / Soil.Thickness[layer]);
                TopLL += Soil.LL15mm[layer] * fracLayer;
                TopDUL += Soil.DULmm[layer] * fracLayer;
                depthFromSurface += Soil.Thickness[layer];
                if (depthFromSurface >= depthPAWC)
                    layer = nLayers;
            }
        }
             
        //Determine daily requirement for irrigation
        [EventSubscribe("StartOfDay")]
        private void OnStartOfDay(object sender, EventArgs e)
        {
            //Can we irrigate today?          
            SeasonIsOpen = isBetween(Clock.Today, StartDate, EndDate);

            //Is there a crop in the ground that needs irrigation?
            CropIsActive = false;
            if ((existingCrop != null) && (existingCrop.IsAlive))
                CropIsActive = true;
            //if ((existingCrop.Phenology.Stage >= 3.0) && (existingCrop.Phenology.Stage < 6.0))
          
            //Is the irrigator available?
            IrrigatorIsAvailable = false;
            DaysSinceIrrigation += 1;
            if (DaysSinceIrrigation >= returndays)
                IrrigatorIsAvailable = true;
          
            //Is the soil dry enough to require irrigation?
            SoilIsDry = false;
            double depthFromSurface = 0.0;
            double fracLayer = 0.0;
            TopSWC = 0.0;
            for (int layer = 0; layer < nLayers; layer++)
            //for (int layer = 0; depthFromSurface < depthPAWC + Soil.Thickness[layer]; layer++)
            {
                fracLayer = Math.Min(1.0, (depthPAWC - depthFromSurface) / Soil.Thickness[layer]);
                TopSWC += Soil.SoilWater.SWmm[layer] * fracLayer;
                depthFromSurface += Soil.Thickness[layer];
                if (depthFromSurface >= depthPAWC)
                    layer = nLayers;
            }
            
            TopSWdeficit = TopSWC - TopDUL;
            if (Math.Max(0.0, -TopSWdeficit) >= (TopDUL - TopLL) * (100 - triggerDeficit) / 100)
                SoilIsDry = true;
                
            //Are all the conditions ratifying irrigation
            if (IrrigationIsAllowed && SeasonIsOpen && CropIsActive && IrrigatorIsAvailable && SoilIsDry)
            {
                //Lets bloody well irrigate then!!!!
                AmountToApply = TopDUL * targetDeficit / 100 - TopSWC;
                AmountToApply = Math.Max(0.0, Math.Min(AmountToApply, seasonsAllocation - SeasonAppliedAmount));
                Irrigation.Apply(AmountToApply);
                DaysSinceIrrigation = 0;
                SeasonAppliedAmount += AmountToApply;
            }
        }
        
        ///Checks whether theDate is between iniDate and endDate (non-year specific)
        private bool isBetween(DateTime theDay, DateTime iniDate, DateTime endDate)
        {
            bool result = false;
            if (iniDate.DayOfYear < endDate.DayOfYear)
            {
                // period is within one year, ex: summer in the northern hemisphere
                if ((theDay.DayOfYear >= iniDate.DayOfYear) && (theDay.DayOfYear <= endDate.DayOfYear))
                    result = true;
            }
            else
            {
                // period goes over the end of the year, ex: summer in the southern hemisphere
                if ((theDay.DayOfYear >= iniDate.DayOfYear) || (theDay.DayOfYear <= endDate.DayOfYear))
                    result = true;
            }
            
            return result;
        }
    }
}
```
      MicroClimate: a_interception=0; b_interception=1; c_interception=0; d_interception=0; soil_albedo=0.23; SoilHeatFluxFraction=0.4; NightInterceptionFraction=0.5; ReferenceHeight=2
      Irrigation
      Fertiliser
      SurfaceOrganicMatter: InitialResidueName=Sward; InitialResidueType=grass; InitialResidueMass=1000; InitialStandingFraction=0; InitialCPR=0; InitialCNR=15; FractionFaecesAdded=0.5
      Soil LismoreSoil: SoilType=NZ_Sedimentary; LocalName=Lismore; Site=Winchmore; NearestTown=Ashburton; Region=Canterbury; Country=New Zealand; Latitude=-48.48; Longitude=0
        Chemical
          Thickness  NO3N  NH4N  PH
          150        5     0.1   6
          150        2.5   0.1   6
          200        1     0.1   6
          150        0.75  0.1   6
          250        0.5   0.1   6
          300        0.5   0.1   6
          300        0.5   0.1   6
        Physical
          Thickness  ParticleSizeClay  BD    AirDry  LL15   DUL    SAT   KS
          150        20                1.3   0.05    0.15   0.36   0.45  5000
          150        15                1.35  0.12    0.14   0.34   0.43  2500
          200        12                1     0.055   0.055  0.19   0.25  3000
          150        8                 0.53  0.015   0.015  0.065  0.15  10000
          250        6                 0.31  0.01    0.01   0.04   0.11  17500
          300        5                 0.3   0.01    0.01   0.03   0.11  20000
          300        5                 0.3   0.01    0.01   0.03   0.11  20000
          SoilCrop RyegrassSoil: LL=[0.15, 0.14, 0.06, 0.02, 0.01, 0.01, 0.01]; KL=[0.1, 0.1, 0.08, 0.04, 0.01, 0, 0]; XF=[1, 1, 1, 1, 1, 0, 0]
          SoilCrop WhiteCloverSoil: LL=[0.15, 0.14, 0.06, 0.02, 0.01, 0.01, 0.01]; KL=[0.1, 0.1, 0.08, 0.04, 0.01, 0, 0]; XF=[1, 1, 1, 1, 1, 0, 0]
        SoilWater: SummerDate=1-Nov; SummerU=6; SummerCona=3.5; WinterDate=1-apr; WinterU=2; WinterCona=2; DiffusConst=88; DiffusSlope=35; Salb=0.13; CN2Bare=73; CNRed=20; CNCov=0.8; slope=0; discharge_width=0; catchment_area=0; max_pond=0
          Thickness  SWCON  KLAT
          150        0.5    0
          150        0.52   0
          200        0.55   0
          150        0.6    0
          250        0.65   0
          300        0.65   0
          300        0.65   0
        SoilNitrogen: fom_types=[default, manure, mucuna, lablab, shemp, stable]; fract_carb=[0.2, 0.3, 0.54, 0.57, 0.45, 0]; fract_cell=[0.7, 0.3, 0.37, 0.37, 0.47, 0.1]; fract_lign=[0.1, 0.4, 0.09, 0.06, 0.08, 0.9]
          SoilNitrogenNO3 NO3
          SoilNitrogenNH4 NH4
          SoilNitrogenUrea Urea
          SoilNitrogenPlantAvailableNO3 PlantAvailableNO3
          SoilNitrogenPlantAvailableNH4 PlantAvailableNH4
        Organic: FOMCNRatio=40
          Thickness  Carbon  SoilCNRatio  FBiom  FInert  FOM
          150        3       12           0.04   0.5     331.337
          150        1       12           0.02   0.7     245.461
          200        0.6     12           0.02   0.83    164.537
          150        0.4     12           0.01   0.9     121.892
          250        0.25    12           0.01   0.95    73.9313
          300        0.15    12           0      0.99    40.5743
          300        0.1     12           0      0.99    22.2677
        InitialWater Initial water: PercentMethod=1; FractionFull=0.95
        Sample Initial nitrogen: Thickness=[150, 150, 200, 150, 250, 300, 300]; SWUnits=Volumetric; OCUnits=Total; PHUnits=Water
        CERESSoilTemperature
      PastureSpecies Ryegrass: MaximumNUptake=10; Albedo=0.26; Gsmax=0.011; R50=200; InitialShootDM=1500; InitialRootDM=450; InitialRootDepth=750; ReferencePhotosyntheticRate=1; LightExtinctionCoefficient=0.5; GrowthTminimum=1; GrowthToptimum=20; GrowthTEffectExponent=1.7; HeatOnsetTemperature=28; HeatFullTemperature=35; HeatRecoverySumDD=30; HeatRecoveryTReference=25; ColdOnsetTemperature=1; ColdFullTemperature=-5; ColdRecoverySumDD=25; MaintenanceRespirationCoefficient=0.03; GrowthRespirationCoefficient=0.25; RespirationTReference=20; RespirationExponent=1.5; NThresholdsForLeaves=[0.04, 0.012, 0.05]; NThresholdsForStems=[0.02, 0.006, 0.025]; NThresholdsForStolons=[0, 0, 0]; NThresholdsForRoots=[0.02, 0.006, 0.025]; DegreesDayForGermination=125; TargetShootRootRatio=4; MaxRootAllocation=0.25; ShootRootGlfFactor=0.5; ReproSeasonReferenceLatitude=41; ReproSeasonTimingCoeff=0.14; ReproSeasonMaxAllocationIncrease=0.5; ReproSeasonAllocationCoeff=0.1; FractionLeafMaximum=0.7; FractionLeafMinimum=0.7; FractionLeafDMThreshold=500; FractionLeafDMFactor=2000; FractionLeafExponent=3; SpecificLeafArea=25; SpecificRootLength=100; ShootMaxEffectOnLAI=1000; MaxStemEffectOnLAI=1; LiveLeavesPerTiller=3; TissueTurnoverRateShoot=0.05; TissueTurnoverRateRoot=0.02; DetachmentRateShoot=0.08; TurnoverTemperatureMin=2; TurnoverTemperatureRef=20; TurnoverTemperatureExponent=1; TurnoverDroughtEffectMax=1; TurnoverDroughtThreshold=0.5; TurnoverDefoliationCoefficient=0.5; TurnoverDefoliationRootEffect=0.1; FractionNLuxuryRemobilisable=[0.1, 0.1, 0.1]; SoilSaturationEffectMax=0.1; MinimumWaterFreePorosity=-1; SoilSaturationRecoveryFactor=0.25; NDillutionCoefficient=0.25; GlfGeneric=1; GlfSoilFertility=1; PlantHeightMinimum=25; PlantHeightMaximum=600; PlantHeightMassForMax=10000; PlantHeightExponent=2.8; RootDepthMinimum=50; RootDepthMaximum=750; RootElongationRate=25; RootDistributionDepthParam=90; RootDistributionExponent=3.2; DigestibilitiesCellWall=[0.6, 0.6, 0.6, 0.2]; MinimumGreenWt=100; PreferenceForGreenOverDead=1; PreferenceForLeafOverStems=1
        zero: SpeciesFamily, PhotosyntheticPathway, UseHeatStressFactor, UseColdStressFactor, ColdRecoveryTReference, UseReproSeasonFactor, FractionToStolon, StolonEffectOnLAI, MinimumNFixation, MaximumNFixation, FractionStolonStanding, WaterAvailableMethod, NitrogenAvailableMethod
        PastureAboveGroundOrgan Leaves
          GenericTissue LeafCohort1
          GenericTissue LeafCohort2
          GenericTissue LeafCohort3
          GenericTissue Dead
        PastureAboveGroundOrgan Stems
          GenericTissue LeafCohort1
          GenericTissue LeafCohort2
          GenericTissue LeafCohort3
          GenericTissue Dead
        PastureAboveGroundOrgan Stolons
          GenericTissue LeafCohort1
          GenericTissue LeafCohort2
          GenericTissue LeafCohort3
          GenericTissue Dead
      PastureSpecies WhiteClover: MaximumNUptake=10; Albedo=0.26; Gsmax=0.011; R50=200; SpeciesFamily=1; PhotosyntheticPathway=0; InitialShootDM=500; InitialRootDM=150; InitialRootDepth=350; ReferencePhotosyntheticRate=1; LightExtinctionCoefficient=0.8; GrowthTminimum=2; GrowthToptimum=22; GrowthTEffectExponent=1.7; UseHeatStressFactor=0; HeatOnsetTemperature=30; HeatFullTemperature=36; HeatRecoverySumDD=20; HeatRecoveryTReference=25; UseColdStressFactor=0; ColdOnsetTemperature=2; ColdFullTemperature=-5; ColdRecoverySumDD=30; ColdRecoveryTReference=0; MaintenanceRespirationCoefficient=0.04; GrowthRespirationCoefficient=0.25; RespirationTReference=20; RespirationExponent=1.5; NThresholdsForLeaves=[0.045, 0.02, 0.055]; NThresholdsForStems=[0.0225, 0.01, 0.0275]; NThresholdsForStolons=[0.0225, 0.01, 0.0275]; NThresholdsForRoots=[0.0225, 0.01, 0.0275]; DegreesDayForGermination=125; TargetShootRootRatio=4; MaxRootAllocation=0.25; ShootRootGlfFactor=0.5; UseReproSeasonFactor=0; ReproSeasonReferenceLatitude=41; ReproSeasonTimingCoeff=0.14; ReproSeasonMaxAllocationIncrease=0.5; ReproSeasonAllocationCoeff=0.1; FractionLeafMaximum=0.56; FractionLeafMinimum=0.28; FractionLeafDMThreshold=500; FractionLeafDMFactor=2000; FractionLeafExponent=3; FractionToStolon=0.2; SpecificLeafArea=30; SpecificRootLength=45; StolonEffectOnLAI=0.3; ShootMaxEffectOnLAI=500; MaxStemEffectOnLAI=0.5; LiveLeavesPerTiller=3; TissueTurnoverRateShoot=0.05; TissueTurnoverRateRoot=0.02; DetachmentRateShoot=0.11; TurnoverTemperatureMin=2; TurnoverTemperatureRef=20; TurnoverTemperatureExponent=1; TurnoverDroughtEffectMax=1; TurnoverDroughtThreshold=0.5; TurnoverDefoliationCoefficient=0.5; TurnoverDefoliationRootEffect=0.1; FractionNLuxuryRemobilisable=[0.1, 0.1, 0.1]; MinimumNFixation=0.2; MaximumNFixation=0.6; SoilSaturationEffectMax=0.1; MinimumWaterFreePorosity=-1; SoilSaturationRecoveryFactor=0.25; NDillutionCoefficient=1; GlfGeneric=1; GlfSoilFertility=1; PlantHeightMinimum=25; PlantHeightMaximum=350; PlantHeightMassForMax=7500; PlantHeightExponent=2.5; RootDepthMinimum=30; RootDepthMaximum=350; RootElongationRate=25; RootDistributionDepthParam=70; RootDistributionExponent=2.5; DigestibilitiesCellWall=[0.6, 0.6, 0.6, 0.2]; MinimumGreenWt=50; FractionStolonStanding=0; PreferenceForGreenOverDead=1; PreferenceForLeafOverStems=1; WaterAvailableMethod=0; NitrogenAvailableMethod=0
        PastureAboveGroundOrgan Leaves
          GenericTissue LeafCohort1
          GenericTissue LeafCohort2
          GenericTissue LeafCohort3
          GenericTissue Dead
        PastureAboveGroundOrgan Stems
          GenericTissue LeafCohort1
          GenericTissue LeafCohort2
          GenericTissue LeafCohort3
          GenericTissue Dead
        PastureAboveGroundOrgan Stolons
          GenericTissue LeafCohort1
          GenericTissue LeafCohort2
          GenericTissue LeafCohort3
          GenericTissue Dead
      Report Results: EventNames=[Clock].EndOfDay
        VariableNames:
          [Clock].Today as Date
          ([Ryegrass].TotalWt + [WhiteClover].TotalWt) as Sward.TotalWt
          ([Ryegrass].AboveGroundWt + [WhiteClover].AboveGroundWt) as Sward.AboveGroundWt
          ([Ryegrass].BelowGroundWt + [WhiteClover].BelowGroundWt) as Sward.BelowGroundWt
          ([Ryegrass].StandingHerbageWt + [WhiteClover].StandingHerbageWt) as Sward.StandingHerbageWt
          ([Ryegrass].HarvestableWt + [WhiteClover].HarvestableWt) as Sward.HarvestableWt
          ([Ryegrass].HarvestedWt + [WhiteClover].HarvestedWt) as Sward.HarvestedWt
          ([Ryegrass].GrossPotentialGrowthWt + [WhiteClover].GrossPotentialGrowthWt) as Sward.GrossPotentialGrowthWt
          ([Ryegrass].NetGrowthWt + [WhiteClover].NetGrowthWt) as Sward.NetGrowthWt
          ([Ryegrass].TotalN + [WhiteClover].TotalN) as Sward.TotalN
          ([Ryegrass].LAIGreen + [WhiteClover].LAIGreen) as Sward.LAIGreen
          ([Ryegrass].LAIDead + [WhiteClover].LAIDead) as Sward.LAIDead
          [Ryegrass].TotalWt as Ryegrass.TotalWt
          [WhiteClover].TotalWt as WhiteClover.TotalWt
          [Ryegrass].StandingHerbageWt as Ryegrass.StandingHerbageWt
          [WhiteClover].StandingHerbageWt as WhiteClover.StandingHerbageWt
          [Ryegrass].GrossPotentialGrowthWt as Ryegrass.GrossPotentialGrowthWt
          [WhiteClover].GrossPotentialGrowthWt as WhiteClover.GrossPotentialGrowthWt
          [Ryegrass].NetGrowthWt as Ryegrass.NetGrowthWt
          [WhiteClover].NetGrowthWt as WhiteClover.NetGrowthWt
          [Ryegrass].TotalN as Ryegrass.TotalN
          [WhiteClover].TotalN as WhiteClover.TotalN
          [Ryegrass].LeafNConc as Ryegrass.LeafNConc
          [WhiteClover].LeafNConc as WhiteClover.LeafNConc
          [Ryegrass].SoilDemandN as Ryegrass.SoilDemandN
          [WhiteClover].SoilDemandN as WhiteClover.SoilDemandN
          [Ryegrass].SoilAvailableN as Ryegrass.SoilAvailableN
          [WhiteClover].SoilAvailableN as WhiteClover.SoilAvailableN
          [Ryegrass].SoilUptakeN as Ryegrass.SoilUptakeN
          [WhiteClover].SoilUptakeN as WhiteClover.SoilUptakeN
          [Ryegrass].WaterDemand as Ryegrass.WaterDemand
          [WhiteClover].WaterDemand as WhiteClover.WaterDemand
          sum([Ryegrass].WaterAvailable) as Ryegrass.WaterAvailable
          sum([WhiteClover].WaterAvailable) as WhiteClover.WaterAvailable
          sum([Ryegrass].WaterUptake) as Ryegrass.WaterUptake
          sum([WhiteClover].WaterUptake) as WhiteClover.WaterUptake
          [Ryegrass].LAIGreen as Ryegrass.GreenLAI
          [WhiteClover].LAIGreen as WhiteClover.GreenLAI
          [Ryegrass].LAIDead as Ryegrass.DeadLAI
          [WhiteClover].LAIDead as WhiteClover.DeadLAI
          [Ryegrass].HarvestableWt as Ryegrass.HarvestableWt
          [WhiteClover].HarvestableWt as WhiteClover.HarvestableWt
          [Ryegrass].HarvestedWt as Ryegrass.HarvestedWt
          [WhiteClover].HarvestedWt as WhiteClover.HarvestedWt
          [Ryegrass].HerbageDigestibility as Ryegrass.HerbageDigestibility
          [WhiteClover].HerbageDigestibility as WhiteClover.HerbageDigestibility
          sum([Soil].SoilWater.SWmm) as TotalSoilWater
          [Irrigation].IrrigationApplied as IrrigationApplied
          sum([Soil].SoilNitrogen.NH4.kgha)+sum([Soil].SoilNitrogen.NO3.kgha) as TotalSoilN
          [Fertiliser].NitrogenApplied as NitrogenApplied
          [Ryegrass].GlfWaterSupply as Ryegrass.GlfWaterSupply
          [WhiteClover].GlfWaterSupply as WhiteClover.GlfWaterSupply
          [Ryegrass].GlfNSupply as Ryegrass.GlfNSupply
          [WhiteClover].GlfNSupply as WhiteClover.GlfNSupply
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