Simulations: Version=189
  DataStore
  Experiment Monghan2003
    Factors
      Factor Status
        CompositeFactor Drained
          Specifications:
            [Soil].Swim3.SwimSubsurfaceDrain.Enabled = true
            [Soil].Swim3.KDul = 0.1
        CompositeFactor UnDrained
          Specifications:
            [Soil].Swim3.SwimSubsurfaceDrain.Enabled = false
            [Physical]
          Physical
            Thickness  ParticleSizeSand  ParticleSizeSilt  ParticleSizeClay  Rocks  BD    AirDry  LL15   DUL    SAT    KS
            50         5                 73                21                0      0.9   0.068   0.205  0.447  0.55   3500
            50         5                 73                21                0      0.9   0.068   0.205  0.447  0.55   400
            100        5                 73                21                0      1.21  0.068   0.205  0.447  0.494  400
            250        5                 76                18                0      1.36  0.065   0.198  0.373  0.461  121
            100        5                 73                21                0      1.54  0.07    0.213  0.377  0.406  50
            150        5                 73                21                0      1.54  0.07    0.213  0.377  0.406  2
            100        6                 78                15                0      1.62  0.06    0.182  0.361  0.379  0.5
            300        6                 78                15                0      1.62  0.06    0.182  0.361  0.379  0.5
            400        6                 78                15                0      1.62  0.062   0.187  0.341  0.383  0.5
            SoilCrop AGPRyegrassSoil
              LL=[0.205, 0.205, 0.205, 0.198, 0.213, 0.213, 0.182, 0.182, 0.187]
              KL=[0.1, 0.1, 0.06, 0.03, 0.001, 0.001, 0, 0, 0]
              XF=[1, 1, 1, 1, 1, 1, 0, 0, 0]
            SoilCrop AGPWhiteCloverSoil
              LL=[0.205, 0.205, 0.205, 0.198, 0.213, 0.213, 0.182, 0.182, 0.187]
              KL=[0.1, 0.1, 0.03, 0.001, 0, 0, 0, 0, 0]
              XF=[1, 1, 1, 1, 0, 0, 0, 0, 0]
    Simulation Base
      Memo
        Edendale weather
        - Smith and Monaghan (2003) report 1000 as LT average and 915 average for 1998-2000
        - VCSN values are 1072 and 1071
        - Justify multiplier of 0.85 for experimental period and 0.93 overall
      Weather: FileName=%root%\Examples\Tutorials\RunoffEtc\Edendale.met; Latitude=-46.375; Tav=10.3; Amp=9.5
      Clock: Start=1997-01-01; End=2000-12-31
      Summary summaryfile
      SoilArbitrator
      MicroClimate: a_interception=0; b_interception=0; c_interception=0; d_interception=0; SoilHeatFluxFraction=0; MinimumHeightDiffForNewLayer=0; NightInterceptionFraction=0; ReferenceHeight=2
      Forages
        Parameters:
          Name                          LiveDigestibility  DeadDigestibility  LiveFractionConsumable  DeadFractionConsumable  LiveMinimumBiomass  DeadMinimumBiomass
          SurfaceOrganicMatter.Residue  0.7                0.3                0                       0                       100                 0
          AGPRyegrass.Leaf              0.7                0.3                1                       1                       100                 0
          AGPRyegrass.Stem              0.7                0.3                1                       1                       100                 0
          AGPRyegrass.Stolon            0.7                0.3                1                       1                       100                 0
          AGPWhiteClover.Leaf           0.7                0.3                1                       1                       100                 0
          AGPWhiteClover.Stem           0.7                0.3                1                       1                       100                 0
          AGPWhiteClover.Stolon         0.7                0.3                1                       1                       100                 0
      Zone paddock: Area=1; Slope=3; AspectAngle=0; Altitude=50
        Manager SetSurfaceBoundaryCondition (disabled)
          SurfaceBCType = PowerFunction
```csharp
using Models.Climate;
using APSIM.Shared.Utilities;
using Models.Soils.Nutrients;
using Models.Soils;
using Models.PMF;
using Models.Core;
using System.Xml.Serialization;
using System;
using Models.AgPasture;
using Models.Interfaces;

namespace Models
{
    [Serializable] 
    [System.Xml.Serialization.XmlInclude(typeof(Model))]
    public class Script : Model
    {
        [Link] ISummary summary;
        [Link] private Swim3 swim;
        
        public enum SurfaceBCOptions { CurveNumber, PowerFunction };

        [Description("What surface boundary condition?")] 
        public SurfaceBCOptions SurfaceBCType { get; set; }

        [EventSubscribe("StartOfSimulation")]
        private void DoDailyInitialisation(object sender, EventArgs e)
        {
            summary.WriteMessage(this, "Script is setting surface boundary condition to " + SurfaceBCType, MessageType.Diagnostic);
            if (SurfaceBCType == SurfaceBCOptions.CurveNumber)
                swim.SetSurfaceBCForCurveNumber();
            else if (SurfaceBCType == SurfaceBCOptions.PowerFunction)
                swim.SetSurfaceBCForPowerFunction(minimumSurfaceStorage: 10, 
                                                    maximumSurfaceStorage: 20, 
                                                     initialSurfaceStorage: 15, 
                                                     precipitationConstant: 50, 
                                                     runoffRateFactor: 0.2, 
                                                     runoffRatePower: 2);
        }
    }
}
```
        Manager CalculateRollingWaterBalance
          WBTolerance = 0.1
```csharp
// This script calculates a *WaterBalance* term (output) that adds together the water balance
// water entering the system (e.g. rain, irrigation) and subtracts the water
// leaving the system (e.g. runoff, drainage, evaporation, plant water uptake). If mass balance
// is maintained, the *WaterBalance* variable should always be zero.   




using Models.Climate;
using APSIM.Shared.Utilities;
using Models.Soils.Nutrients;
using Models.Soils;
using Models.PMF;
using Models.Core;
using System.Xml.Serialization;
using System;
using System.Linq;
using Models.AgPasture;
using Models.Interfaces;

namespace Models
{
    [Serializable] 
    [System.Xml.Serialization.XmlInclude(typeof(Model))]
    public class Script : Model
    {
        [Link] Clock clock;
        [Link] ISummary summary;
        [Link] IWeather weather;
        [Link] Irrigation irrigation;
        [Link] private ISoilWater waterBalance;
        [Link] private IPlant[] plants;

  
                                [Separator("This manager checks that water in the simulation balances - that all inputs are accounted for as storage or losses. If the water balance exceeds (high or low) the tolerance then the simulation is crashed.")]
                                
                                [Description("What water mass balance error is tolerable in the cumulative water balance? (mm /year) (suggest substantially < 1 mm /year)")] public double WBTolerance { get; set; }
                                
                                
        public double WaterBalanceCumulative  { get; set; }
        public double WaterBalanceToday  { get; set; }

        public double SoilWaterAtInitialisation  { get; set; }
        public double SoilWaterYesterday  { get; set; }
                                public double SoilWaterNow  { get; set; }

                                public double PlantWaterUptake { get; set; }

        public double WaterAddedToday  { get; set; }
        public double WaterRemovedToday  { get; set; }
        public double WaterAddedCumulative  { get; set; }
        public double WaterRemovedCumulative  { get; set; }
        
        public double WBCheck { get; set; }
        

        [EventSubscribe("DoDailyInitialisation")]
        private void DoDailyInitialisation(object sender, EventArgs e)
        {
               if (clock.Today == clock.StartDate) 
               // capture the water in and on the soil as a starting point
               // doing this here as need the models to have intialised first
               {
                               SoilWaterAtInitialisation = waterBalance.Pond;
                               for (int i = 0; i < waterBalance.SWmm.Length; i++)
                                               SoilWaterAtInitialisation += waterBalance.SWmm[i];

                               SoilWaterYesterday = SoilWaterAtInitialisation;                  
                               WaterAddedCumulative = 0.0;
                               WaterRemovedCumulative = 0.0;
                               SoilWaterNow = 0.0;
               }
               else
               {
                               SoilWaterYesterday = SoilWaterNow;                     // SoilWaterNow holds the value calculated at reporting yesterday
                               WaterAddedToday = 0.0;
                               WaterRemovedToday = 0.0;
               }
                                }

        [EventSubscribe("DoReportCalculations")]
        private void DoReportCalculations(object sender, EventArgs e)
        {
               // All the WaterBalance variables should be zero. A positive value is a generation of water.
               SoilWaterNow = waterBalance.Pond;
               for (int i = 0; i < waterBalance.SWmm.Length; i++)
                               SoilWaterNow += waterBalance.SWmm[i]; // so all the water stored in or on the soil

               WaterAddedToday = weather.Rain + irrigation.IrrigationApplied;   // Can there be runon? Probably not but this will throw an error if that ever happens
               WaterAddedCumulative+= WaterAddedToday;

               WaterRemovedToday = waterBalance.Drainage + waterBalance.Es + waterBalance.Runoff + waterBalance.SubsurfaceDrain;
               PlantWaterUptake = 0.0;
               foreach (var plant in plants)
                               PlantWaterUptake += plant.WaterUptake.Sum();

               WaterRemovedToday += PlantWaterUptake;
               // Need to add subsurface drainage here

               WaterRemovedCumulative += WaterRemovedToday;

               WaterBalanceToday = WaterAddedToday - WaterRemovedToday - (SoilWaterNow - SoilWaterYesterday);
               WaterBalanceCumulative = WaterAddedCumulative - WaterRemovedCumulative - (SoilWaterNow - SoilWaterAtInitialisation);

               // need to add a warning value and a crash value and make a crash
               double simTimeYears = (clock.Today - clock.StartDate).Days/365.25;
               if (simTimeYears > 0.1)
               {
                               WBCheck = WaterBalanceCumulative * simTimeYears;
                               if (WBCheck > WBTolerance * simTimeYears)
                                               throw new Exception("The error in the water balance, " + WaterBalanceCumulative + ", exceeded the specified tolerance of " + WBTolerance * simTimeYears + ". There is likely a problem with SWIM or SoilWater.");
               }
                                }
    }
}
```
        Manager Fertilise on fixed dates
          FertiliserType = NO3N
          FertiliserDates = 15-jan, 15-feb, 15-mar, 15-apr, 15-may, 15-jun, 15-jul, 15-aug, 15-sep, 15-oct, 15-nov, 15-dec
          FertiliseDepth = 0
          Amount = 10
          AmountType = True
```csharp
using Models.Soils;
using System;
using System.Linq;
using Models.Core;
using Models.PMF;
using APSIM.Shared.Utilities;
namespace Models
{
    [Serializable]
    public class Script : Model
    {
        [Link] Clock Clock;
        [Link] Fertiliser Fertiliser;
        
        [Separator("A component to apply fertiliser on one or more dates on every year of the simulation")]

        [Description("Type of fertiliser to apply? ")] 
        [Display(Type = DisplayType.FertiliserType)]public string FertiliserType { get; set; }

        [Description("Enter the fertilisation dates as dd-mmm with comma separation (any year information entered will be ignored): ")] 
        public string[] FertiliserDates { get; set; } 
        
        [Description("Fertilise depth (mm)")]
        public double FertiliseDepth { get; set; }

        [Description("Amount of fertiliser to be applied (kg /ha)")] 
        public double Amount { get; set; }

        [Description("Is the above amount to be applied each time? (yes/ticked)? Or is it the total annual amount across all dates (no/unticked)")] 
        public bool AmountType { get; set; }

        
        [EventSubscribe("DoManagement")]
        private void OnDoManagement(object sender, EventArgs e)
        {
            foreach (string ddMMM in FertiliserDates)
            {
                if (DateUtilities.DatesEqual(ddMMM, Clock.Today))
                {
                    if (AmountType)
                        Fertiliser.Apply(amount: Amount, type: FertiliserType);
                    else
                        Fertiliser.Apply(amount: Amount / FertiliserDates.Length, type: FertiliserType, depth: FertiliseDepth);
                }
            }
        }
    }
}
```
        Manager AutomaticIrrigation
          allowIrrigation = False
          seasonStart = 1-sep
          seasonEnd = 30-mar
          seasonsAllocation = 10000
          triggerDeficit = 80
          targetDeficit = 500
          returndays = 3
          maximumAmount = 500
          depthPAWC = 300
```csharp
using Newtonsoft.Json;
using APSIM.Shared.Utilities;
using System.Xml.Serialization;
using Models.Soils;
using Models.PMF;
using Models.Core;
using System;
using System.Linq;
using Models.Interfaces;



        
namespace Models
{
    [Serializable] 
    [System.Xml.Serialization.XmlInclude(typeof(Model))]
    public class Script : Model
    {
        [Link] private ISummary summary;
        [Link] private Irrigation Irrigation;
        [Link] private Clock Clock;
        [Link] private Soil Soil;
        [Link(IsOptional = true)] private IPlant existingCrop;
        private DateTime StartDate;
        private DateTime EndDate;
        private double TopDUL;
        private double TopLL;
        private int nLayers;
        [Link]
        private IPhysical soilPhysical;
        [Link]
        private ISoilWater waterBalance;
        //Communication to other modules
       
        //User inputs from properties tab
        [Description("Turn irrigation on?")]
        public bool allowIrrigation { get; set; }
        [Description("Start of irrigation season (dd-MMM)")]
        public string seasonStart { get; set; }
        [Description("End of irrigation season (dd-MMM)")]
        public string seasonEnd { get; set; }
        [Description("Season allocation (mm)")]
        public double seasonsAllocation { get; set; }
        [Description("Deficit to trigger irrigation (% PAWC)")]
        public double triggerDeficit { get; set; }
        [Description("Deficit to stop irrigaton (% PAWC)")]
        public double targetDeficit { get; set; }
        [Description("Minimum days for irrigation to return")]
        public double returndays { get; set; }
        [Description("Maximum irrigation application (mm/day)")]
        public double maximumAmount { get; set; }
        [Description("Depth to calculate PAWC (mm)")]
        public double depthPAWC { get; set; }

        //Class members
        [JsonIgnore] public double TopSWdeficit { get; set; }
        [JsonIgnore] public double TopSWC { get; set; }
        [JsonIgnore] public double DaysSinceIrrigation { get; set; }
        [JsonIgnore] public double AmountToApply { get; set; }
        [JsonIgnore] public double SeasonAppliedAmount { get; set; }
        
        private bool IrrigationIsAllowed { get; set; }
        private bool SeasonIsOpen { get; set; }
        private bool CropIsActive { get; set; }
        private bool IrrigatorIsAvailable { get; set; }
        private bool SoilIsDry { get; set; }

    
        //Calculate static soil variables
        [EventSubscribe("StartOfSimulation")]
        private void OnStartOfSimulation(object sender, EventArgs e)
        {   
            //Set the season dates
            StartDate = DateTime.Parse(seasonStart + "-" + Clock.Today.Year.ToString());
            EndDate = DateTime.Parse(seasonEnd + "-" + Clock.Today.Year.ToString());
            
            //Can we irrigate at all?
            IrrigationIsAllowed = false; 
            if (allowIrrigation)
                IrrigationIsAllowed = true; 

            //Calculate soil water variables
            double depthFromSurface = 0.0;
            double fracLayer = 0.0;
            nLayers = soilPhysical.Thickness.Length;
            for (int layer = 0; layer < nLayers; layer++)
            {
                fracLayer = Math.Min(1.0, (depthPAWC - depthFromSurface) / soilPhysical.Thickness[layer]);
                TopLL += soilPhysical.LL15mm[layer] * fracLayer;
                TopDUL += soilPhysical.DULmm[layer] * fracLayer;
                depthFromSurface += soilPhysical.Thickness[layer];
                if (depthFromSurface >= depthPAWC)
                    layer = nLayers;
            }
        }
             
        //Determine daily requirement for irrigation
        [EventSubscribe("StartOfDay")]
        private void OnStartOfDay(object sender, EventArgs e)
        {
            //Can we irrigate today?          
            SeasonIsOpen = isBetween(Clock.Today, StartDate, EndDate);
            if (!SeasonIsOpen)
                SeasonAppliedAmount = 0;

            //Is there a crop in the ground that needs irrigation?
            CropIsActive = false;
            if ((existingCrop != null) && (existingCrop.IsAlive))
                CropIsActive = true;
            //if ((existingCrop.Phenology.Stage >= 3.0) && (existingCrop.Phenology.Stage < 6.0))
          
            //Is the irrigator available?
            IrrigatorIsAvailable = false;
            DaysSinceIrrigation += 1;
            if (DaysSinceIrrigation >= returndays)
                IrrigatorIsAvailable = true;
          
            //Is the soil dry enough to require irrigation?
            SoilIsDry = false;
            double depthFromSurface = 0.0;
            double fracLayer = 0.0;
            TopSWC = 0.0;
            for (int layer = 0; layer < nLayers; layer++)
            //for (int layer = 0; depthFromSurface < depthPAWC + soilPhysical.Thickness[layer]; layer++)
            {
                fracLayer = Math.Min(1.0, (depthPAWC - depthFromSurface) / soilPhysical.Thickness[layer]);
                TopSWC += waterBalance.SWmm[layer] * fracLayer;
                depthFromSurface += soilPhysical.Thickness[layer];
                if (depthFromSurface >= depthPAWC)
                    layer = nLayers;
            }
            
            TopSWdeficit = TopSWC - TopDUL;
            if (Math.Max(0.0, -TopSWdeficit) >= (TopDUL - TopLL) * (100 - triggerDeficit) / 100)
                SoilIsDry = true;
                
            //Are all the conditions ratifying irrigation
            if (IrrigationIsAllowed && SeasonIsOpen && CropIsActive && IrrigatorIsAvailable && SoilIsDry)
            {
                //Lets bloody well irrigate then!!!!
                AmountToApply = TopDUL * targetDeficit / 100 - TopSWC;
                AmountToApply = Math.Max(0.0, Math.Min(AmountToApply, seasonsAllocation - SeasonAppliedAmount));
                AmountToApply = Math.Min(AmountToApply,maximumAmount);
                Irrigation.Apply(AmountToApply, willRunoff: true);
                DaysSinceIrrigation = 0;
                SeasonAppliedAmount += AmountToApply;
            }
        }
        
        ///Checks whether theDate is between iniDate and endDate (non-year specific)
        private bool isBetween(DateTime theDay, DateTime iniDate, DateTime endDate)
        {
            bool result = false;
            if (iniDate.DayOfYear < endDate.DayOfYear)
            {
                // period is within one year, ex: summer in the northern hemisphere
                if ((theDay.DayOfYear >= iniDate.DayOfYear) && (theDay.DayOfYear <= endDate.DayOfYear))
                    result = true;
            }
            else
            {
                // period goes over the end of the year, ex: summer in the southern hemisphere
                if ((theDay.DayOfYear >= iniDate.DayOfYear) || (theDay.DayOfYear <= endDate.DayOfYear))
                    result = true;
            }
            
            return result;
        }
    }
}
```
        Manager NO3InRunoff
          SoluteName = no3
          DepthOfConstantSoluteAccessbility = 30
          RunoffEffectivenessAtMovingSolute = 0.8
          MaxEffectiveRunoff = 1
```csharp
using Models.Climate;
using APSIM.Shared.Utilities;
using Models.Soils.Nutrients;
using Models.Soils;
using Models.Core;
using System;
using System.Linq;
using System.Collections.Generic;
using Models.AgPasture;
using Models.Interfaces;

namespace Models
{
    [Serializable] 
    [System.Xml.Serialization.XmlInclude(typeof(Model))]
    public class Script : Model
    {
        [Link] Clock clock;
        [Link] ISummary summary;
        [Link] private Solute[] solutes;

        [Separator("Parameters for configuring solute loss in runoff water.")]

        [Description("Name of solute:")]
        public string SoluteName { get; set; }

        [Description("Depth above which there is no change in solute accessibility (mm)")]
        public double DepthOfConstantSoluteAccessbility { get; set; }

        //[Description("Maximum depth at which solute can be lost in runoff (mm)")]
        public double MaxDepthSoluteAccessibility { get; set; }
        
        [Description("Effectiveness of solute loss (0-0.99)")]
        public double RunoffEffectivenessAtMovingSolute { get; set; }
        
        [Description("Amount of runoff beyond which there is no additional loss of solute (mm)")]
        public double MaxEffectiveRunoff { get; set; }
                
        [EventSubscribe("StartOfSimulation")]
        private void OnStartOfSimulation(object sender, EventArgs e)
        {
            MaxDepthSoluteAccessibility = DepthOfConstantSoluteAccessbility + 1.0;
            Solute solute = Array.Find(solutes, s => s.Name.Equals(SoluteName, StringComparison.InvariantCultureIgnoreCase));
            if (solute == null)
                throw new Exception($"Cannot find solute {SoluteName}");
            solute.DepthOfConstantSoluteAccessbility = DepthOfConstantSoluteAccessbility;
            solute.MaxDepthSoluteAccessibility = MaxDepthSoluteAccessibility;
            solute.RunoffEffectivenessAtMovingSolute = RunoffEffectivenessAtMovingSolute;
            solute.MaxEffectiveRunoff = MaxEffectiveRunoff;               
        }
    }
}
```
        Irrigation
        Fertiliser
        SurfaceOrganicMatter: InitialResidueName=grass; InitialResidueType=grass; InitialResidueMass=20; InitialStandingFraction=0; InitialCPR=0; InitialCNR=17
        Report: EventNames=Clock.Today >= new DateTime(1998, 1, 1)
          VariableNames:
            [Clock].Today as Date
            [Weather].Rain as RainfallDaily
            Sum of [Weather].Rain from 1-Jan-1998 to [Clock].Today as Rainfall
            Sum of [Soil].Swim3.Drainage from 1-Jan-1998 to [Clock].Today as Drainage
            Sum of [Soil].Swim3.Runoff from 1-Jan-1998 to [Clock].Today as Runoff
            Sum of [Soil].Swim3.SubsurfaceDrain from 1-Jan-1998 to [Clock].Today as SubsurfaceDrain
            Sum of [Soil].Swim3.Pond from 1-Jan-1998 to [Clock].Today as CumPondDepth
            [CalculateRollingWaterBalance].Script.WaterBalanceCumulative as WBCum
            //[Soil].Swim3.Pond as PondDepth
            //sum([Soil].Water.MM) as WaterStored
            //Soil].Water.Volumetric as SW
            //[NO3].AmountLostInRunoff
            //[NO3].kgha[1] as NO3Lay1
            //[Irrigation].IrrigationApplied
            //sum([NO3].AmountLostInRunoff) as TotalNO3Runoff
        PastureSpecies AGPRyegrass: doyGermination=275; daysEmergenceToAnthesis=120; daysAnthesisToMaturity=85; degreesDayForAnthesis=1100; degreesDayForMaturity=900; daysAnnualsFactor=45; CanopyType=PastureSpecies; InitialShootDM=1500; InitialRootDM=500; InitialRootDepth=450; initialDMFractionsGrasses=[0.15, 0.25, 0.25, 0.05, 0.05, 0.1, 0.1, 0.05, 0, 0, 0]; initialDMFractionsForbs=[0.2, 0.2, 0.15, 0.05, 0.1, 0.15, 0.1, 0.05, 0, 0, 0]; PhotosyntheticEfficiency=0.01; PhotosynthesisCurveFactor=0.8; FractionPAR=0.5; ReferenceCO2=380; CO2EffectScaleFactor=700; CO2EffectOffsetFactor=600; CO2EffectMinimum=0.7; CO2EffectExponent=2; ReproSeasonDurationCoeff=2; ReproSeasonShouldersLengthFactor=1; ReproSeasonOnsetDurationFactor=0.6; RelativeTurnoverEmerging=2; DetachmentDroughtCoefficient=3; DetachmentDroughtEffectMin=0.1; TurnoverStockFactor=0.01; TurnoverDefoliationEffectMin=0.025; MinimumGreenLeafProp=0.8; MinimumGreenRootProp=0.5
          initialDMFractionsLegumes=[0.16, 0.23, 0.22, 0.05, 0.03, 0.05, 0.05, 0.01, 0.04, 0.08, 0.08]
          LinearInterpolationFunction FVPDFunction
        PastureSpecies AGPWhiteClover: doyGermination=275; daysEmergenceToAnthesis=120; daysAnthesisToMaturity=85; degreesDayForAnthesis=1100; degreesDayForMaturity=900; daysAnnualsFactor=45; CanopyType=PastureSpecies; InitialShootDM=500; InitialRootDM=300; InitialRootDepth=300; initialDMFractionsGrasses=[0.15, 0.25, 0.25, 0.05, 0.05, 0.1, 0.1, 0.05, 0, 0, 0]; initialDMFractionsForbs=[0.2, 0.2, 0.15, 0.05, 0.1, 0.15, 0.1, 0.05, 0, 0, 0]; PhotosyntheticEfficiency=0.01; PhotosynthesisCurveFactor=0.8; FractionPAR=0.5; ReferenceCO2=380; CO2EffectScaleFactor=700; CO2EffectOffsetFactor=600; CO2EffectMinimum=0.7; CO2EffectExponent=2; ReproSeasonDurationCoeff=2; ReproSeasonShouldersLengthFactor=1; ReproSeasonOnsetDurationFactor=0.6; RelativeTurnoverEmerging=2; DetachmentDroughtCoefficient=3; DetachmentDroughtEffectMin=0.1; TurnoverStockFactor=0.01; TurnoverDefoliationEffectMin=0.025; MinimumGreenLeafProp=0.8; MinimumGreenRootProp=0.5
          initialDMFractionsLegumes=[0.16, 0.23, 0.22, 0.05, 0.03, 0.05, 0.05, 0.01, 0.04, 0.08, 0.08]
          LinearInterpolationFunction FVPDFunction
        SimpleGrazing: GrazingRotationType=0; SimpleGrazingFrequencyString=end of month; SimpleMinGrazable=0; SimpleGrazingResidual=1200; FlexibleGrazePostDM=0; FractionDefoliatedBiomassToSoil=[1]; FractionDefoliatedNToSoil=[1]; FractionExcretedNToDung=[0.4]; CNRatioDung=0; DepthUrineIsAdded=150; SendDungElsewhere=0; SendUrineElsewhere=0; FractionPopulationDecline=0; TramplingOn=false; MaximumPropLitterMovedToSoil=0.1; PastureConsumedAtMaximumRateOfLitterRemoval=1200
        Soil: SoilType=Silt loam; LocalName=Crookston; NearestTown=Waikaka; Region=Southland; Country=New Zealand; NaturalVegetation=long term grass; ApsoilNumber=1333; Latitude=-45.936; Longitude=168.92; LocationAccuracy=+/-50 m; YearOfSampling=1986
          Site=Byars Rd (from discussion with Ross Monaghan, this is the best soil to start with, Silt loam (Waikaka No1333)
          DataSource=The database of New Zealand soils was compiled by AgResearch (www.agresearch.co.nz) and based on soil properties gathered, mainly from publications, in the course of conducting several simulation-based research projects but particularly from the Pastoral 21 Environment program which was funded by the New Zealand Ministry for Business, Innovation and Employment,  Dairy NZ, Fonterra and Meat & Wool NZ.
          Comments=The data is a combination of published or supplied measurements, pedotransfer functions, and expert opinion. See Cichota et al. (2013; Soil Research 51: 92-111, http://dx.doi.org/10.1071/SR12338) for a description of the pedotransfer functions. The soil carbon and fresh organic matter settings have been set as those broadly appropriate for permanent productive pastoral systems, see Cichota el al. (2012; Soil Research 50: 694-707, http://dx.doi.org/10.1071/SR12208). Users should take care to adapt these to local conditions before using the data in simulations. FOM values estimated to be 900 kg/ha of FOM in top 600mm of soil and another 100 kg/ha below.
          Memo Mods to properties
            Original Ksat was
            1,216.704
            1,216.704
            1,216.704
            346.992
            124.401
            60.562
            60.562
            49.749

            Multiplied (for undrained) by 0.35 to bring into line with measured

            Original soil from DB
            Depths	BD	AD	LL	DUL	SAT	KS
            0-50	1.21	0.068	0.205	0.447	0.494	426
            50-100	1.21	0.068	0.205	0.447	0.494	426
            100-200	1.21	0.068	0.205	0.447	0.494	426
            200-450	1.36	0.065	0.198	0.373	0.461	121
            450-700	1.54	0.07	0.213	0.377	0.406	44
            700-800	1.62	0.06	0.182	0.361	0.379	21
            800-1100	1.62	0.06	0.182	0.361	0.379	21
            1100-1500	1.62	0.062	0.187	0.341	0.383	17

            Modified following Smith and Monaghan 2003 to
            Depths	BD	AD	LL	DUL	SAT	KS
            0-50	0.9	0.068	0.205	0.447	0.55	426
            50-100	0.9	0.068	0.205	0.447	0.55	426
            100-200	1.21	0.068	0.205	0.447	0.494	426
            200-450	1.36	0.065	0.198	0.373	0.461	121
            450-700	1.54	0.07	0.213	0.377	0.406	44
            700-800	1.62	0.06	0.182	0.361	0.379	21
            800-1100	1.62	0.06	0.182	0.361	0.379	21
            1100-1500	1.62	0.062	0.187	0.341	0.383	17

            Perhaps the Ks at depth is too high?
          Physical
            Thickness  ParticleSizeSand  ParticleSizeSilt  ParticleSizeClay  Rocks  BD    AirDry  LL15   DUL    SAT    KS
            50         5                 73                21                0      0.9   0.068   0.205  0.447  0.55   9000
            50         5                 73                21                0      0.9   0.068   0.205  0.447  0.55   9000
            100        5                 73                21                0      1.21  0.068   0.205  0.447  0.494  1000
            250        5                 76                18                0      1.36  0.065   0.198  0.373  0.461  121
            100        5                 73                21                0      1.54  0.07    0.213  0.377  0.406  50
            150        5                 73                21                0      1.54  0.07    0.213  0.377  0.406  2
            100        6                 78                15                0      1.62  0.06    0.182  0.361  0.379  0.2
            300        6                 78                15                0      1.62  0.06    0.182  0.361  0.379  0.2
            400        6                 78                15                0      1.62  0.062   0.187  0.341  0.383  0.2
            SoilCrop AGPRyegrassSoil: same as Monghan2003.Factors.Status.UnDrained.Physical.AGPRyegrassSoil
            SoilCrop AGPWhiteCloverSoil: same as Monghan2003.Factors.Status.UnDrained.Physical.AGPWhiteCloverSoil
          Organic: FOMCNRatio=40; CarbonUnits=Total
            Thickness  Carbon  SoilCNRatio  FBiom  FInert  FOM
            100        3.6     11.25        0.075  0.555   135.5
            250        1.4     11.25        0.01   0.76    82.2
            250        0.77    11.25        0.008  0.937   0
            400        0.18    11.25        0.008  0.965   0
            400        0.18    11.25        0.008  0.99    0
          Chemical: PHUnits=Water
            Thickness  PH   CEC
            200        6.5  17.9
            250        6.5  12.2
            250        6.5  11.1
            400        6.5  10.7
            400        6.5  10.7
            PH source: Estimated based on local knowledge
          Nutrient
          Water: Thickness=[50, 50, 100, 250, 250, 100, 300, 400]; InitialValues=[0.447, 0.447, 0.447, 0.373, 0.377, 0.361, 0.361, 0.341]; InitialPAWmm=266.35; RelativeTo=LL15; FilledFromTop=false
          CERESSoilTemperature Temperature
          Swim3: Salb=0.13; CN2Bare=70; CNRed=20; CNCov=0.8; KDul=1; PSIDul=-100; VC=true; DTMin=0; DTMax=30; MaxWaterIncrement=5; SpaceWeightingFactor=0; SoluteSpaceWeightingFactor=1; Dis=0; Disp=1; A=2; DTHC=0.1; DTHP=2; vcon1=7.28e-09; vcon2=7.26e-07; eo_time=06:00; eo_durn=720; Diagnostics=true
            SwimSubsurfaceDrain: DrainDepth=425; DrainSpacing=2000; DrainRadius=50; Klat=1000; ImpermDepth=750
          LayerStructure: Thickness=[10, 20, 30, 40, 50, 50, 50, 50, 200, 250, 250, 250, 250]
          Solute NO3: InitialValuesUnits=ppm; WaterTableConcentration=0; D0=0; DepthOfConstantSoluteAccessbility=0; MaxDepthSoluteAccessibility=0; RunoffEffectivenessAtMovingSolute=0; MaxEffectiveRunoff=0
            Thickness  InitialValues  Exco  FIP
            50         6              0     1
            50         2              0     1
            100        1              0     1
            250        1              0     1
            250        1              0     1
            100        1              0     1
            300        1              0     1
            400        1              0     1
          Solute NH4: InitialValuesUnits=ppm; WaterTableConcentration=0; D0=0; DepthOfConstantSoluteAccessbility=0; MaxDepthSoluteAccessibility=0; RunoffEffectivenessAtMovingSolute=0; MaxEffectiveRunoff=0
            Thickness  InitialValues  Exco  FIP
            50         1              1     1
            50         1              1     1
            100        1              1     1
            250        1              1     1
            250        1              1     1
            100        1              1     1
            300        1              1     1
            400        1              1     1
          Solute Urea: InitialValuesUnits=kg/ha; WaterTableConcentration=0; D0=0; DepthOfConstantSoluteAccessbility=0; MaxDepthSoluteAccessibility=0; RunoffEffectivenessAtMovingSolute=0; MaxEffectiveRunoff=0
            Thickness  InitialValues  Exco  FIP
            50         0              0     1
            50         0              0     1
            100        0              0     1
            250        0              0     1
            250        0              0     1
            100        0              0     1
            300        0              0     1
            400        0              0     1
  Folder Storage
    Soil: ASCOrder=Pallic; SoilType=Silt loam; LocalName=Templeton (Silt loam (Templeton, SH 73 No1406)); Site=SH 73, East of junction with Kirk Rd; NearestTown=Templeton, SH 73; Region=Canterbury; Country=New Zealand; NaturalVegetation=long term grass; ApsoilNumber=1406; Latitude=-43.53; Longitude=172.46; LocationAccuracy=+/-50 m; YearOfSampling=1981
      DataSource=The database of New Zealand soils was compiled by AgResearch (www.agresearch.co.nz) and based on soil properties gathered, mainly from publications, in the course of conducting several simulation-based research projects but particularly from the Pastoral 21 Environment program which was funded by the New Zealand Ministry for Business, Innovation and Employment,  Dairy NZ, Fonterra and Meat & Wool NZ.
      Comments=The data is a combination of published or supplied measurements, pedotransfer functions, and expert opinion. See Cichota et al. (2013; Soil Research 51: 92-111, http://dx.doi.org/10.1071/SR12338) for a description of the pedotransfer functions. The soil carbon and fresh organic matter settings have been set as those broadly appropriate for permanent productive pastoral systems, see Cichota el al. (2012; Soil Research 50: 694-707, http://dx.doi.org/10.1071/SR12208). Users should take care to adapt these to local conditions before using the data in simulations. FOM values estimated to be 900 kg/ha of FOM in top 600mm of soil and another 100 kg/ha below.
      Physical
        Thickness  ParticleSizeSand  ParticleSizeSilt  ParticleSizeClay  Rocks  BD     AirDry  LL15   DUL    SAT    KS
        160        4.848             69.812            25.34             0      1.22   0.058   0.176  0.414  0.484  797.61
        170        4.841             67.079            28.08             0      1.37   0.062   0.186  0.358  0.451  190.776
        180        3.848             68.272            27.88             0      1.645  0.068   0.205  0.333  0.356  45.956
        200        12.813            66.187            21                0      1.54   0.042   0.127  0.338  0.39   127.354
        390        8.818             67.212            23.97             0      1.67   0.053   0.161  0.335  0.347  50.698
        200        26.316            60.574            13.11             0      1.67   0.052   0.158  0.312  0.346  239.089
        1700       10.769            63.231            26                0      1.67   0.051   0.154  0.323  0.357  45.838
        BD source: Field measured and checked for sensibility
        AirDry source: Estimated based on local knowledge
        LL15, DUL source: Laboratory measured
        SAT source: Calculated from measured, estimated or calculated BD
        SoilCrop AGPRyegrassSoil: LL=[0.176, 0.186, 0.205, 0.127, 0.161, 0.158, 0.154]; KL=[0.06, 0.06, 0.06, 0.049, 0.04, 0.03, 0.02]; XF=[1, 1, 1, 1, 1, 1, 1]
          LL source: Estimated based on local knowledge
        SoilCrop AGPWhiteCloverSoil: same as Storage.Soil.Physical.AGPRyegrassSoil
      Organic: FOMCNRatio=40; CarbonUnits=Total
        Thickness  Carbon  SoilCNRatio  FBiom  FInert  FOM
        160        3       35.294       0.078  0.454   83.7795
        170        1.1     35.294       0.025  0.563   59.6317
        180        0.4     35.294       0.008  0.83    41.6036
        200        0.3     35.294       0.008  0.937   27.8878
        390        0.2     35.294       0.008  0.967   12.7839
        200        0.2     35.294       0.008  0.99    8.56931
        200        0.2     35.294       0.008  0.992   5.74418
      Chemical: PHUnits=Water
        Thickness  PH   CEC
        160        6.5  14.8
        170        6.5  10.8
        180        6.5  11.3
        200        6.5  9.1
        390        6.5  10.8
        200        6.5  8.3
        200        6.5  10.8
        PH source: Estimated based on local knowledge
      Nutrient
      CERESSoilTemperature Temperature
      Swim3: Salb=0.13; CN2Bare=65; CNRed=20; CNCov=0.8; KDul=1; PSIDul=-100; VC=true; DTMin=0; DTMax=1400; MaxWaterIncrement=10; SpaceWeightingFactor=0; SoluteSpaceWeightingFactor=1; Dis=0; Disp=1; A=2; DTHC=0.1; DTHP=2; vcon1=7.28e-09; vcon2=7.26e-07; eo_time=06:00; eo_durn=720; Diagnostics=false
      Water: Thickness=[160, 170, 180, 200, 390, 200, 1700]; InitialValues=[0.414, 0.358, 0.333, 0.338, 0.335, 0.312, 0.323]; InitialPAWmm=518.52; RelativeTo=LL15; FilledFromTop=false
      Solute NO3: InitialValuesUnits=ppm; WaterTableConcentration=0; D0=0; DepthOfConstantSoluteAccessbility=0; MaxDepthSoluteAccessibility=0; RunoffEffectivenessAtMovingSolute=0; MaxEffectiveRunoff=0
        Thickness  InitialValues  Exco  FIP
        160        6              0     1
        170        2              0     1
        180        1              0     1
        200        1              0     1
        390        1              0     1
        200        1              0     1
        1700       1              0     1
      Solute NH4: InitialValuesUnits=ppm; WaterTableConcentration=0; D0=0; DepthOfConstantSoluteAccessbility=0; MaxDepthSoluteAccessibility=0; RunoffEffectivenessAtMovingSolute=0; MaxEffectiveRunoff=0
        Thickness  InitialValues  Exco  FIP
        160        1              1     1
        170        1              1     1
        180        1              1     1
        200        1              1     1
        390        1              1     1
        200        1              1     1
        1700       1              1     1
      Solute Urea: InitialValuesUnits=kg/ha; WaterTableConcentration=0; D0=0; DepthOfConstantSoluteAccessbility=0; MaxDepthSoluteAccessibility=0; RunoffEffectivenessAtMovingSolute=0; MaxEffectiveRunoff=0
        Thickness  InitialValues  Exco  FIP
        160        0              0     1
        170        0              0     1
        180        0              0     1
        200        0              0     1
        390        0              0     1
        200        0              0     1
        1700       0              0     1
      LayerStructure
        Thickness=[10, 20, 30, 40, 50, 50, 50, 50, 200, 250, 250, 500, 500, 500, 300, 100, 100]
    Soil Silt loam (Waikaka No1333): SoilType=Silt loam; LocalName=Crookston; NearestTown=Waikaka; Region=Southland; Country=New Zealand; NaturalVegetation=long term grass; ApsoilNumber=1333; Latitude=-45.936; Longitude=168.92; LocationAccuracy=+/-50 m; YearOfSampling=1986
      Site=Byars Rd (from discussion with Ross Monaghan, this is the best soil to start with)
      DataSource=The database of New Zealand soils was compiled by AgResearch (www.agresearch.co.nz) and based on soil properties gathered, mainly from publications, in the course of conducting several simulation-based research projects but particularly from the Pastoral 21 Environment program which was funded by the New Zealand Ministry for Business, Innovation and Employment,  Dairy NZ, Fonterra and Meat & Wool NZ.
      Comments=The data is a combination of published or supplied measurements, pedotransfer functions, and expert opinion. See Cichota et al. (2013; Soil Research 51: 92-111, http://dx.doi.org/10.1071/SR12338) for a description of the pedotransfer functions. The soil carbon and fresh organic matter settings have been set as those broadly appropriate for permanent productive pastoral systems, see Cichota el al. (2012; Soil Research 50: 694-707, http://dx.doi.org/10.1071/SR12208). Users should take care to adapt these to local conditions before using the data in simulations. FOM values estimated to be 900 kg/ha of FOM in top 600mm of soil and another 100 kg/ha below.
      Physical
        Thickness  ParticleSizeSand  ParticleSizeSilt  ParticleSizeClay  Rocks  BD    AirDry  LL15   DUL    SAT    KS
        200        5                 73                21                0      1.21  0.068   0.205  0.447  0.494  1216.704
        250        5                 76                18                0      1.36  0.065   0.198  0.373  0.461  346.992
        250        5                 73                21                0      1.54  0.07    0.213  0.377  0.406  124.401
        400        6                 78                15                0      1.62  0.06    0.182  0.361  0.379  60.562
        400        6                 78                15                0      1.62  0.062   0.187  0.341  0.383  49.749
        BD source: Field measured and checked for sensibility
        AirDry source: Estimated based on local knowledge
        LL15, DUL source: Laboratory measured
        SAT source: Calculated from measured, estimated or calculated BD
        SoilCrop wheatSoil: LL=[0.205, 0.198, 0.213, 0.182, 0.187]; KL=[0.06, 0.06, 0.052, 0.04, 0.025]; XF=[1, 1, 1, 1, 1]
          LL source: Estimated based on local knowledge
        SoilCrop perennialgrassSoil: same as Storage.Silt loam (Waikaka No1333).Physical.wheatSoil
        SoilCrop SCRUMSoil: same as Storage.Silt loam (Waikaka No1333).Physical.wheatSoil
      WaterBalance SoilWater: SummerDate=1-nov; SummerU=6; SummerCona=3.5; WinterDate=1-apr; WinterU=2; WinterCona=2; DiffusConst=88; DiffusSlope=35; Salb=0.13; CN2Bare=73; CNRed=20; CNCov=0.8; PSIDul=-100; Thickness=[200, 250, 250, 400, 400]; SWCON=[0.593, 0.489, 0.536, 0.5, 0.403]
      Organic: FOMCNRatio=40; CarbonUnits=Total
        Thickness  Carbon  SoilCNRatio  FBiom  FInert  FOM
        200        3.6     11.25        0.075  0.555   135.502
        250        1.4     11.25        0.01   0.76    82.1864
        250        0.77    11.25        0.008  0.937   49.8486
        400        0.18    11.25        0.008  0.965   22.3984
        400        0.18    11.25        0.008  0.99    10.0642
      Chemical: same as Monghan2003.Base.paddock.Soil.Chemical
      Nutrient
      Solute NO3: InitialValuesUnits=ppm; WaterTableConcentration=0; D0=0; DepthOfConstantSoluteAccessbility=0; MaxDepthSoluteAccessibility=0; RunoffEffectivenessAtMovingSolute=0; MaxEffectiveRunoff=0
      Solute NH4: InitialValuesUnits=ppm; WaterTableConcentration=0; D0=0; DepthOfConstantSoluteAccessbility=0; MaxDepthSoluteAccessibility=0; RunoffEffectivenessAtMovingSolute=0; MaxEffectiveRunoff=0
      Solute Urea: Thickness=[200, 250, 250, 400, 400]; InitialValues=[0, 0, 0, 0, 0]; InitialValuesUnits=kg/ha; WaterTableConcentration=0; D0=0; DepthOfConstantSoluteAccessbility=0; MaxDepthSoluteAccessibility=0; RunoffEffectivenessAtMovingSolute=0; MaxEffectiveRunoff=0
      Water: Thickness=[200, 250, 250, 400, 400]; InitialValues=[0.447, 0.373, 0.377, 0.361, 0.341]; InitialPAWmm=266.35; RelativeTo=LL15; FilledFromTop=false
      CERESSoilTemperature Temperature
    Soil Silt loam (Waikaka No1327): SoilType=Silt loam; LocalName=Waikoikoi; Site=Cleghorn Rd, on west side; NearestTown=Waikaka; Region=Southland; Country=New Zealand; NaturalVegetation=long term grass; ApsoilNumber=1327; Latitude=-45.927; Longitude=169.116; LocationAccuracy=+/-50 m; YearOfSampling=1976
      DataSource=The database of New Zealand soils was compiled by AgResearch (www.agresearch.co.nz) and based on soil properties gathered, mainly from publications, in the course of conducting several simulation-based research projects but particularly from the Pastoral 21 Environment program which was funded by the New Zealand Ministry for Business, Innovation and Employment,  Dairy NZ, Fonterra and Meat & Wool NZ.
      Comments=Lowered BD values from original in layers 4 and 5 to make run in APSIM. The data is a combination of published or supplied measurements, pedotransfer functions, and expert opinion. See Cichota et al. (2013; Soil Research 51: 92-111, http://dx.doi.org/10.1071/SR12338) for a description of the pedotransfer functions. The soil carbon and fresh organic matter settings have been set as those broadly appropriate for permanent productive pastoral systems, see Cichota el al. (2012; Soil Research 50: 694-707, http://dx.doi.org/10.1071/SR12208). Users should take care to adapt these to local conditions before using the data in simulations. FOM values estimated to be 900 kg/ha of FOM in top 600mm of soil and another 100 kg/ha below.
      Physical
        Thickness  ParticleSizeSand  ParticleSizeSilt  ParticleSizeClay  Rocks  BD     AirDry  LL15   DUL    SAT    KS
        200        4.14              72.86             23                0      1.269  0.057   0.172  0.431  0.476  571.265
        210        5.21              78.79             16                0      1.502  0.06    0.181  0.353  0.419  230.999
        130        3.07              69.93             27                0      1.566  0.068   0.206  0.355  0.402  85.675
        410        4.695             75.49             19.815            0      1.725  0.064   0.195  0.339  0.348  19.269
        550        5.07              69.93             25                0      1.716  0.072   0.218  0.347  0.352  28.075
        BD source: Field measured and checked for sensibility
        AirDry source: Estimated based on local knowledge
        LL15, DUL source: Laboratory measured
        SAT source: Calculated from measured, estimated or calculated BD
        SoilCrop wheatSoil: LL=[0.172, 0.181, 0.206, 0.195, 0.218]; KL=[0.06, 0.06, 0.06, 0.043, 0.029]; XF=[1, 1, 1, 1, 1]
          LL source: Estimated based on local knowledge
        SoilCrop perennialgrassSoil: same as Storage.Silt loam (Waikaka No1327).Physical.wheatSoil
        SoilCrop SCRUMSoil: same as Storage.Silt loam (Waikaka No1327).Physical.wheatSoil
      WaterBalance SoilWater: SummerDate=1-nov; SummerU=6; SummerCona=3.5; WinterDate=1-apr; WinterU=2; WinterCona=2; DiffusConst=88; DiffusSlope=35; Salb=0.13; CN2Bare=73; CNRed=20; CNCov=0.8; PSIDul=-100; Thickness=[200, 210, 130, 410, 550]; SWCON=[0.576, 0.51, 0.545, 0.525, 0.573]
      Organic: FOMCNRatio=40; CarbonUnits=Total
        Thickness  Carbon  SoilCNRatio  FBiom  FInert  FOM
        200        3.2     11.852       0.075  0.524   121.898
        210        1.2     11.852       0.012  0.73    80.0929
        130        0.9     11.852       0.008  0.918   61.7558
        410        0.3     11.852       0.008  0.952   27.1992
        550        0.2     11.852       0.008  0.989   9.05382
      Chemical: PHUnits=Water
        Thickness  PH   CEC
        200        6.5  14.2
        210        6.5  9
        130        6.5  8.3
        410        6.5  10.4
        550        6.5  11.8
        PH source: Estimated based on local knowledge
      Nutrient
      Solute NO3: InitialValuesUnits=ppm; WaterTableConcentration=0; D0=0; DepthOfConstantSoluteAccessbility=0; MaxDepthSoluteAccessibility=0; RunoffEffectivenessAtMovingSolute=0; MaxEffectiveRunoff=0
      Solute NH4: InitialValuesUnits=ppm; WaterTableConcentration=0; D0=0; DepthOfConstantSoluteAccessbility=0; MaxDepthSoluteAccessibility=0; RunoffEffectivenessAtMovingSolute=0; MaxEffectiveRunoff=0
      Solute Urea: Thickness=[200, 210, 130, 410, 550]; InitialValues=[0, 0, 0, 0, 0]; InitialValuesUnits=kg/ha; WaterTableConcentration=0; D0=0; DepthOfConstantSoluteAccessbility=0; MaxDepthSoluteAccessibility=0; RunoffEffectivenessAtMovingSolute=0; MaxEffectiveRunoff=0
      Water: Thickness=[200, 210, 130, 410, 550]; InitialValues=[0.431, 0.353, 0.355, 0.339, 0.347]; InitialPAWmm=237.28; RelativeTo=LL15; FilledFromTop=false
      CERESSoilTemperature Temperature
    Soil Silt loam (Palmerston North, Massey University 1 No1365): SoilType=Silt loam; LocalName=Tokomaru (1365); Site=Massey University 1; NearestTown=Palmerston North, Massey University 1; Region=Manawatu; Country=New Zealand; ApsoilNumber=1365; Latitude=-40.395; Longitude=175.609; LocationAccuracy=+/-50 m; YearOfSampling=2010
      DataSource=The database of New Zealand soils was compiled by AgResearch (www.agresearch.co.nz) and based on soil properties gathered, mainly from publications, in the course of conducting several simulation-based research projects but particularly from the Pastoral 21 Environment program which was funded by the New Zealand Ministry for Business, Innovation and Employment,  Dairy NZ, Fonterra and Meat & Wool NZ.
      Comments=Lowered BD value in layer 5 to make run in APSIM. Original values in rb column.The data is a combination of published or supplied measurements, pedotransfer functions, and expert opinion. See Cichota et al. (2013; Soil Research 51: 92-111, http://dx.doi.org/10.1071/SR12338) for a description of the pedotransfer functions. The soil carbon and fresh organic matter settings have been set as those broadly appropriate for permanent productive pastoral systems, see Cichota el al. (2012; Soil Research 50: 694-707, http://dx.doi.org/10.1071/SR12208). Users should take care to adapt these to local conditions before using the data in simulations. FOM values estimated to be 900 kg/ha of FOM in top 600mm of soil and another 100 kg/ha below. Soil C:N ratios taken from soil Silt loam (Marton NoXXXX).
      Physical
        Thickness  ParticleSizeSand  ParticleSizeSilt  ParticleSizeClay  Rocks  BD     AirDry  LL15   DUL    SAT    KS
        100        4                 74                22                0      1.2    0.057   0.174  0.457  0.525  198.563
        150        3.75              72.75             23.5              0      1.35   0.065   0.196  0.391  0.473  231.474
        200        3.5               70.5              26                0      1.53   0.078   0.236  0.374  0.412  109.84
        350        3.5               64.5              32                0      1.56   0.082   0.248  0.387  0.399  11.335
        700        3.5               70.5              26                0      1.554  0.084   0.253  0.408  0.414  0.142
        BD source: Field measured and checked for sensibility
        AirDry source: Estimated based on local knowledge
        LL15, DUL source: Laboratory measured
        SAT source: Calculated from measured, estimated or calculated BD
        SoilCrop wheatSoil: LL=[0.174, 0.196, 0.236, 0.248, 0.253]; KL=[0.06, 0.06, 0.06, 0.049, 0.031]; XF=[1, 1, 1, 1, 1]
          LL source: Estimated based on local knowledge
        SoilCrop perennialgrassSoil: same as Storage.Silt loam (Palmerston North, Massey University 1 No1365).Physical.wheatSoil
        SoilCrop SCRUMSoil: same as Storage.Silt loam (Palmerston North, Massey University 1 No1365).Physical.wheatSoil
      WaterBalance SoilWater: SummerDate=1-nov; SummerU=6; SummerCona=3.5; WinterDate=1-apr; WinterU=2; WinterCona=2; DiffusConst=88; DiffusSlope=35; Salb=0.13; CN2Bare=73; CNRed=20; CNCov=0.8; PSIDul=-100; Thickness=[100, 150, 200, 350, 700]; SWCON=[0.57, 0.523, 0.528, 0.451, 0.034]
      Organic: FOMCNRatio=40; CarbonUnits=Total
        Thickness  Carbon  SoilCNRatio  FBiom  FInert  FOM
        100        4.5     11.026       0.08   0.47    58.9435
        150        2       11.026       0.05   0.457   43.6664
        200        0.75    11.026       0.008  0.77    29.2705
        350        0.35    11.026       0.008  0.928   14.5353
        700        0.1     11.026       0.008  0.982   3.58436
      Chemical: PHUnits=Water
        Thickness  PH   CEC
        100        6.5  15
        150        6.5  10
        200        6.5  8
        350        6.5  11
        700        6.5  10
        PH source: Estimated based on local knowledge
      Nutrient
      Solute NO3: InitialValuesUnits=ppm; WaterTableConcentration=0; D0=0; DepthOfConstantSoluteAccessbility=0; MaxDepthSoluteAccessibility=0; RunoffEffectivenessAtMovingSolute=0; MaxEffectiveRunoff=0
      Solute NH4: InitialValuesUnits=ppm; WaterTableConcentration=0; D0=0; DepthOfConstantSoluteAccessbility=0; MaxDepthSoluteAccessibility=0; RunoffEffectivenessAtMovingSolute=0; MaxEffectiveRunoff=0
      Solute Urea: Thickness=[100, 150, 200, 350, 700]; InitialValues=[0, 0, 0, 0, 0]; InitialValuesUnits=kg/ha; WaterTableConcentration=0; D0=0; DepthOfConstantSoluteAccessbility=0; MaxDepthSoluteAccessibility=0; RunoffEffectivenessAtMovingSolute=0; MaxEffectiveRunoff=0
      Water: Thickness=[100, 150, 200, 350, 700]; InitialValues=[0.457, 0.391, 0.374, 0.387, 0.408]; InitialPAWmm=242.3; RelativeTo=LL15; FilledFromTop=false
      CERESSoilTemperature Temperature
    Soil Silt loam (Palmerston North, Massey University 2 No1366): SoilType=Silt loam; LocalName=Tokomaru (1366); Site=Massey University 2; NearestTown=Palmerston North, Massey University 2; Region=Manawatu; Country=New Zealand; ApsoilNumber=1366; Latitude=-40.395; Longitude=175.609; LocationAccuracy=+/-50 m; YearOfSampling=2010
      DataSource=The database of New Zealand soils was compiled by AgResearch (www.agresearch.co.nz) and based on soil properties gathered, mainly from publications, in the course of conducting several simulation-based research projects but particularly from the Pastoral 21 Environment program which was funded by the New Zealand Ministry for Business, Innovation and Employment,  Dairy NZ, Fonterra and Meat & Wool NZ.
      Comments=The data is a combination of published or supplied measurements, pedotransfer functions, and expert opinion. See Cichota et al. (2013; Soil Research 51: 92-111, http://dx.doi.org/10.1071/SR12338) for a description of the pedotransfer functions. The soil carbon and fresh organic matter settings have been set as those broadly appropriate for permanent productive pastoral systems, see Cichota el al. (2012; Soil Research 50: 694-707, http://dx.doi.org/10.1071/SR12208). Users should take care to adapt these to local conditions before using the data in simulations. FOM values estimated to be 900 kg/ha of FOM in top 600mm of soil and another 100 kg/ha below. Soil C:N ratios taken from soil Silt loam (Marton NoXXXX).
      Physical
        Thickness  ParticleSizeSand  ParticleSizeSilt  ParticleSizeClay  Rocks  BD     AirDry  LL15   DUL    SAT    KS
        100        4.5               78.567            16.933            0      1.19   0.057   0.173  0.397  0.498  57.616
        100        4.25              78.05             17.7              0      1.33   0.065   0.198  0.356  0.465  44.483
        100        4                 76.975            19.025            0      1.41   0.069   0.208  0.349  0.443  26.917
        150        4                 74.933            21.067            0      1.525  0.073   0.22   0.351  0.407  14.782
        350        4                 73.633            22.367            0      1.607  0.081   0.246  0.354  0.387  1.404
        250        4.5               81.025            14.475            0      1.56   0.084   0.254  0.352  0.388  0.191
        200        5                 76.833            18.167            0      1.58   0.081   0.244  0.351  0.393  3.409
        250        7.5               75.45             17.05             0      1.465  0.071   0.216  0.349  0.42   11.916
        BD source: Field measured and checked for sensibility
        AirDry source: Estimated based on local knowledge
        LL15, DUL source: Laboratory measured
        SAT source: Calculated from measured, estimated or calculated BD
        SoilCrop wheatSoil: LL=[0.173, 0.198, 0.208, 0.22, 0.246, 0.254, 0.244, 0.216]; KL=[0.06, 0.06, 0.06, 0.06, 0.049, 0.04, 0.035, 0.02]; XF=[1, 1, 1, 1, 1, 1, 1, 1]
          LL source: Estimated based on local knowledge
        SoilCrop perennialgrassSoil: same as Storage.Silt loam (Palmerston North, Massey University 2 No1366).Physical.wheatSoil
        SoilCrop SCRUMSoil: same as Storage.Silt loam (Palmerston North, Massey University 2 No1366).Physical.wheatSoil
      WaterBalance SoilWater: SummerDate=1-nov; SummerU=6; SummerCona=3.5; WinterDate=1-apr; WinterU=2; WinterCona=2; DiffusConst=88; DiffusSlope=35; Salb=0.13; CN2Bare=73; CNRed=20; CNCov=0.8; PSIDul=-100; Thickness=[100, 100, 100, 150, 350, 250, 200, 250]; SWCON=[0.475, 0.452, 0.43, 0.392, 0.1, 0.021, 0.229, 0.272]
      Organic: FOMCNRatio=40; CarbonUnits=Total
        Thickness  Carbon  SoilCNRatio  FBiom  FInert  FOM
        100        3.5     11.444       0.08   0.381   42.3385
        100        1.5     11.444       0.061  0.26    34.6639
        100        0.75    11.444       0.023  0.571   28.3804
        150        0.5     11.444       0.008  0.801   21.0247
        350        0.4     11.444       0.008  0.931   10.4406
        250        0.1     11.444       0.008  0.959   6.33252
        200        0.1     11.444       0.008  0.984   4.24481
        250        0.1     11.444       0.008  0.987   2.57461
      Chemical: PHUnits=Water
        Thickness  PH   CEC
        100        6.5  13.5
        100        6.5  10
        100        6.5  8.2
        150        6.5  8
        350        6.5  11
        250        6.5  9.8
        200        6.5  9.7
        250        6.5  9
        PH source: Estimated based on local knowledge
      Nutrient
      Solute NO3: InitialValuesUnits=ppm; WaterTableConcentration=0; D0=0; DepthOfConstantSoluteAccessbility=0; MaxDepthSoluteAccessibility=0; RunoffEffectivenessAtMovingSolute=0; MaxEffectiveRunoff=0
      Solute NH4: InitialValuesUnits=ppm; WaterTableConcentration=0; D0=0; DepthOfConstantSoluteAccessbility=0; MaxDepthSoluteAccessibility=0; RunoffEffectivenessAtMovingSolute=0; MaxEffectiveRunoff=0
      Solute Urea: Thickness=[100, 100, 100, 150, 350, 250, 200, 250]; InitialValues=[0, 0, 0, 0, 0, 0, 0, 0]; InitialValuesUnits=kg/ha; WaterTableConcentration=0; D0=0; DepthOfConstantSoluteAccessbility=0; MaxDepthSoluteAccessibility=0; RunoffEffectivenessAtMovingSolute=0; MaxEffectiveRunoff=0
      Water: Thickness=[100, 100, 100, 150, 350, 250, 200, 250]; InitialValues=[0.397, 0.356, 0.349, 0.351, 0.354, 0.352, 0.351, 0.349]; InitialPAWmm=188.9; RelativeTo=LL15; FilledFromTop=false
      CERESSoilTemperature Temperature
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