Simulations: Version=188
  DataStore
  Simulation SoluteInRunoff
    Memo
      This simulation shows how to enable and parameterise solute loss in runoff water. The _SoluteInRunoff_ manager script provides access to the parameters.

      The _Runoff_ graph at the bottom of the simulation plots runoff on the left axis and the amount of NO3 in layers 1, 2 and 3 that is lost in the runoff water. Note that the amount of NO3 lost from layer 3 is zero. This is due to the parameterisation of the _SoluteInRunoff manager script.
    Weather: FileName=%root%\Examples\WeatherFiles\NZ_LakeColeridge.met; Latitude=-43.175; Tav=9.9; Amp=11.5
    Clock: Start=2004-01-01; End=2023-12-31
    Summary summaryfile
    SoilArbitrator
    MicroClimate: a_interception=0; b_interception=0; c_interception=0; d_interception=0; SoilHeatFluxFraction=0; MinimumHeightDiffForNewLayer=0; NightInterceptionFraction=0; ReferenceHeight=2
    Forages
      Parameters:
        Name                          LiveDigestibility  DeadDigestibility  LiveFractionConsumable  DeadFractionConsumable  LiveMinimumBiomass  DeadMinimumBiomass
        SurfaceOrganicMatter.Residue  0.7                0.3                0                       0                       100                 0
        AGPRyegrass.Leaf              0.7                0.3                1                       1                       100                 0
        AGPRyegrass.Stem              0.7                0.3                1                       1                       100                 0
        AGPRyegrass.Stolon            0.7                0.3                1                       1                       100                 0
        AGPWhiteClover.Leaf           0.7                0.3                1                       1                       100                 0
        AGPWhiteClover.Stem           0.7                0.3                1                       1                       100                 0
        AGPWhiteClover.Stolon         0.7                0.3                1                       1                       100                 0
    Zone paddock: Area=1; Slope=0; AspectAngle=0; Altitude=50
      Manager SWIMSetLowerBC
        LowerBCType = gradient
        LowerBCValue = -500
```csharp
using Models.Climate;
using APSIM.Shared.Utilities;
using Models.Soils.Nutrients;
using Models.Soils;
using Models.PMF;
using Models.Core;
using System.Xml.Serialization;
using System;
using System.Linq;
using Models.AgPasture;
using Models.Interfaces;

namespace Models
{
    [Serializable] 
    [System.Xml.Serialization.XmlInclude(typeof(Model))]
    public class Script : Model
    {
        [Link] Clock clock;
        [Link] ISummary summary;
        [Link] private Swim3 swim;
        //[Link] private PastureSpecies ryegrass;
        //[Link] private SimpleGrazing grazing;
        
        public enum LowerBCTypeOptions {gradient,seepage,potential};

        [Separator("Sets the lower boundary condition type (and value if set to 'potential' for SWIM3. The change is applied at the beginning of the first day of the simulation.")]
        [Description("[Get a dropdown] What lower boundary condition is wanted?")] public LowerBCTypeOptions LowerBCType { get; set; }
        [Description("If 'potential', then what potential? (mm) ")] public double LowerBCValue { get; set; }

        public double SoilWaterStart  { get; set; }
        public double SoilWaterEnd  { get; set; }

        [EventSubscribe("DoDailyInitialisation")]
        private void DoDailyInitialisation(object sender, EventArgs e)
        {
        }

        [EventSubscribe("DoReportCalculations")]
        private void DoReportCalculations(object sender, EventArgs e)
        {
        }

        [EventSubscribe("DoManagement")]
        private void DoDailyCalculations(object sender, EventArgs e)
        {
            if (clock.Today == clock.StartDate)
            {
                summary.WriteMessage(this, "Script is setting lower boundary condition to " + LowerBCType, MessageType.Diagnostic);
                if (LowerBCType == LowerBCTypeOptions.gradient)
                    swim.SetLowerBCForGradient(bbcGradient: 0.0);   // in cm/cm (ibbc=0) Note that this is the default setting
                else if (LowerBCType == LowerBCTypeOptions.potential)
                    swim.SetLowerBCForGivenPotential(bbcPotential: LowerBCValue /10.0 );    //  convert to cm (ibbc=1), DUL is -100 cm so values more positive will often result in inflow to the bottom of the soil profile. Input in mm so divide here.
                else if (LowerBCType == LowerBCTypeOptions.seepage)
                    swim.SetLowerBCForSeepage(bbcPotentialSeepage: 0.0);  // in cm (ibbc=3). This is for zero-tension lysimeters
                else
                    throw new Exception("Wrong lower boundary condition type");
            }
        }
    }
}
```
      Manager AutomaticIrrigation
        allowIrrigation = True
        seasonStart = 1-sep
        seasonEnd = 30-mar
        seasonsAllocation = 10000
        triggerDeficit = 80
        targetDeficit = 100
        returndays = 3
        maximumAmount = 30
        depthPAWC = 300
```csharp
using Newtonsoft.Json;
using APSIM.Shared.Utilities;
using System.Xml.Serialization;
using Models.Soils;
using Models.PMF;
using Models.Core;
using System;
using System.Linq;
using Models.Interfaces;



        
namespace Models
{
    [Serializable] 
    [System.Xml.Serialization.XmlInclude(typeof(Model))]
    public class Script : Model
    {
        [Link] private ISummary summary;
        [Link] private Irrigation Irrigation;
        [Link] private Clock Clock;
        [Link] private Soil Soil;
        [Link(IsOptional = true)] private IPlant existingCrop;
        private DateTime StartDate;
        private DateTime EndDate;
        private double TopDUL;
        private double TopLL;
        private int nLayers;
        [Link]
        private IPhysical soilPhysical;
        [Link]
        private ISoilWater waterBalance;
        //Communication to other modules
       
        //User inputs from properties tab
        [Description("Turn irrigation on?")]
        public bool allowIrrigation { get; set; }
        [Description("Start of irrigation season (dd-MMM)")]
        public string seasonStart { get; set; }
        [Description("End of irrigation season (dd-MMM)")]
        public string seasonEnd { get; set; }
        [Description("Season allocation (mm)")]
        public double seasonsAllocation { get; set; }
        [Description("Deficit to trigger irrigation (% PAWC)")]
        public double triggerDeficit { get; set; }
        [Description("Deficit to stop irrigaton (% PAWC)")]
        public double targetDeficit { get; set; }
        [Description("Minimum days for irrigation to return")]
        public double returndays { get; set; }
        [Description("Maximum irrigation application (mm/day)")]
        public double maximumAmount { get; set; }
        [Description("Depth to calculate PAWC (mm)")]
        public double depthPAWC { get; set; }

        //Class members
        [JsonIgnore] public double TopSWdeficit { get; set; }
        [JsonIgnore] public double TopSWC { get; set; }
        [JsonIgnore] public double DaysSinceIrrigation { get; set; }
        [JsonIgnore] public double AmountToApply { get; set; }
        [JsonIgnore] public double SeasonAppliedAmount { get; set; }
        
        private bool IrrigationIsAllowed { get; set; }
        private bool SeasonIsOpen { get; set; }
        private bool CropIsActive { get; set; }
        private bool IrrigatorIsAvailable { get; set; }
        private bool SoilIsDry { get; set; }

    
        //Calculate static soil variables
        [EventSubscribe("StartOfSimulation")]
        private void OnStartOfSimulation(object sender, EventArgs e)
        {   
            //Set the season dates
            StartDate = DateTime.Parse(seasonStart + "-" + Clock.Today.Year.ToString());
            EndDate = DateTime.Parse(seasonEnd + "-" + Clock.Today.Year.ToString());
            
            //Can we irrigate at all?
            IrrigationIsAllowed = false; 
            if (allowIrrigation)
                IrrigationIsAllowed = true; 

            //Calculate soil water variables
            double depthFromSurface = 0.0;
            double fracLayer = 0.0;
            nLayers = soilPhysical.Thickness.Length;
            for (int layer = 0; layer < nLayers; layer++)
            {
                fracLayer = Math.Min(1.0, (depthPAWC - depthFromSurface) / soilPhysical.Thickness[layer]);
                TopLL += soilPhysical.LL15mm[layer] * fracLayer;
                TopDUL += soilPhysical.DULmm[layer] * fracLayer;
                depthFromSurface += soilPhysical.Thickness[layer];
                if (depthFromSurface >= depthPAWC)
                    layer = nLayers;
            }
        }
             
        //Determine daily requirement for irrigation
        [EventSubscribe("StartOfDay")]
        private void OnStartOfDay(object sender, EventArgs e)
        {
            //Can we irrigate today?          
            SeasonIsOpen = isBetween(Clock.Today, StartDate, EndDate);
            if (!SeasonIsOpen)
                SeasonAppliedAmount = 0;

            //Is there a crop in the ground that needs irrigation?
            CropIsActive = false;
            if ((existingCrop != null) && (existingCrop.IsAlive))
                CropIsActive = true;
            //if ((existingCrop.Phenology.Stage >= 3.0) && (existingCrop.Phenology.Stage < 6.0))
          
            //Is the irrigator available?
            IrrigatorIsAvailable = false;
            DaysSinceIrrigation += 1;
            if (DaysSinceIrrigation >= returndays)
                IrrigatorIsAvailable = true;
          
            //Is the soil dry enough to require irrigation?
            SoilIsDry = false;
            double depthFromSurface = 0.0;
            double fracLayer = 0.0;
            TopSWC = 0.0;
            for (int layer = 0; layer < nLayers; layer++)
            //for (int layer = 0; depthFromSurface < depthPAWC + soilPhysical.Thickness[layer]; layer++)
            {
                fracLayer = Math.Min(1.0, (depthPAWC - depthFromSurface) / soilPhysical.Thickness[layer]);
                TopSWC += waterBalance.SWmm[layer] * fracLayer;
                depthFromSurface += soilPhysical.Thickness[layer];
                if (depthFromSurface >= depthPAWC)
                    layer = nLayers;
            }
            
            TopSWdeficit = TopSWC - TopDUL;
            if (Math.Max(0.0, -TopSWdeficit) >= (TopDUL - TopLL) * (100 - triggerDeficit) / 100)
                SoilIsDry = true;
                
            //Are all the conditions ratifying irrigation
            if (IrrigationIsAllowed && SeasonIsOpen && CropIsActive && IrrigatorIsAvailable && SoilIsDry)
            {
                //Lets bloody well irrigate then!!!!
                AmountToApply = TopDUL * targetDeficit / 100 - TopSWC;
                AmountToApply = Math.Max(0.0, Math.Min(AmountToApply, seasonsAllocation - SeasonAppliedAmount));
                AmountToApply = Math.Min(AmountToApply,maximumAmount);
                Irrigation.Apply(AmountToApply);
                DaysSinceIrrigation = 0;
                SeasonAppliedAmount += AmountToApply;
            }
        }
        
        ///Checks whether theDate is between iniDate and endDate (non-year specific)
        private bool isBetween(DateTime theDay, DateTime iniDate, DateTime endDate)
        {
            bool result = false;
            if (iniDate.DayOfYear < endDate.DayOfYear)
            {
                // period is within one year, ex: summer in the northern hemisphere
                if ((theDay.DayOfYear >= iniDate.DayOfYear) && (theDay.DayOfYear <= endDate.DayOfYear))
                    result = true;
            }
            else
            {
                // period goes over the end of the year, ex: summer in the southern hemisphere
                if ((theDay.DayOfYear >= iniDate.DayOfYear) || (theDay.DayOfYear <= endDate.DayOfYear))
                    result = true;
            }
            
            return result;
        }
    }
}
```
      Manager SoluteInRunoff
        SoluteName = NO3
        MaxDepthSoluteAccessible = 20
        DepthConstant = 15
        RunoffEffectivenessAtMovingSolute = 0.5
        MaxEffectiveRunoff = 10
```csharp
using Models.Climate;
using APSIM.Shared.Utilities;
using Models.Soils.Nutrients;
using Models.Soils;
using Models.Core;
using System;
using System.Linq;
using System.Collections.Generic;
using Models.AgPasture;
using Models.Interfaces;

namespace Models
{
    [Serializable] 
    [System.Xml.Serialization.XmlInclude(typeof(Model))]
    public class Script : Model
    {
        [Link] Clock clock;
        [Link] ISummary summary;
        [Link] private Solute[] solutes;

        [Separator("Parameters for configuring solute loss in runoff water.")]

        [Description("Name of solute:")]
        public string SoluteName { get; set; }

        [Description("Maximum depth at which solute can be lost in runoff (mm)")]
        public double MaxDepthSoluteAccessible { get; set; }
        
        [Description("Depth shape factor (mm)")]
        public double DepthConstant { get; set; }

        [Description("Effectiveness of solute loss (0-1)")]
        public double RunoffEffectivenessAtMovingSolute { get; set; }
        
        [Description("Maximum amount of runoff water that will have solute in it (mm)")]
        public double MaxEffectiveRunoff { get; set; }
                
        [EventSubscribe("StartOfSimulation")]
        private void OnStartOfSimulation(object sender, EventArgs e)
        {
            Solute solute = Array.Find(solutes, s => s.Name.Equals(SoluteName, StringComparison.InvariantCultureIgnoreCase));
            if (solute == null)
                throw new Exception($"Cannot find solute {SoluteName}");
            solute.DepthConstant = DepthConstant;
            solute.MaxDepthSoluteAccessible = MaxDepthSoluteAccessible;
            solute.RunoffEffectivenessAtMovingSolute = RunoffEffectivenessAtMovingSolute;
            solute.MaxEffectiveRunoff = MaxEffectiveRunoff;               
        }
    }
}
```
      Irrigation
      Fertiliser
      SurfaceOrganicMatter: InitialResidueName=grass; InitialResidueType=grass; InitialResidueMass=20; InitialStandingFraction=0; InitialCPR=0; InitialCNR=17
      Soil: Latitude=0; Longitude=0
        Physical
          Thickness  ParticleSizeSand  ParticleSizeSilt  ParticleSizeClay  Rocks  BD     AirDry  LL15   DUL    SAT   KS
          60         33.77             48.62             17.61             0      0.865  0.077   0.231  0.565  0.58  216
          110        33.77             48.62             17.61             0      0.865  0.077   0.231  0.565  0.58  216
          140        33.77             48.62             17.61             0      0.865  0.077   0.231  0.565  0.58  216
          240        33.77             48.62             17.61             0      0.865  0.077   0.231  0.565  0.58  216
          150        33.77             48.62             17.61             0      0.865  0.077   0.231  0.565  0.58  216
          SoilCrop AgPRyegrassSoil: LL=[0.231, 0.231, 0.231, 0.231, 0.231]; KL=[0.1, 0.1, 0.1, 0.1, 0]; XF=[1, 1, 1, 1, 0]
          SoilCrop AgPWhiteCloverSoil: LL=[0.231, 0.231, 0.231, 0, 0]; KL=[0.1, 0.1, 0.1, 0, 0]; XF=[1, 1, 1, 0, 0]
        Nutrient
        Organic: FOMCNRatio=40; CarbonUnits=Total
          Thickness  Carbon  SoilCNRatio  FBiom  FInert  FOM
          60         8.2     12.5         0.08   0.58    92.873
          110        5.5     12.5         0.02   0.7     57.963
          140        3.3     12.5         0.015  0.77    31.811
          240        1.7     12.5         0.01   0.9     11.373
          150        1.7     12.5         0.01   0.99    0
        Chemical: Thickness=[60, 110, 140, 240, 150]; PH=[6.5, 6.5, 6.5, 6.5, 6.5]; PHUnits=Water
        Water: Thickness=[60, 110, 140, 240, 150]; InitialValues=[0.565, 0.565, 0.565, 0.565, 0.565]; InitialPAWmm=233.8; RelativeTo=LL15; FilledFromTop=false
        Swim3: Salb=0.13; CN2Bare=50; CNRed=20; CNCov=0.8; KDul=1; PSIDul=-100; VC=true; DTMin=0; DTMax=60; MaxWaterIncrement=5; SpaceWeightingFactor=0; SoluteSpaceWeightingFactor=1; Dis=0; Disp=1; A=2; DTHC=0.1; DTHP=2; vcon1=7.28e-09; vcon2=7.26e-07; eo_time=06:00; eo_durn=720; Diagnostics=false
        LayerStructure: Thickness=[10, 10, 10, 40, 80, 50, 50, 50, 100, 100, 50, 50, 50, 50]
        SoilTemperature
        Solute Cl: InitialValuesUnits=ppm; WaterTableConcentration=0; D0=0.05; DepthConstant=0; MaxDepthSoluteAccessible=0; RunoffEffectivenessAtMovingSolute=0; MaxEffectiveRunoff=0
          Thickness  InitialValues  Exco  FIP
          60         0              0     1
          110        0              0     1
          140        0              0     1
          240        0              0     1
          150        0              0     1
        Solute NO3: InitialValuesUnits=ppm; WaterTableConcentration=0; D0=0.05; DepthConstant=0; MaxDepthSoluteAccessible=0; RunoffEffectivenessAtMovingSolute=0; MaxEffectiveRunoff=0
          Thickness  InitialValues  Exco  FIP
          60         60             0     1
          110        2.101          0     1
          140        2.101          0     1
          240        1.701          0     1
          150        1.701          0     1
        Solute NH4: InitialValuesUnits=ppm; WaterTableConcentration=0; D0=0.05; DepthConstant=0; MaxDepthSoluteAccessible=0; RunoffEffectivenessAtMovingSolute=0; MaxEffectiveRunoff=0
          Thickness  InitialValues  Exco  FIP
          60         0.599          1     1
          110        0.1            1     1
          140        0.1            1     1
          240        0.1            1     1
          150        0.1            1     1
        Solute Urea: InitialValuesUnits=kg/ha; WaterTableConcentration=0; D0=0.05; DepthConstant=0; MaxDepthSoluteAccessible=0; RunoffEffectivenessAtMovingSolute=0; MaxEffectiveRunoff=0
          Thickness  InitialValues  Exco  FIP
          60         0              0     1
          110        0              0     1
          140        0              0     1
          240        0              0     1
          150        0              0     1
      Report: EventNames=[Clock].EndOfDay
        VariableNames:
          [Clock].Today as Date
          [Soil].Swim3.Drainage as Drainage
          [Soil].Swim3.Runoff as Runoff
          [Soil].Swim3.Pond as PondDepth
          sum([Soil].Water.MM) as WaterStored
          [Soil].Swim3.Runoff as Runoff[Soil].Water.Volumetric as SW
          [NO3].AmountLostInRunoff
          [NO3].kgha
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