Simulations: Version=69
  DataStore
  Simulation CRW_base (disabled)
    Clock: Start=2000-01-01; End=2001-12-31
    Summary SummaryFile
    Weather: FileName=VCS_Lincoln.met
    SoilArbitrator
    MicroClimate: a_interception=0; b_interception=1; c_interception=0; d_interception=0; soil_albedo=0.3; SoilHeatFluxFraction=0.4; NightInterceptionFraction=0.5; ReferenceHeight=2
    Zone Field: Area=1; Slope=0; AspectAngle=0; Altitude=50
      Fertiliser
      Soil: ASCOrder=Vertosol; ASCSubOrder=Black; SoilType=Clay; Site=Norwin; NearestTown=Norwin; Region=Darling Downs and Granite Belt; State=Queensland; Country=Australia; NaturalVegetation=Qld. Bluegrass, possible Qld. Blue gum; ApsoilNumber=900; Latitude=-27.581836; Longitude=151.320206; LocationAccuracy=+/- 20m
        DataSource=CSIRO Sustainable Ecosystems, Toowoomba; Characteriesd as part of the GRDC funded project"Doing it better, doing it smarter, managing soil water in Australian agriculture' 2011
        Comments=OC, CLL for all crops estimated-based on Bongeen Mywybilla Soil No1
        Physical
          Thickness  BD       AirDry    LL15      DUL       SAT       KS
          150        1.01056  0.13025   0.2605    0.521     0.588655  20
          150        1.07146  0.198689  0.248362  0.496723  0.565677  20
          300        1.09394  0.28      0.28      0.488438  0.557193  20
          300        1.15861  0.28      0.28      0.480297  0.532787  20
          300        1.17301  0.28      0.28      0.471584  0.527354  20
          300        1.16287  0.28      0.28      0.457071  0.53118   20
          300        1.1875   0.28      0.28      0.452332  0.521888  20
          SoilCrop WheatSoil: LL=[0.261, 0.248, 0.28, 0.306, 0.36, 0.392, 0.446]; KL=[0.06, 0.06, 0.06, 0.04, 0.04, 0.02, 0.01]; XF=[1, 1, 1, 1, 1, 1, 1]
        SoilWater: SummerDate=1-Nov; SummerU=5; SummerCona=5; WinterDate=1-Apr; WinterU=5; WinterCona=5; DiffusConst=40; DiffusSlope=16; Salb=0.12; CN2Bare=73; CNRed=20; CNCov=0.8; max_pond=0; Thickness=[150, 150, 300, 300, 300, 300, 300]; SWCON=[0.3, 0.3, 0.3, 0.3, 0.3, 0.3, 0.3]; PrecipitationInterception=0
        SoilNitrogen: fom_types=[default, manure, mucuna, lablab, shemp, stable]; fract_carb=[0.2, 0.3, 0.54, 0.57, 0.45, 0]; fract_cell=[0.7, 0.3, 0.37, 0.37, 0.47, 0.1]; fract_lign=[0.1, 0.4, 0.09, 0.06, 0.08, 0.9]
          SoilNitrogenNO3 NO3
          SoilNitrogenNH4 NH4
          SoilNitrogenUrea Urea
          SoilNitrogenPlantAvailableNO3 PlantAvailableNO3
          SoilNitrogenPlantAvailableNH4 PlantAvailableNH4
        Organic: FOMCNRatio=40
          Thickness  Carbon  SoilCNRatio  FBiom  FInert  FOM
          150        1.2     12           0.04   0.4     347.129
          150        0.96    12           0.02   0.6     270.344
          300        0.6     12           0.02   0.8     163.972
          300        0.3     12           0.02   1       99.4541
          300        0.18    12           0.01   1       60.322
          300        0.12    12           0.01   1       36.5871
          300        0.12    12           0.01   1       22.1912
        Chemical
          Thickness  NO3N  NH4N  PH
          150        1     0.1   8
          150        1     0.1   8
          300        1     0.1   8
          300        1     0.1   8
          300        1     0.1   8
          300        1     0.1   8
          300        1     0.1   8
        InitialWater: PercentMethod=1; FractionFull=1
        Sample InitialN: Thickness=[150, 150, 300, 300, 300, 300, 300]; SWUnits=Volumetric; OCUnits=Total; PHUnits=Water
        CERESSoilTemperature
      SurfaceOrganicMatter: InitialResidueName=wheat_stubble; InitialResidueType=wheat; InitialResidueMass=500; InitialStandingFraction=0; InitialCPR=0; InitialCNR=100; FractionFaecesAdded=0.5
      Plant Wheat: CropType=Wheat; IsEnding=false; DaysAfterEnding=0
        Memo TitlePage
          # The APSIM Wheat Model

          _Brown, H.E., Huth, N.I. and Holzworth, D.P._

          The APSIM wheat model has been developed using the Plant Modelling Framework (PMF) of [brown_plant_2014]. This new framework provides a library of plant organ and process submodels that can be coupled, at runtime, to construct a model in much the same way that models can be coupled to construct a simulation. This means that dynamic composition of lower level process and organ classes (e.g. photosynthesis, leaf) into larger constructions (e.g. maize, wheat, sorghum) can be achieved by the model developer without additional coding.

          The model consists of:

          * a phenology model to simulate development between developmental phases
          * a structure model to simulate plant morphology
          * a collection of organs to simulate the various plant parts
          * an arbitrator to allocate resources (N, biomass) to the various plant organs
        OrganArbitrator Arbitrator
          RelativeAllocation NArbitrator
          RelativeAllocation DMArbitrator
        Phenology
          Memo
            Wheat exhibits a range of developmental responses to environment and these are strongly influences by genotype characteristics.
            Temperature effects development increasing development rates and decreasing phase durations as temperatures increase.  Theset affects are captured by thermal time, .  However, wheat also exhibits vernalisation and photoperiod sensitivities in its Vegetative phase and further photoperiod sensitivity in the EarlyReproducivePhase.  Photoperiod responses are seen as a reduction in the length of a phase for a photoperiod sensitive genotype in response to a longer photoperiod.  Vernalisation responses are more complicated as they are driven by temperature but interact with photoperiod.  For vernalisation sensitive varieties (Winter types) exposure to cool temperatures or short photoperiods during the Vegetative phase will reduce the thermal time duration of the vegetative phase.

            We draw on the Kirby Framework to capture these vernalisation and photoperiod responses.  This framework assumes that the timing of anthesis is a result of the timing of flag leaf and an additional thermal time passage from there to anthesis.  It also assumes the timing of flag leaf is a result of the Final Leaf Number which sets a target, and leaf appearance rate, which sets the rate of progress toward this target.  Leaf appearance rate is a function of Thermal time and a genotype specific Phyllochron which changes with Haun stage as described by [Jamieson_LeafAppearance_1995].

            Final Leaf Number (FLN) is modeled as the sum of three numbers:

            FLN = MinLeafNumber + VernalLeaves + PhotoLeaves

            Where MinLeafNumber is the number of leaves that a wheat crop will produce when vernalisation is satisified early in the crops duration (before 2nd true leaf) and it is grown in a long photoperiod..  VernalLeaves are the number of leaves that are added due to vernalisation effects.  For insensitive varieties this will always be zero but this is potentially a larger number for sensitivie varieties and the number progresively decreases as the crop encounters more vernalisation.  PhotoLeaves are the number of leaves that are added to the minimum leaf number as a result of short day exposure.  For insensitive varieties this will be zero but is potential larger for more sensitivie varieties and decreases as day length increases.  More detailed explinations of the components of phenology are provided below.
          DivideFunction MeanTemp
            AddFunction TempSum
              VariableReference MaxT: VariableName=[IWeather].MaxT
              VariableReference MinT: VariableName=[IWeather].MinT
            Constant Two: FixedValue=2
          AirTemperatureFunction ThermalTime
            XYPairs: X=[0, 26, 37]; Y=[0, 26, 0]
            Memo
              Thermal time determines the rate of developmental progress through many of the crops phases and is used by organs to determing potential growth rates.
          MultiplyFunction DailyVernalisation
            Memo
              Vernalisation responses are based on those described by [Brown_Anthesis_2013].   Vernalisation is assumed to be related to the expression of the Vrn1 Gene.  Its experssion is accumulated daily and daily upregulation as a function of development (DeltaHaunStage) and a TempResponseProfile that declines exponentially from a maximum at 1<sup>o</sup>C to zero at 0<sup>o</sup>C and at 18<sup>o</sup>C.
            VariableReference DeltaHaunStage: VariableName=[Structure].DeltaHaunStage
            AirTemperatureFunction TempResponseProfile
              XYPairs
                X=[0, 1, 2, 3, 4, 5, 6, 7, 8, 9, 10, 11, 12, 13, 14, 15, 16, 17, 18, 19, 20, 30, 32]
                Y=[0, 1.205, 1.037, 0.893, 0.768, 0.661, 0.569, 0.49, 0.422, 0.363, 0.312, 0.269, 0.231, 0.199, 0.171, 0.148, 0.127, 0.109, 0.094, 0.081, 0, 0, -0.5]
          PhotoperiodFunction Photoperiod: Twilight=-6; DayLength=0
          PhaseLookup PerceivedPhotoPeriod
            PhaseLookupValue ApexBelowGround: Start=Germination; End=Emergence
              Constant Photoperiod: FixedValue=0; Units=h
            PhaseLookupValue ApexAboveGround: Start=Emergence; End=HarvestRipe
              VariableReference Photoperiod: VariableName=[Phenology].Photoperiod.Value()
          MinimumFunction Vrn1
            Memo
              Vrn1 accumulation begins when Vrn4 experssion is down regulated to zero and stops, assuming vernalisation saturation, at a value of 1
            Constant Saturation: FixedValue=1; Units=Relative Experssion
            AccumulateFunction CurrentExpression: StartStageName=Germination; EndStageName=TerminalSpikelet; FractionRemovedOnCut=0; FractionRemovedOnHarvest=0; FractionRemovedOnGraze=0; FractionRemovedOnPrune=0
              LessThanFunction Vernalisation
                VariableReference If_Vrn4: VariableName=[Phenology].Vrn4.Value()
                VariableReference IsLessThanLag: VariableName=[Phenology].VernLag.Value()
                Constant Return_Zero: FixedValue=0
                VariableReference elseReturn_Vernalisation: VariableName=[Phenology].DailyVernalisation.Value()
          MinimumFunction Vrn4
            VariableReference MaxExpression: VariableName=[Phenology].VernLag.Value()
            AccumulateFunction CurrentExpression: StartStageName=Germination; EndStageName=TerminalSpikelet; FractionRemovedOnCut=0; FractionRemovedOnHarvest=0; FractionRemovedOnGraze=0; FractionRemovedOnPrune=0
              VariableReference VernalisationConditioning: VariableName=[Phenology].DailyVernalisation.Value()
          Constant MinimumLeafNumber: FixedValue=7; Units=Leaves
            Memo
              Number of leaves the plant will produce when fully vernalised early and grown in long photoperiod
          Constant VrnSensitivity: FixedValue=0; Units=Leaves
            Memo
              The difference between Inherent earlyness leaf number and the number of leaves produced when the plant is unvernalised and grown in long photoperiod
          Constant VernLag: FixedValue=1; Units=Unitless
            Memo
              The amount of vernalising temperature required before vernalisation response will be evident.  Value of relative to the amount offl vernalisation temperature required from the end of the lag until vernalisation saturation.  A value of 0 means there is no lag, a value of 1 means the lag is the same (in vernal time) as the vernalisation requirement and a value of 2 means the lag is twice as long as the vernalisation response phase
          Constant PpSensitivity: FixedValue=3; Units=Leaves
            Memo
              The reduction in leaf number going from 8 to 16 h Pp
          Constant EarlyReproductivePpSensitivity: FixedValue=0
            Memo
              The phyllochrons duration for the plant to go from flag leaf ligual appearance at 16 h Pp compared to the phyllochron duration for the same phase at 8 h Pp.
          Constant EarlyReproductiveLongDayBase: FixedValue=2.5
            Memo
              The phyllochrons duration for the plant to go from flag leaf ligual appearance at 16 h Pp.
          GerminatingPhase Germinating: Start=Sowing; End=Germination
          EmergingPhase Emerging: ShootLag=40; ShootRate=1.5; Start=Germination; End=Emergence; TTForTimeStep=0
            VariableReference ThermalTime: VariableName=[Phenology].ThermalTime.Value()
          NodeNumberPhase Vegetative: Start=Emergence; End=TerminalSpikelet
            VariableReference ThermalTime: VariableName=[Phenology].ThermalTime.Value()
            VariableReference CompletionNodeNumber: VariableName=[Structure].HaunStageTerminalSpikelet.Value()
          LeafAppearancePhase StemElongation: Start=TerminalSpikelet; End=FlagLeaf
            Memo
              The Final leaf number is fixed at Terminal Spikelet and leaves contune to appear at a rate set by thermal time and phyllochron until flag leaf liguale appears and this phase is completed.
            VariableReference ThermalTime: VariableName=[Phenology].ThermalTime.Value()
          GenericPhase EarlyReproductive: Start=FlagLeaf; End=Flowering
            VariableReference Progression: VariableName=[Phenology].ThermalTime.Value()
            MultiplyFunction Target
              VariableReference Phyllochron: VariableName=[Structure].Phyllochron.BasePhyllochron.Value()
              AddFunction Phyllochrons
                VariableReference LongDayBase: VariableName=[Phenology].EarlyReproductiveLongDayBase.Value()
                MultiplyFunction IncreaseDueToShortPhotoPeriod
                  LinearInterpolationFunction PhotoPeriodResponse: XProperty=[Phenology].Photoperiod.Value()
                    XYPairs: X=[11, 16]; Y=[1, 0]
                  VariableReference PpSensitivity: VariableName=[Phenology].EarlyReproductivePpSensitivity.Value()
          GenericPhase GrainDevelopment: Start=Flowering; End=StartGrainFill
            Constant Target: FixedValue=120
            VariableReference Progression: VariableName=[Phenology].ThermalTime.Value()
          GenericPhase GrainFilling: Start=StartGrainFill; End=EndGrainFill
            Constant Target: FixedValue=545
            VariableReference Progression: VariableName=[Phenology].ThermalTime.Value()
          GenericPhase Maturing: Start=EndGrainFill; End=Maturity
            Constant Target: FixedValue=35
            VariableReference Progression: VariableName=[Phenology].ThermalTime.Value()
          GenericPhase Ripening: Start=Maturity; End=HarvestRipe
            Constant Target: FixedValue=300
            VariableReference Progression: VariableName=[Phenology].ThermalTime.Value()
          EndPhase ReadyForHarvesting: Start=HarvestRipe; End=Unused
            VariableReference ThermalTime: VariableName=[Phenology].ThermalTime.Value()
          ZadokPMF Zadok
          OnEventFunction FlagLeafDAS: SetEvent=FlagLeaf; ReSetEvent=never
            Memo
              A function is used to provide flowering date as days after sowing(DAS).
            Constant PreEventValue: FixedValue=0
            VariableReference PostEventValue: VariableName=[Phenology].DaysAfterSowing
          OnEventFunction FloweringDAS: SetEvent=Flowering; ReSetEvent=never
            Memo
              A function is used to provide flowering date as days after sowing(DAS).
            Constant PreEventValue: FixedValue=0
            VariableReference PostEventValue: VariableName=[Phenology].DaysAfterSowing
          OnEventFunction MaturityDAS: SetEvent=Maturity; ReSetEvent=never
            Memo
              A function is used to provide maturity date as days after sowing(DAS).
            Constant PreEventValue: FixedValue=0
            VariableReference PostEventValue: VariableName=[Phenology].DaysAfterSowing
        Structure: CohortInitialisationStage=Germination; LeafInitialisationStage=Emergence
          VariableReference ThermalTime: VariableName=[Phenology].ThermalTime.Value()
          MultiplyFunction Phyllochron
            Memo Rational
              This is the thermal time between the emergence of leaf tips.  The model used here is based on [Jamieson_SIRIUS_1998] where leaf appearace could be described by a base phyllochron determined between leaves 2 and 7 and a phyllochron that was 70% of base phyllochron for leaves < 2 and 130% of base phyllochron for leaves > 7
            LinearInterpolationFunction LeafStageFactor: XProperty=[Leaf].AppearedCohortNo
              XYPairs: X=[0, 2, 3, 7, 8, 11, 12]; Y=[0.75, 0.75, 1, 1, 1.4, 1.4, 1.4]
            Constant BasePhyllochron: FixedValue=120; Units=oC.d
            LinearInterpolationFunction PhotoPeriodEffect: XProperty=[Phenology].Photoperiod.Value()
              XYPairs: X=[8, 12, 14]; Y=[1.6, 1, 1]
          MultiplyFunction BranchingRate
            Memo
              Potential branching rate is determined by the commonly observed pattern of tillering in wheat, in which each tiller emerges with the third leaf on its parent axis (e.g. first tiller emerges at the same time as the third leaf on the main stem, the first secondary tiller appears with the third leaf on tiller 1).  This is described as a simple function of main stem leaf number.
            PhaseLookup PotentialBranchingRate
              PhaseLookupValue Vegetative: Start=Emergence; End=TerminalSpikelet
                LinearInterpolationFunction PotentialBranchingRate: XProperty=[Structure].LeafTipsAppeared
                  XYPairs: X=[1, 2, 3, 4, 5, 6, 7, 8]; Y=[0, 0, 1, 2, 4, 7, 12, 20]
              PhaseLookupValue Reproductive: Start=TerminalSpikelet; End=HarvestRipe
                Constant Zero: FixedValue=0
            MinimumFunction StressFactors
              LinearInterpolationFunction NitrogenEffect: XProperty=[Arbitrator].FN
                Memo
                  Inadequate Nitrogen supply is assumed to affect tillering prior to any effect on photosynthesis or leaf size.
                XYPairs: X=[0.5, 2, 3]; Y=[0, 1, 1]
              LinearInterpolationFunction CoverEffect: XProperty=[Leaf].CoverTotal
                Memo
                  Tillering is said to cease once a threshold fraction of incoming radiation has been achieved.  This captures shading effects on tillering described by [evers2006cessation].
                XYPairs: X=[0, 0.1, 0.25]; Y=[1, 1, 0]
              LinearInterpolationFunction WaterStressEffect: XProperty=[Root].WaterTensionFactor
                XYPairs: X=[0, 1]; Y=[0, 1]
          PhaseLookup BranchMortality
            PhaseLookupValue MortalityPhase: Start=FlagLeaf; End=Flowering
              MultiplyFunction Mortality
                LinearInterpolationFunction MortalityPerDegDay: XProperty=[Structure].MeanTillerGrowthRate.Value()
                  XYPairs: X=[0, 0.005]; Y=[0.002, 0]
                VariableReference ThermalTime: VariableName=[Phenology].ThermalTime.Value()
          HeightFunction HeightModel
            LinearInterpolationFunction PotentialHeight: XProperty=[Phenology].Stage
              XYPairs: X=[3, 4, 5, 6, 7]; Y=[10, 200, 1000, 1100, 1200]
            LinearInterpolationFunction WaterStress: XProperty=[Leaf].Fw
              XYPairs: X=[0.3, 1]; Y=[0, 1]
          MovingAverageFunction MeanTillerGrowthRate: NumberOfDays=5; StageToStartMovingAverage=Emergence
            Memo
              This is calculated to represent the supply of asslimilate to individual tillers over the past 5 days to use as an index to determine tiller mortality.  When tiller numbers are high or total crop assimilate supply is small there will not be enough assimilate to maintain all of the tillers so the model will senesce some.
            DivideFunction TillerGrowthRate
              VariableReference DailyGrowth: VariableName=[Arbitrator].DM.TotalFixationSupply
              VariableReference ThermalTime: VariableName=[Phenology].ThermalTime.Value()
              VariableReference StemPopulation: VariableName=[Structure].TotalStemPopn
          MovingAverageFunction MeanPhyllochron: NumberOfDays=300; StageToStartMovingAverage=Emergence
            VariableReference Phyllochron: VariableName=[Structure].Phyllochron.Value()
          HoldFunction FinalLeafNumber: WhenToHold=TerminalSpikelet
            AddFunction FinalNodeNumber
              VariableReference MinLeafNumber: VariableName=[Phenology].MinimumLeafNumber.Value()
              MultiplyFunction VernalLeaves
                VariableReference UnVernalisedLeaves: VariableName=[Phenology].VrnSensitivity.Value()
                SubtractFunction VernalisationReductionFactor
                  Constant One: FixedValue=1
                  VariableReference RelativeVrn1Expression: VariableName=[Phenology].Vrn1.Value()
              MultiplyFunction PhotoPLeaves
                VariableReference ShortPpLeaves: VariableName=[Phenology].PpSensitivity.Value()
                LinearInterpolationFunction PhotoPeriodReductionFactor: XProperty=[Phenology].Photoperiod.Value()
                  XYPairs: X=[10, 16]; Y=[1, 0]
          ExpressionFunction HaunStageTerminalSpikelet: Expression=([Structure].FinalLeafNumber.Value() - 2.85)/1.1
            Memo
              The Haun stage at which Terminal Spikelet occurs is determined from final leaf number using the approach described in [Brown_Anthesis_2013].
          AddFunction HaunStage
            VariableReference AppearedLeaves: VariableName=[Leaf].ExpandedCohortNo
            VariableReference ProportionOfExpandingLeaf: VariableName=[Leaf].NextExpandingLeafProportion
          Constant StemSenescenceAge: FixedValue=0
        ReproductiveOrgan Grain: GrowthRespiration=0; MaintenanceRespiration=0; RipeStage=Ripe
          Biomass Live: DMDOfStructural=0.6
          Biomass Dead: DMDOfStructural=0.6
          HoldFunction NumberFunction: WhenToHold=Flowering
            MultiplyFunction GrainNumber
              Constant GrainsPerGramOfStem: FixedValue=26; Units=grains
              VariableReference StemMass: VariableName=[StemPlusSpike].Wt
          Constant DMConversionEfficiency: FixedValue=1
          Constant RemobilisationCost: FixedValue=0
          Constant InitialGrainProportion: FixedValue=0.05
          Constant MaximumPotentialGrainSize: FixedValue=0.05; Units=g
          PhaseLookup DMDemandFunction
            PhaseLookupValue InitialPhase: Start=Flowering; End=StartGrainFill
              FillingRateFunction
                VariableReference NumberFunction: VariableName=[Grain].NumberFunction.Value()
                VariableReference FillingDuration: VariableName=[Phenology].GrainDevelopment.Target.Value()
                VariableReference ThermalTime: VariableName=[Phenology].ThermalTime.Value()
                MultiplyFunction PotentialSizeIncrement
                  VariableReference InitialProportion: VariableName=[Grain].InitialGrainProportion.Value()
                  VariableReference MaximumSize: VariableName=[Grain].MaximumPotentialGrainSize.Value()
            PhaseLookupValue LinearPhase: Start=StartGrainFill; End=EndGrainFill
              FillingRateFunction
                VariableReference NumberFunction: VariableName=[Grain].NumberFunction.Value()
                VariableReference FillingDuration: VariableName=[Phenology].GrainFilling.Target.Value()
                VariableReference ThermalTime: VariableName=[Phenology].ThermalTime.Value()
                MultiplyFunction PotentialSizeIncrement
                  SubtractFunction ProportionLinearPhase
                    Constant One: FixedValue=1
                    VariableReference InitialProportion: VariableName=[Grain].InitialGrainProportion.Value()
                  VariableReference MaximumSize: VariableName=[Grain].MaximumPotentialGrainSize.Value()
          Constant MinimumNConc: FixedValue=0.0123
          Constant MaxNConcDailyGrowth: FixedValue=0.03
          Constant MaximumNConc: FixedValue=0.03
          PhaseLookup NFillingRate
            PhaseLookupValue GrainFilling: Start=Flowering; End=EndGrainFill
              FillingRateFunction
                VariableReference NumberFunction: VariableName=[Grain].NumberFunction.Value()
                AddFunction FillingDuration
                  VariableReference FloweringToGrainFilling: VariableName=[Phenology].GrainDevelopment.Target.Value()
                  VariableReference GrainFilling: VariableName=[Phenology].GrainFilling.Target.Value()
                VariableReference ThermalTime: VariableName=[Phenology].ThermalTime.Value()
                MultiplyFunction PotentialSizeIncrement
                  VariableReference MaximumSize: VariableName=[Grain].MaximumPotentialGrainSize.Value()
                  VariableReference MaximumNConc: VariableName=[Grain].MaximumNConc.Value()
          Constant WaterContent: FixedValue=0.12
          AccumulateFunction AccumThermalTime: StartStageName=Flowering; EndStageName=Maturity; FractionRemovedOnCut=0; FractionRemovedOnHarvest=0; FractionRemovedOnGraze=0; FractionRemovedOnPrune=0
            VariableReference DailyThermalTimeValue: VariableName=[Phenology].ThermalTime.Value()
          ExpressionFunction Protein
            Expression=([Grain].Live.N + [Grain].Dead.N)/([Grain].Live.Wt + [Grain].Dead.Wt) * 100 * 5.71
          BiomassRemoval BiomassRemovalDefaults
            OrganBiomassRemovalType Harvest: FractionLiveToRemove=1; FractionDeadToRemove=0; FractionLiveToResidue=0; FractionDeadToResidue=0
            OrganBiomassRemovalType Cut: FractionLiveToRemove=1; FractionDeadToRemove=0; FractionLiveToResidue=0; FractionDeadToResidue=0
            OrganBiomassRemovalType Prune: FractionLiveToRemove=0; FractionDeadToRemove=0; FractionLiveToResidue=0.8; FractionDeadToResidue=0
            OrganBiomassRemovalType Graze: FractionLiveToRemove=0.6; FractionDeadToRemove=0; FractionLiveToResidue=0.2; FractionDeadToResidue=0
            OrganBiomassRemovalType Thin: FractionLiveToRemove=0; FractionDeadToRemove=0; FractionLiveToResidue=0.05; FractionDeadToResidue=0
          Constant CarbonConcentration: FixedValue=0.4
        Root: GrowthRespiration=0; MaintenanceRespiration=0; RootAngle=45; SWAvailabilityRatio=0
          Constant DMConversionEfficiency: FixedValue=1
          Constant RemobilisationCost: FixedValue=0
          Constant KLModifier: FixedValue=1
          Constant SoilWaterEffect: FixedValue=1
          Constant MaxDailyNUptake: FixedValue=20
          Constant SenescenceRate: FixedValue=0.005
          Constant MaximumRootDepth: FixedValue=1000000
          Constant MaximumNConc: FixedValue=0.01
          Constant MinimumNConc: FixedValue=0.01
          PhaseBasedSwitch NitrogenDemandSwitch: Start=Germination; End=Maturity
          BiomassRemoval BiomassRemovalDefaults
            OrganBiomassRemovalType Harvest: FractionLiveToRemove=0; FractionDeadToRemove=0; FractionLiveToResidue=0.2; FractionDeadToResidue=0
            OrganBiomassRemovalType Cut: FractionLiveToRemove=0; FractionDeadToRemove=0; FractionLiveToResidue=0.3; FractionDeadToResidue=0
            OrganBiomassRemovalType Prune: FractionLiveToRemove=0; FractionDeadToRemove=0; FractionLiveToResidue=0.1; FractionDeadToResidue=0
            OrganBiomassRemovalType Graze: FractionLiveToRemove=0; FractionDeadToRemove=0; FractionLiveToResidue=0.15; FractionDeadToResidue=0
            OrganBiomassRemovalType Thin: FractionLiveToRemove=0; FractionDeadToRemove=0; FractionLiveToResidue=0.05; FractionDeadToResidue=0
          Constant KNO3: FixedValue=0.02
          Constant KNH4: FixedValue=0.01
          Constant InitialDM: FixedValue=0.005; Units=g/plant
          Constant SpecificRootLength: FixedValue=105; Units=m/g
          MultiplyFunction RootFrontVelocity
            PhaseLookup PotentialRootFrontVelocity
              PhaseLookupValue PreEmergence: Start=Germination; End=Emergence
                Constant Value: FixedValue=5; Units=mm/d
              PhaseLookupValue PostEmergence: Start=Emergence; End=Maturity
                Constant Value: FixedValue=20; Units=mm/d
            WeightedTemperatureFunction TemperatureFactor: MaximumTemperatureWeighting=0.5
              XYPairs: X=[0, 15, 25, 35]; Y=[0, 1, 1, 0]
            LinearInterpolationFunction WaterFactor: XProperty=[SoilWaterScale]
              SoilWaterScale
              XYPairs: X=[0, 0.25, 1]; Y=[0, 1, 1]
          LinearInterpolationFunction NUptakeSWFactor: XProperty=[SoilWaterScale]
            SoilWaterScale
            XYPairs: X=[0, 1]; Y=[0, 1]
            Memo
              This is modelled in the same way as the old wheat model where potential N uptake is decreased as the soil dries as described by NUptakeSWFactor
          Constant CarbonConcentration: FixedValue=0.4
          Constant MaintenanceRespirationFunction: FixedValue=0
          BiomassDemand DMDemands
            MultiplyFunction Structural
              PartitionFractionDemandFunction DMDemandFunction
                PhaseLookup PartitionFraction
                  PhaseLookupValue PreEmergence: Start=Germination; End=Emergence
                    Constant Value: FixedValue=0
                  PhaseLookupValue PreFlowering: Start=Emergence; End=Flowering
                    LinearInterpolationFunction AgeFactor: XProperty=[Phenology].Stage
                      XYPairs: X=[3, 4]; Y=[0.5, 0.2]
                  PhaseLookupValue PostFlowering: Start=Flowering; End=EndGrainFill
                    Constant Value: FixedValue=0.2
              Constant StructuralFraction: FixedValue=1
            Constant Metabolic: FixedValue=0
            StorageDMDemandFunction Storage
              SubtractFunction StorageFraction
                Constant One: FixedValue=1
                VariableReference StructuralFraction: VariableName=[Root].DMDemands.Structural.StructuralFraction.Value()
          BiomassDemand NDemands
            MultiplyFunction Structural
              VariableReference MinNconc: VariableName=[Root].minimumNconc.Value()
              VariableReference PotentialDMAllocation: VariableName=[Root].potentialDMAllocation.Structural
            MultiplyFunction Metabolic
              SubtractFunction MetabolicNconc
                VariableReference CritNconc: VariableName=[Root].criticalNConc.Value()
                VariableReference MinNconc: VariableName=[Root].minimumNconc.Value()
              VariableReference PotentialDMAllocation: VariableName=[Root].potentialDMAllocation.Structural
            StorageNDemandFunction Storage
              VariableReference NitrogenDemandSwitch: VariableName=[Root].nitrogenDemandSwitch.Value()
              VariableReference MaxNconc: VariableName=[Root].maximumNconc.Value()
        Leaf: MaxCover=1; Albedo=0.25; Gsmax350=0.011; R50=150; KDead=0.3; MaximumMainStemLeafNumber=30
          zero: CurrentExpandingLeaf, StartFractionExpanded, FractionNextleafExpanded, DeadNodesYesterday, GrowthRespiration, FRGR, PotentialEP, WaterDemand, TipsAtEmergence, CohortsAtInitialisation, FractionDied
          LeafCohort InitialLeaves[1]: Rank=1; Area=200
            zero: NReallocationFactor, DMReallocationFactor, NRetranslocationFactor, DMRetranslocationFactor, ShadeInducedSenRate, SenescedFrac, DeltaPotentialArea, DeltaStressConstrainedArea, DeltaCarbonConstrainedArea, PotentialStructuralDMAllocation, PotentialMetabolicDMAllocation, MetabolicNReallocated, MetabolicWtReallocated, StorageNReallocated, StorageWtReallocated, MetabolicNRetranslocated, StorageNRetrasnlocated, DMRetranslocated, MetabolicNAllocation, StructuralDMAllocation, MetabolicDMAllocation, MaintenanceRespiration
          LeafCohort InitialLeaves[2]: Rank=2
            zero: NReallocationFactor, DMReallocationFactor, NRetranslocationFactor, DMRetranslocationFactor, ShadeInducedSenRate, SenescedFrac, DeltaPotentialArea, DeltaStressConstrainedArea, DeltaCarbonConstrainedArea, PotentialStructuralDMAllocation, PotentialMetabolicDMAllocation, MetabolicNReallocated, MetabolicWtReallocated, StorageNReallocated, StorageWtReallocated, MetabolicNRetranslocated, StorageNRetrasnlocated, DMRetranslocated, MetabolicNAllocation, StructuralDMAllocation, MetabolicDMAllocation, Area, MaintenanceRespiration
          LeafCohortParameters CohortParameters: ExpansionStressValue=0
            Constant NReallocationFactor: FixedValue=1
            Constant RemobilisationCost: FixedValue=0
            Constant MaintenanceRespirationFunction: FixedValue=0
            Constant NRetranslocationFactor: FixedValue=0.03
            Constant DMReallocationFactor: FixedValue=1
            Constant DMRetranslocationFactor: FixedValue=1
            MinimumFunction CellDivisionStress
              LinearInterpolationFunction WaterStressEffect: XProperty=[Leaf].Fw
                XYPairs: X=[0.5, 1]; Y=[0.1, 1]
              LinearInterpolationFunction NitrogenStressEffect: XProperty=[Wheat].Leaf.Fn
                XYPairs: X=[0, 0.5, 1]; Y=[0.1, 0.1, 1]
            MinimumFunction ExpansionStress
              LinearInterpolationFunction WaterStressEffect: XProperty=[Root].WaterTensionFactor
                XYPairs: X=[0.1, 1.1, 1.3]; Y=[0, 1, 1]
              LinearInterpolationFunction TemperatureEffect: XProperty=[Phenology].MeanTemp.Value()
                XYPairs: X=[0, 12, 14]; Y=[0, 1, 1]
              LinearInterpolationFunction NitrogenStressEffect: XProperty=[Wheat].Leaf.Fn
                XYPairs: X=[0, 0.5, 1]; Y=[0.1, 0.1, 1]
            MultiplyFunction MaxArea
              Constant AreaLargestLeaves: FixedValue=2600; Units=mm^2
              LinearInterpolationFunction AgeFactor: XProperty=[Phenology].Stage
                XYPairs: X=[3, 3.45, 4]; Y=[0.1, 0.5, 1]
            MultiplyFunction GrowthDuration
              Constant Multiplier: FixedValue=1.3
              VariableReference Phyllochron: VariableName=[Structure].Phyllochron.Value()
            MultiplyFunction LagDuration
              LinearInterpolationFunction AgeFactor: XProperty=[Phenology].Stage
                XYPairs: X=[3, 4]; Y=[0.4, 1]
              SubtractFunction LastLeafDuration
                AddFunction ThermalTimeToRipe
                  VariableReference EarlyReproductive: VariableName=[Phenology].EarlyReproductive.Target.Value()
                  VariableReference GrainDevelopment: VariableName=[Phenology].GrainDevelopment.Target.Value()
                  VariableReference GrainFilling: VariableName=[Phenology].GrainFilling.Target.Value()
                  VariableReference Maturing: VariableName=[Phenology].Maturing.Target.Value()
                  VariableReference Ripening: VariableName=[Phenology].Ripening.Target.Value()
                VariableReference SenescenceDuration: VariableName=[Leaf].CohortParameters.SenescenceDuration.Value()
            MultiplyFunction SenescenceDuration
              Constant Multiplier: FixedValue=3
              VariableReference Phyllochron: VariableName=[Structure].Phyllochron.Value()
            Constant DetachmentLagDuration: FixedValue=1000000
            Constant DetachmentDuration: FixedValue=1000000
            Constant RelativeBranchLeafSize: FixedValue=1
            LinearInterpolationFunction MaximumNConc: XProperty=[Phenology].Stage
              XYPairs: X=[3, 4, 6]; Y=[0.05, 0.05, 0.02]
            MultiplyFunction CriticalNConc
              LinearInterpolationFunction CriticalNConcAt350ppm: XProperty=[Phenology].Stage
                XYPairs: X=[3, 4, 6]; Y=[0.04, 0.04, 0.015]
              LinearInterpolationFunction CO2Factor: XProperty=[IWeather].CO2
                XYPairs: X=[350, 700]; Y=[1, 0.93]
            LinearInterpolationFunction MinimumNConc: XProperty=[Phenology].Stage
              XYPairs: X=[3, 4, 6]; Y=[0.01, 0.01, 0.01]
            AddFunction DroughtInducedLagAcceleration
              Constant One: FixedValue=1
              MultiplyFunction Stress
                Constant StressResponseCoefficient: FixedValue=1
                LinearInterpolationFunction StressFactor: XProperty=[Leaf].Fw
                  XYPairs: X=[0, 1]; Y=[2, 0]
            AddFunction DroughtInducedSenAcceleration: same as CRW_base.Field.Wheat.Leaf.CohortParameters.DroughtInducedLagAcceleration
            LinearInterpolationFunction SpecificLeafAreaMax: XProperty=[Phenology].Stage
              XYPairs: X=[3, 4, 6]; Y=[17000, 20000, 17000]
            LinearInterpolationFunction SpecificLeafAreaMin: XProperty=[Leaf].Fn
              XYPairs: X=[0.4, 1]; Y=[14000, 14000]
            Constant InitialNConc: FixedValue=0
            Constant StructuralFraction: FixedValue=0.5
            Constant StorageFraction: FixedValue=0.3
            Constant LeafSizeShapeParameter: FixedValue=0.3
            Constant SenessingLeafRelativeSize: FixedValue=1; Units=0-1
            MultiplyFunction ShadeInducedSenescenceRate
              Constant RatePerDegDay: FixedValue=0
                Memo
                  1% per degree day means it takes one phyllochron for a shaded leaf to fully sceness
              VariableReference ThermalTime: VariableName=[Phenology].ThermalTime.Value()
            ArrayFunction LagDurationAgeMultiplier: Values=1 1 1
            ArrayFunction SenescenceDurationAgeMultiplier: Values=1 1 1
            ArrayFunction LeafSizeAgeMultiplier: Values=1 1 1 1 1 1 1 1 1 1 1 1
          RUEModel Photosynthesis
            Constant RUE: FixedValue=1.5
            WeightedTemperatureFunction FT: MaximumTemperatureWeighting=0.75
              XYPairs: X=[0, 15, 25, 35]; Y=[0, 1, 1, 0]
            LinearInterpolationFunction FN: XProperty=[Leaf].Fn
              XYPairs: X=[0, 1, 1.5]; Y=[0, 1, 1]
            LinearInterpolationFunction FW: XProperty=[Leaf].Fw
              XYPairs: X=[0, 1, 1]; Y=[0, 1, 1]
            LinearInterpolationFunction FVPD: XProperty=[Photosynthesis].VPD
              XYPairs: X=[0, 10, 40]; Y=[1, 1, 0]
            RUECO2Function FCO2: PhotosyntheticPathway=C3
            VariableReference RadnInt: VariableName=[Leaf].RadIntTot
          Constant FrostFraction: FixedValue=0
          Constant RemobilisationCost: FixedValue=0
          VariableReference ThermalTime: VariableName=[Phenology].ThermalTime.Value()
          MinimumFunction FRGRFunction
            VariableReference RUE_FT: VariableName=[Leaf].Photosynthesis.FT.Value()
            MinimumFunction Others
              VariableReference RUE_FN: VariableName=[Leaf].Photosynthesis.FN.Value()
              VariableReference RUE_FVPD: VariableName=[Leaf].Photosynthesis.FVPD.Value()
          BiomassRemoval BiomassRemovalDefaults
            OrganBiomassRemovalType Harvest: FractionLiveToRemove=0; FractionDeadToRemove=0; FractionLiveToResidue=0.3; FractionDeadToResidue=0.3
            OrganBiomassRemovalType Cut: FractionLiveToRemove=0.8; FractionDeadToRemove=0.8; FractionLiveToResidue=0; FractionDeadToResidue=0
            OrganBiomassRemovalType Prune: FractionLiveToRemove=0; FractionDeadToRemove=0; FractionLiveToResidue=0.6; FractionDeadToResidue=0.6
            OrganBiomassRemovalType Graze: FractionLiveToRemove=0.6; FractionDeadToRemove=0.6; FractionLiveToResidue=0.1; FractionDeadToResidue=0.1
            OrganBiomassRemovalType Thin: FractionLiveToRemove=0; FractionDeadToRemove=0; FractionLiveToResidue=0.05; FractionDeadToResidue=0.05
          MultiplyFunction ExtinctionCoeff
            Constant VegetativePhase: FixedValue=0.5
            LinearInterpolationFunction DevelopmentFactor: XProperty=[Phenology].Stage
              XYPairs: X=[3, 4.7, 5]; Y=[1, 1, 1.2]
              Memo
                Exntiction coefficient increases at stem extension as leaves become more prostrate
          Constant StructuralFraction: FixedValue=0.5
          Constant DMConversionEfficiency: FixedValue=1
          Constant CarbonConcentration: FixedValue=0.4
          Constant StomatalConductanceCO2Modifier: FixedValue=1
        GenericOrgan Spike
          Constant NReallocationFactor: FixedValue=0
          Constant RemobilisationCost: FixedValue=0
          PhaseLookup NRetranslocationFactor
            PhaseLookupValue EarlyGrowth: Start=Emergence; End=StartGrainFill
              Constant ValueDuringEarlyGrowth: FixedValue=0
            PhaseLookupValue ReproductiveGrowth: Start=StartGrainFill; End=EndGrainFill
              Constant ValueDuringGrainFill: FixedValue=0.5
          LinearInterpolationFunction MaximumNConc: XProperty=[Phenology].Stage
            XYPairs: X=[4, 4.5, 5.5, 6]; Y=[0.01, 0.01, 0.025, 0.025]
          Constant MinimumNConc: FixedValue=0.004
          BiomassRemoval BiomassRemovalDefaults
            OrganBiomassRemovalType Harvest: FractionLiveToRemove=0.5; FractionDeadToRemove=0; FractionLiveToResidue=0.1; FractionDeadToResidue=0
            OrganBiomassRemovalType Cut: FractionLiveToRemove=0.8; FractionDeadToRemove=0; FractionLiveToResidue=0; FractionDeadToResidue=0
            OrganBiomassRemovalType Prune: FractionLiveToRemove=0; FractionDeadToRemove=0; FractionLiveToResidue=0.6; FractionDeadToResidue=0
            OrganBiomassRemovalType Graze: FractionLiveToRemove=0.6; FractionDeadToRemove=0; FractionLiveToResidue=0.2; FractionDeadToResidue=0
            OrganBiomassRemovalType Thin: FractionLiveToRemove=0; FractionDeadToRemove=0; FractionLiveToResidue=0.05; FractionDeadToResidue=0
          PhaseBasedSwitch NitrogenDemandSwitch: Start=Emergence; End=StartGrainFill
          PhaseLookup DMRetranslocationFactor
            PhaseLookupValue VegetativeGrowth: Start=Emergence; End=StartGrainFill
              Constant DMRetranslocationFactor: FixedValue=0
            PhaseLookupValue ReproductiveGrowth: Start=StartGrainFill; End=EndGrainFill
              Constant DMRetranslocationFactor: FixedValue=0.5
          Constant InitialWtFunction: FixedValue=0; Units=g/m^2
          Constant DetachmentRateFunction: FixedValue=0; Units=/d
          Constant MaintenanceRespirationFunction: FixedValue=0; Units=0-1
          Constant DMConversionEfficiency: FixedValue=1; Units=0-1
          VariableReference HeadNumber: VariableName=[Structure].TotalStemPopn
          Constant DMReallocationFactor: FixedValue=0
          AddFunction CriticalNConc
            VariableReference MinimumNConc: VariableName=[Spike].MinimumNConc.Value()
            MultiplyFunction MetabolicNconc
              SubtractFunction NonStructuralN
                VariableReference MaximumNConc: VariableName=[Spike].MaximumNConc.Value()
                VariableReference MinimumNConc: VariableName=[Spike].MinimumNConc.Value()
              Constant Proportion: FixedValue=0.8
          LinearInterpolationFunction SenescenceRate: XProperty=[Phenology].Stage
            XYPairs: X=[3, 4, 5, 6]; Y=[0.07, 0.04, 0.015, 0.012]
          Constant CarbonConcentration: FixedValue=0.4
          BiomassDemand DMDemands
            MultiplyFunction Structural
              PartitionFractionDemandFunction DMDemandFunction
                LinearInterpolationFunction PartitionFraction: XProperty=[Phenology].Stage
                  XYPairs: X=[3, 4, 4.7, 5, 7, 7.000001]; Y=[0, 0, 0.01, 0.7, 0.7, 0]
              PhaseLookup StructuralFraction
                PhaseLookupValue VegetativeGrowth: Start=Emergence; End=StartGrainFill
                  Constant StructuralFractionEG: FixedValue=0.3
                PhaseLookupValue ReproductiveGrowth: Start=StartGrainFill; End=EndGrainFill
                  Constant StructuralFractionGF: FixedValue=0
            Constant Metabolic: FixedValue=0
            StorageDMDemandFunction Storage
              SubtractFunction StorageFraction
                Constant One: FixedValue=1
                VariableReference StructuralFraction: VariableName=[Spike].DMDemands.Structural.StructuralFraction.Value()
          BiomassDemand NDemands
            MultiplyFunction Structural
              VariableReference MinNconc: VariableName=[Spike].minimumNconc.Value()
              VariableReference PotentialDMAllocation: VariableName=[Spike].potentialDMAllocation.Structural
            MultiplyFunction Metabolic
              SubtractFunction MetabolicNconc
                VariableReference CritNconc: VariableName=[Spike].criticalNConc.Value()
                VariableReference MinNconc: VariableName=[Spike].minimumNconc.Value()
              VariableReference PotentialDMAllocation: VariableName=[Spike].potentialDMAllocation.Structural
            StorageNDemandFunction Storage
              VariableReference NitrogenDemandSwitch: VariableName=[Spike].nitrogenDemandSwitch.Value()
              VariableReference MaxNconc: VariableName=[Spike].maximumNconc.Value()
          RetranslocateNonStructural RetranslocateNitrogen
        GenericOrgan Stem
          LinearInterpolationFunction SenescenceRate: XProperty=[Phenology].Stage
            XYPairs: X=[3, 7, 8, 9]; Y=[0, 0, 0.2, 0.5]
          Constant RemobilisationCost: FixedValue=0
          LinearInterpolationFunction MaximumNConc: XProperty=[Phenology].Stage
            XYPairs: X=[3, 4, 5, 6]; Y=[0.07, 0.04, 0.015, 0.012]
          Constant MinimumNConc: FixedValue=0.0025
          PhaseBasedSwitch NitrogenDemandSwitch: Start=Emergence; End=StartGrainFill
          Constant NReallocationFactor: FixedValue=0
          PhaseLookup NRetranslocationFactor
            PhaseLookupValue VegetativeGrowth: Start=Sowing; End=Flowering
              Constant Fraction: FixedValue=0
            PhaseLookupValue ReproductiveGrowth: Start=Flowering; End=HarvestRipe
              Constant Fraction: FixedValue=0.5
          PhaseLookup DMRetranslocationFactor: same as CRW_base.Field.Wheat.Spike.DMRetranslocationFactor
          BiomassRemoval BiomassRemovalDefaults: same as CRW_base.Field.Wheat.Spike.BiomassRemovalDefaults
          DivideFunction PercentWSC
            VariableReference WSC: VariableName=[Stem].Live.StorageWt
            VariableReference StemWt: VariableName=[Stem].Live.Wt
          Constant InitialWtFunction: FixedValue=0; Units=g/m^2
          Constant DetachmentRateFunction: FixedValue=0; Units=/d
          Constant MaintenanceRespirationFunction: FixedValue=0; Units=0-1
          Constant DMConversionEfficiency: FixedValue=1; Units=0-1
          Constant DMReallocationFactor: FixedValue=0
          AddFunction CriticalNConc
            VariableReference MinimumNConc: VariableName=[Stem].MinimumNConc.Value()
            MultiplyFunction MetabolicNconc
              SubtractFunction NonStructuralN
                VariableReference MaximumNConc: VariableName=[Stem].MaximumNConc.Value()
                VariableReference MinimumNConc: VariableName=[Stem].MinimumNConc.Value()
              Constant Proportion: FixedValue=0.5
          Constant CarbonConcentration: FixedValue=0.4
          BiomassDemand DMDemands
            MultiplyFunction Structural
              PartitionFractionDemandFunction DMDemandFunction
                PhaseLookup PartitionFraction
                  PhaseLookupValue PreStemElongation: Start=Emergence; End=TerminalSpikelet
                    Constant StemFraction: FixedValue=0.2
                  PhaseLookupValue StemElongation: Start=TerminalSpikelet; End=StartGrainFill
                    Constant StemFraction: FixedValue=0.7; Units=0
                  PhaseLookupValue EarEmergence: Start=StartGrainFill; End=HarvestRipe
                    Constant StemFraction: FixedValue=0
              PhaseLookup StructuralFraction
                PhaseLookupValue VegetativeGrowth: Start=Sowing; End=StartGrainFill
                  Constant Fraction: FixedValue=0.3
                PhaseLookupValue ReproductiveGrowth: Start=StartGrainFill; End=HarvestRipe
                  Constant Fraction: FixedValue=0.01
            Constant Metabolic: FixedValue=0
            StorageDMDemandFunction Storage
              SubtractFunction StorageFraction
                Constant One: FixedValue=1
                VariableReference StructuralFraction: VariableName=[Stem].DMDemands.Structural.StructuralFraction.Value()
          BiomassDemand NDemands
            MultiplyFunction Structural
              VariableReference MinNconc: VariableName=[Stem].minimumNconc.Value()
              VariableReference PotentialDMAllocation: VariableName=[Stem].potentialDMAllocation.Structural
            MultiplyFunction Metabolic
              SubtractFunction MetabolicNconc
                VariableReference CritNconc: VariableName=[Stem].criticalNConc.Value()
                VariableReference MinNconc: VariableName=[Stem].minimumNconc.Value()
              VariableReference PotentialDMAllocation: VariableName=[Stem].potentialDMAllocation.Structural
            StorageNDemandFunction Storage
              VariableReference NitrogenDemandSwitch: VariableName=[Stem].nitrogenDemandSwitch.Value()
              VariableReference MaxNconc: VariableName=[Stem].maximumNconc.Value()
          RetranslocateNonStructural RetranslocateNitrogen
        CompositeBiomass AboveGround: DMDOfStructural=0.6
          Propertys=[[Leaf].Live, [Leaf].Dead, [Stem].Live, [Stem].Dead, [Spike].Live, [Spike].Dead, [Grain].Live, [Grain].Dead]
        CompositeBiomass AboveGroundLive: Propertys=[[Leaf].Live, [Stem].Live, [Spike].Live, [Grain].Live]; DMDOfStructural=0.6
        CompositeBiomass AboveGroundDead: Propertys=[[Leaf].Dead, [Stem].Dead, [Spike].Dead, [Grain].Dead]; DMDOfStructural=0.6
        CompositeBiomass BelowGround: Propertys=[[Root].Live, [Root].Dead]; DMDOfStructural=0.6
        CompositeBiomass Total: DMDOfStructural=0.6
          Propertys=[[Leaf].Live, [Leaf].Dead, [Stem].Live, [Stem].Dead, [Root].Live, [Root].Dead, [Spike].Live, [Spike].Dead, [Grain].Live, [Grain].Dead]
        CompositeBiomass TotalLive: DMDOfStructural=0.6
          Propertys=[[Leaf].Live, [Stem].Live, [Root].Live, [Spike].Live, [Grain].Live]
        CompositeBiomass TotalDead: DMDOfStructural=0.6
          Propertys=[[Leaf].Dead, [Stem].Dead, [Root].Dead, [Spike].Dead, [Grain].Dead]
        CompositeBiomass Ear: Propertys=[[Spike].Live, [Grain].Live, [Spike].Dead, [Grain].Dead]; DMDOfStructural=0.6
          Memo
            The Ear composite biomass object includes the Live and dead pools of all organs within the Ear to allow output for total dry matter and Nutrient contents, including total structural, non-structural and metabolic pools.
        CompositeBiomass StemPlusSpike: Propertys=[[Stem].Live, [Spike].Live, [Stem].Dead, [Spike].Dead]; DMDOfStructural=0.6
        CultivarFolder Cultivars
          CultivarFolder New Zealand
            Cultivar Alberic
              Command:
                [Phenology].MinimumLeafNumber.FixedValue = 9
                [Phenology].VrnSensitivity.FixedValue = 7
                [Phenology].PpSensitivity.FixedValue = 3
            Cultivar Amarok
              Command:
                [Phenology].MinimumLeafNumber.FixedValue = 9
                [Phenology].VrnSensitivity.FixedValue = 10
                [Phenology].PpSensitivity.FixedValue = 6
                [Phenology].EarlyReproductivePpSensitivity.FixedValue = 5
                [Structure].Phyllochron.BasePhyllochron.FixedValue = 80
            Cultivar Aspiring
              Command:
                [Phenology].MinimumLeafNumber.FixedValue = 9
                [Phenology].VrnSensitivity.FixedValue = 7
                [Phenology].PpSensitivity.FixedValue = 3
            Cultivar BattenWinter
              Command:
                [Phenology].MinimumLeafNumber.FixedValue = 8
                [Phenology].VrnSensitivity.FixedValue = 8
                [Phenology].PpSensitivity.FixedValue = 5
                [Phenology].EarlyReproductivePpSensitivity.FixedValue = 3
                [Structure].Phyllochron.BasePhyllochron.FixedValue = 100
                [Leaf].ExtinctionCoeff.VegetativePhase.FixedValue = 0.7
                [Grain].NumberFunction.GrainNumber.GrainsPerGramOfStem.FixedValue = 22
            Cultivar BattenSpring
              Command:
                [Phenology].MinimumLeafNumber.FixedValue = 7
                [Phenology].VrnSensitivity.FixedValue = 0
                [Phenology].PpSensitivity.FixedValue = 5
                [Phenology].EarlyReproductivePpSensitivity.FixedValue = 3
                [Structure].Phyllochron.BasePhyllochron.FixedValue = 100
                [Leaf].ExtinctionCoeff.VegetativePhase.FixedValue = 0.7
                [Grain].NumberFunction.GrainNumber.GrainsPerGramOfStem.FixedValue = 22
            Cultivar Centaur
              Command:
                [Phenology].MinimumLeafNumber.FixedValue = 9
                [Phenology].VrnSensitivity.FixedValue = 7
                [Phenology].PpSensitivity.FixedValue = 3
            Cultivar Claire
              Command:
                [Phenology].MinimumLeafNumber.FixedValue = 8
                [Phenology].VrnSensitivity.FixedValue = 8
                [Phenology].PpSensitivity.FixedValue = 8
                [Phenology].EarlyReproductivePpSensitivity.FixedValue = 3
                [Structure].Phyllochron.BasePhyllochron.FixedValue = 100
            Cultivar Conquest
              Command:
                [Phenology].MinimumLeafNumber.FixedValue = 7
                [Phenology].VrnSensitivity.FixedValue = 0
                [Phenology].PpSensitivity.FixedValue = 3
                [Structure].Phyllochron.BasePhyllochron.FixedValue = 100
            Cultivar Discovery
              Command:
                [Phenology].MinimumLeafNumber.FixedValue = 8.5
                [Phenology].VrnSensitivity.FixedValue = 0
                [Phenology].PpSensitivity.FixedValue = 0
                [Structure].Phyllochron.BasePhyllochron.FixedValue = 80
                [Leaf].CohortParameters.MaxArea.AreaLargestLeaves.FixedValue = 1600
                [Grain].MaximumPotentialGrainSize.FixedValue = 0.051
                [Grain].NumberFunction.GrainNumber.GrainsPerGramOfStem.FixedValue = 35
                [Leaf].ExtinctionCoeff.VegetativePhase.FixedValue = 0.5
                [Structure].BranchingRate.PotentialBranchingRate.Vegetative.PotentialBranchingRate.XYPairs.Y = 0,0,0,0,4,7,12,20
                [Grain].MaximumNConc.FixedValue = 0.025
                [Grain].MaxNConcDailyGrowth.FixedValue = 0.025
                [Leaf].ExtinctionCoeff.DevelopmentFactor.XYPairs.Y = 1,1,1.4
                [Leaf].CohortParameters.MinimumNConc.XYPairs.Y = 0.01,0.008,0.008
                [Stem].MinimumNConc.FixedValue = 0.006
                [Spike].DMRetranslocationFactor.ReproductiveGrowth.DMRetranslocationFactor.FixedValue = 0.05
              Memo
                This is a spring wheat with a high grain number and later tillering
            Cultivar Einstein
              Command:
                [Phenology].MinimumLeafNumber.FixedValue = 9
                [Phenology].VrnSensitivity.FixedValue = 7
                [Phenology].PpSensitivity.FixedValue = 3
            Cultivar Exceed
              Command:
                [Phenology].MinimumLeafNumber.FixedValue = 9
                [Phenology].VrnSensitivity.FixedValue = 7
                [Phenology].PpSensitivity.FixedValue = 3
            Cultivar Majestic
              Command:
                [Phenology].MinimumLeafNumber.FixedValue = 9
                [Phenology].VrnSensitivity.FixedValue = 7
                [Phenology].PpSensitivity.FixedValue = 3
            Cultivar Option
              Command:
                [Phenology].MinimumLeafNumber.FixedValue = 9
                [Phenology].VrnSensitivity.FixedValue = 7
                [Phenology].PpSensitivity.FixedValue = 3
            Cultivar Otane
              Command:
                [Phenology].MinimumLeafNumber.FixedValue = 6
                [Phenology].VrnSensitivity.FixedValue = 0
                [Phenology].PpSensitivity.FixedValue = 4
                [Phenology].EarlyReproductivePpSensitivity.FixedValue = 2
                [Structure].Phyllochron.BasePhyllochron.FixedValue = 100
            Cultivar Pennant
              Command:
                [Phenology].MinimumLeafNumber.FixedValue = 9
                [Phenology].VrnSensitivity.FixedValue = 7
                [Phenology].PpSensitivity.FixedValue = 3
            Cultivar Regency
              Command:
                [Phenology].MinimumLeafNumber.FixedValue = 9
                [Phenology].VrnSensitivity.FixedValue = 7
                [Phenology].PpSensitivity.FixedValue = 3
            Cultivar Richmond
              Command:
                [Phenology].MinimumLeafNumber.FixedValue = 9
                [Phenology].VrnSensitivity.FixedValue = 7
                [Phenology].PpSensitivity.FixedValue = 3
            Cultivar Robigus
              Command:
                [Phenology].MinimumLeafNumber.FixedValue = 9
                [Phenology].VrnSensitivity.FixedValue = 7
                [Phenology].PpSensitivity.FixedValue = 3
            Cultivar Rongotea
              Command:
                [Phenology].MinimumLeafNumber.FixedValue = 7
                [Phenology].VrnSensitivity.FixedValue = 0
                [Phenology].PpSensitivity.FixedValue = 2
                [Phenology].EarlyReproductivePpSensitivity.FixedValue = 3
                [Structure].Phyllochron.BasePhyllochron.FixedValue = 100
            Cultivar Rubric
              Command:
                [Phenology].MinimumLeafNumber.FixedValue = 9
                [Phenology].VrnSensitivity.FixedValue = 7
                [Phenology].PpSensitivity.FixedValue = 3
            Cultivar Sage
              Command:
                [Phenology].MinimumLeafNumber.FixedValue = 9
                [Phenology].VrnSensitivity.FixedValue = 7
                [Phenology].PpSensitivity.FixedValue = 3
            Cultivar Saracen
              Command:
                [Phenology].MinimumLeafNumber.FixedValue = 9
                [Phenology].VrnSensitivity.FixedValue = 7
                [Phenology].PpSensitivity.FixedValue = 3
            Cultivar Savannah
              Command:
                [Phenology].MinimumLeafNumber.FixedValue = 9
                [Phenology].VrnSensitivity.FixedValue = 7
                [Phenology].PpSensitivity.FixedValue = 3
            Cultivar Solstice
              Command:
                [Phenology].MinimumLeafNumber.FixedValue = 9
                [Phenology].VrnSensitivity.FixedValue = 7
                [Phenology].PpSensitivity.FixedValue = 3
            Cultivar Tanker
              Command:
                [Phenology].MinimumLeafNumber.FixedValue = 9
                [Phenology].VrnSensitivity.FixedValue = 7
                [Phenology].PpSensitivity.FixedValue = 3
            Cultivar Tribute
              Command:
                [Phenology].MinimumLeafNumber.FixedValue = 9
                [Phenology].VrnSensitivity.FixedValue = 7
                [Phenology].PpSensitivity.FixedValue = 3
            Cultivar Wakanui
              Command:
                [Phenology].MinimumLeafNumber.FixedValue = 8
                [Phenology].VrnSensitivity.FixedValue = 10
                [Phenology].PpSensitivity.FixedValue = 0
                [Phenology].EarlyReproductiveLongDayBase.FixedValue = 4
                [Structure].Phyllochron.BasePhyllochron.FixedValue = 100
                [Phenology].DailyVernalisation.TempResponseProfile.XYPairs.X = 0,1,8
                [Phenology].DailyVernalisation.TempResponseProfile.XYPairs.Y = 0,1.204,0
                [Leaf].ExtinctionCoeff.VegetativePhase.FixedValue = 0.7
                [Grain].NumberFunction.GrainNumber.GrainsPerGramOfStem.FixedValue = 22
                [Grain].MaximumPotentialGrainSize.FixedValue = 0.035
                [Leaf].CohortParameters.MaxArea.AreaLargestLeaves.FixedValue = 3000
            Cultivar Weston
              Command:
                [Phenology].MinimumLeafNumber.FixedValue = 9
                [Phenology].VrnSensitivity.FixedValue = 7
                [Phenology].PpSensitivity.FixedValue = 3
          CultivarFolder Australia
            Cultivar Axe
              Command:
                [Phenology].MinimumLeafNumber.FixedValue = 5
                [Phenology].VrnSensitivity.FixedValue = 0
                [Phenology].PpSensitivity.FixedValue = 4
                [Phenology].EarlyReproductivePpSensitivity.FixedValue = 0
                [Structure].Phyllochron.BasePhyllochron.FixedValue = 100
            Cultivar Bolac
              Command:
                [Phenology].MinimumLeafNumber.FixedValue = 6
                [Phenology].VrnSensitivity.FixedValue = 0
                [Phenology].PpSensitivity.FixedValue = 4
                [Structure].Phyllochron.BasePhyllochron.FixedValue = 100
            Cultivar Cunningham
              Command:
                [Phenology].MinimumLeafNumber.FixedValue = 6
                [Phenology].VrnSensitivity.FixedValue = 0
                [Phenology].PpSensitivity.FixedValue = 4
                [Structure].Phyllochron.BasePhyllochron.FixedValue = 100
              Alias Anlace
              Alias Arrivato
              Alias Babbler
              Alias Barham
              Alias Baxter
              Alias Bowie
              Alias Buckley
              Alias Buckly
              Alias Burunga
              Alias Camm
              Alias Carinya
              Alias ChiefCLPlus
              Alias CLF_Janz
              Alias Dagger
              Alias DBAAurora
              Alias ElmoreCLPlus
              Alias Espada
              Alias Frame
              Alias Gazelle
              Alias Halberd
              Alias Hybrid_Meteor
              Alias JusticaCLPlus
              Alias Preston
              Alias Saphire
              Alias Scout
              Alias Stiletto
              Alias Ventura
              Alias Wallup
            Cultivar Derrimut
              Command:
                [Phenology].MinimumLeafNumber.FixedValue = 6
                [Phenology].VrnSensitivity.FixedValue = 0
                [Phenology].PpSensitivity.FixedValue = 4
                [Structure].Phyllochron.BasePhyllochron.FixedValue = 100
            Cultivar EGAGregory
              Command:
                [Phenology].MinimumLeafNumber.FixedValue = 6
                [Phenology].VrnSensitivity.FixedValue = 1
                [Phenology].PpSensitivity.FixedValue = 4
                [Structure].Phyllochron.BasePhyllochron.FixedValue = 100
              Alias Gregory
              Alias Lancer
            Cultivar GattonHartog
              Command:
                [Phenology].MinimumLeafNumber.FixedValue = 8
                [Phenology].VrnSensitivity.FixedValue = 0
                [Phenology].PpSensitivity.FixedValue = 4
            Cultivar Gamenya
              Command:
                [Phenology].MinimumLeafNumber.FixedValue = 5
                [Phenology].VrnSensitivity.FixedValue = 0
                [Phenology].PpSensitivity.FixedValue = 3.5
                [Structure].Phyllochron.BasePhyllochron.FixedValue = 100
                [Phenology].EarlyReproductivePpSensitivity.FixedValue = 0
                [Phenology].EarlyReproductiveLongDayBase.FixedValue
            Cultivar Gauntlet
              Command:
                [Phenology].MinimumLeafNumber.FixedValue = 5
                [Phenology].VrnSensitivity.FixedValue = 0
                [Phenology].PpSensitivity.FixedValue = 4
                [Structure].Phyllochron.BasePhyllochron.FixedValue = 100
              Alias Braewood
              Alias Chara
              Alias Clearfield_stl
              Alias Drysdale
              Alias Envoy
              Alias Estoc
              Alias Giles
              Alias Harper
              Alias Krichauff
              Alias Magenta
              Alias Mitch
              Alias Phantom
              Alias Pugsley
              Alias Sentinel
              Alias Silverstar
              Alias Suneca
              Alias Sunlin
              Alias Sunvale
              Alias Trojan
              Alias Strzelecki
            Cultivar Gladius
              Command:
                [Phenology].MinimumLeafNumber.FixedValue = 6
                [Phenology].VrnSensitivity.FixedValue = 0
                [Phenology].PpSensitivity.FixedValue = 5
                [Structure].Phyllochron.BasePhyllochron.FixedValue = 100
            Cultivar Gutha
              Command:
                [Phenology].MinimumLeafNumber.FixedValue = 6
                [Phenology].VrnSensitivity.FixedValue = 0
                [Phenology].PpSensitivity.FixedValue = 5
                [Structure].Phyllochron.BasePhyllochron.FixedValue = 100
                [Grain].MaximumPotentialGrainSize.FixedValue = 0.041
                [Grain].NumberFunction.GrainNumber.GrainsPerGramOfStem.FixedValue = 17
            Cultivar H45
              Command:
                [Phenology].MinimumLeafNumber.FixedValue = 6
                [Phenology].VrnSensitivity.FixedValue = 0
                [Phenology].PpSensitivity.FixedValue = 4
                [Structure].Phyllochron.BasePhyllochron.FixedValue = 100
                [Grain].NumberFunction.GrainNumber.GrainsPerGramOfStem.FixedValue = 20
              Alias Saintly
              Alias Tamarinrock
              Alias Waagin
              Alias Wollaroi
              Alias Zippy
            Cultivar H46
              Command:
                [Phenology].MinimumLeafNumber.FixedValue = 8
                [Phenology].VrnSensitivity.FixedValue = 0
                [Phenology].PpSensitivity.FixedValue = 4
                [Structure].Phyllochron.BasePhyllochron.FixedValue = 100
            Cultivar Hartog
              Command:
                [Phenology].MinimumLeafNumber.FixedValue = 6
                [Phenology].VrnSensitivity.FixedValue = 0
                [Phenology].PpSensitivity.FixedValue = 5
                [Structure].Phyllochron.BasePhyllochron.FixedValue = 100
                [Grain].MaximumPotentialGrainSize.FixedValue = 0.041
              Alias Annuello
              Alias Carnamah
              Alias Catalina
              Alias CLF_Stiletto
              Alias Cobra
              Alias Corack
              Alias Correll
              Alias Diamondbird
              Alias Gladius
              Alias Goroke
              Alias GrenadeCLPlus
              Alias Guardian
              Alias Halbred
              Alias Impala
              Alias Justica
              Alias Kord
              Alias Merlin
              Alias Mitre
              Alias Peake
              Alias Shield
              Alias Spitfire
              Alias Sunguard
              Alias Sunstate
              Alias Yallaroi
              Alias Yawa
              Alias Yitpi
            Cultivar Hibred_Mercury
              Command:
                [Phenology].MinimumLeafNumber.FixedValue = 6
                [Phenology].VrnSensitivity.FixedValue = 0
                [Phenology].PpSensitivity.FixedValue = 4
                [Structure].Phyllochron.BasePhyllochron.FixedValue = 100
              Alias Agtscythe
              Alias Arrino
              Alias Bonnie_rock
              Alias Bowerbird
              Alias Condo
              Alias Dart
              Alias Dollarbird
              Alias Emurock
              Alias Hyperno
              Alias ImposeCLPlus
              Alias Kalka
              Alias Kirchauff
              Alias Kukri
              Alias Hunter
              Alias LRPBArrow
              Alias Mace
              Alias Ouyen
              Alias Ruby
              Alias Tamaroi
              Alias Young
              Alias Katana
            Cultivar Janz
              Command:
                [Phenology].MinimumLeafNumber.FixedValue = 6
                [Phenology].VrnSensitivity.FixedValue = 1
                [Phenology].PpSensitivity.FixedValue = 4
                [Structure].Phyllochron.BasePhyllochron.FixedValue = 100
            Cultivar Kelallac
              Command:
                [Phenology].MinimumLeafNumber.FixedValue = 8
                [Phenology].VrnSensitivity.FixedValue = 0
                [Phenology].PpSensitivity.FixedValue = 4
                [Structure].Phyllochron.BasePhyllochron.FixedValue = 100
              Alias Beaufort
              Alias Calingiri
              Alias Endure
              Alias Forrest
              Alias Scenario
              Alias Zen
            Cultivar Kennedy
              Command:
                [Phenology].MinimumLeafNumber.FixedValue = 8
                [Phenology].VrnSensitivity.FixedValue = 0
                [Phenology].PpSensitivity.FixedValue = 4
                [Structure].Phyllochron.BasePhyllochron.FixedValue = 100
            Cultivar Lang
              Command:
                [Phenology].MinimumLeafNumber.FixedValue = 6
                [Phenology].VrnSensitivity.FixedValue = 0
                [Phenology].PpSensitivity.FixedValue = 5
                [Structure].Phyllochron.BasePhyllochron.FixedValue = 100
            Cultivar Livingston
              Command:
                [Phenology].MinimumLeafNumber.FixedValue = 5
                [Phenology].VrnSensitivity.FixedValue = 0
                [Phenology].PpSensitivity.FixedValue = 4
                [Structure].Phyllochron.BasePhyllochron.FixedValue = 100
            Cultivar Lincoln
              Command:
                [Phenology].MinimumLeafNumber.FixedValue = 6
                [Phenology].VrnSensitivity.FixedValue = 0
                [Phenology].PpSensitivity.FixedValue = 4
                [Structure].Phyllochron.BasePhyllochron.FixedValue = 100
              Alias Crusader
            Cultivar Mace
              Command:
                [Phenology].MinimumLeafNumber.FixedValue = 6
                [Phenology].VrnSensitivity.FixedValue = 0
                [Phenology].PpSensitivity.FixedValue = 4
                [Structure].Phyllochron.BasePhyllochron.FixedValue = 100
            Cultivar MacKellar
              Command:
                [Phenology].MinimumLeafNumber.FixedValue = 7
                [Phenology].VrnSensitivity.FixedValue = 5
                [Phenology].PpSensitivity.FixedValue = 5
                [Phenology].EarlyReproductiveLongDayBase.FixedValue = 3.5
                [Structure].Phyllochron.BasePhyllochron.FixedValue = 100
              Alias Adagio
              Alias Brennan
              Alias Declic
              Alias Revenue
            Cultivar Matong
              Command:
                [Phenology].MinimumLeafNumber.FixedValue = 7
                [Phenology].VrnSensitivity.FixedValue = 1
                [Phenology].PpSensitivity.FixedValue = 4
                [Structure].Phyllochron.BasePhyllochron.FixedValue = 100
                [Grain].NumberFunction.GrainNumber.GrainsPerGramOfStem.FixedValue = 22
            Cultivar McCubbin
              Command:
                [Phenology].MinimumLeafNumber.FixedValue = 8
                [Phenology].VrnSensitivity.FixedValue = 0
                [Phenology].PpSensitivity.FixedValue = 5
                [Structure].Phyllochron.BasePhyllochron.FixedValue = 90
            Cultivar Mercury
              Command:
                [Phenology].MinimumLeafNumber.FixedValue = 7
                [Phenology].VrnSensitivity.FixedValue = 0
                [Phenology].PpSensitivity.FixedValue = 4
                [Phenology].EarlyReproductiveLongDayBase.FixedValue = 3.5
                [Structure].Phyllochron.BasePhyllochron.FixedValue = 80
            Cultivar Ruby
              Command:
                [Phenology].MinimumLeafNumber.FixedValue = 8
                [Phenology].VrnSensitivity.FixedValue = 0
                [Phenology].PpSensitivity.FixedValue = 4
                [Structure].Phyllochron.BasePhyllochron.FixedValue = 100
            Cultivar Spear
              Command:
                [Phenology].MinimumLeafNumber.FixedValue = 7
                [Phenology].VrnSensitivity.FixedValue = 0
                [Phenology].PpSensitivity.FixedValue = 4
                [Structure].Phyllochron.BasePhyllochron.FixedValue = 100
                [Grain].MaximumPotentialGrainSize.FixedValue = 0.045
            Cultivar Sunbri
              Command:
                [Phenology].MinimumLeafNumber.FixedValue = 7
                [Phenology].VrnSensitivity.FixedValue = 0
                [Phenology].PpSensitivity.FixedValue = 5
                [Structure].Phyllochron.BasePhyllochron.FixedValue = 100
            Cultivar Sunco
              Command:
                [Phenology].MinimumLeafNumber.FixedValue = 6.5
                [Phenology].VrnSensitivity.FixedValue = 0
                [Phenology].PpSensitivity.FixedValue = 3.5
                [Phenology].EarlyReproductivePpSensitivity.FixedValue = 4
                [Structure].Phyllochron.BasePhyllochron.FixedValue = 100
              Alias Advantage
              Alias Bellaroi
              Alias Caparoi
              Alias Ellison
              Alias Suntop
            Cultivar Ventura
              Command:
                [Phenology].MinimumLeafNumber.FixedValue = 8
                [Phenology].VrnSensitivity.FixedValue = 0
                [Phenology].PpSensitivity.FixedValue = 4
                [Structure].Phyllochron.BasePhyllochron.FixedValue = 100
            Cultivar Wedgetail
              Command:
                [Phenology].MinimumLeafNumber.FixedValue = 8
                [Phenology].VrnSensitivity.FixedValue = 0
                [Phenology].PpSensitivity.FixedValue = 4
                [Structure].Phyllochron.BasePhyllochron.FixedValue = 100
              Alias Lorikeet
              Alias Rosella
              Alias Whistler
              Alias Wylah
              Alias Eaglehawk
            Cultivar Westonia
              Command:
                [Phenology].MinimumLeafNumber.FixedValue = 5
                [Phenology].VrnSensitivity.FixedValue = 0
                [Phenology].PpSensitivity.FixedValue = 4
                [Structure].Phyllochron.BasePhyllochron.FixedValue = 100
            Cultivar Wilgoyne
              Command:
                [Phenology].MinimumLeafNumber.FixedValue = 6
                [Phenology].VrnSensitivity.FixedValue = 0
                [Phenology].PpSensitivity.FixedValue = 4
                [Structure].Phyllochron.BasePhyllochron.FixedValue = 100
                [Grain].NumberFunction.GrainNumber.GrainsPerGramOfStem.FixedValue = 20
                [Grain].MaximumPotentialGrainSize.FixedValue = 0.045
            Cultivar Wyalkatchem
              Command:
                [Phenology].MinimumLeafNumber.FixedValue = 8
                [Phenology].VrnSensitivity.FixedValue = 0
                [Phenology].PpSensitivity.FixedValue = 4
                [Structure].Phyllochron.BasePhyllochron.FixedValue = 100
            Cultivar Yitpi
              Command:
                [Phenology].MinimumLeafNumber.FixedValue = 8
                [Phenology].VrnSensitivity.FixedValue = 0
                [Phenology].PpSensitivity.FixedValue = 5
                [Phenology].EarlyReproductiveLongDayBase.FixedValue = 2.5
                [Phenology].EarlyReproductivePpSensitivity.FixedValue = 5
                [Structure].Phyllochron.BasePhyllochron.FixedValue = 80
            Cultivar Young
              Command:
                [Phenology].MinimumLeafNumber.FixedValue = 8
                [Phenology].VrnSensitivity.FixedValue = 0
                [Phenology].PpSensitivity.FixedValue = 4
                [Structure].Phyllochron.BasePhyllochron.FixedValue = 100
          CultivarFolder Turkey
            Cultivar Konya
              Command:
                [Phenology].MinimumLeafNumber.FixedValue = 7
                [Phenology].VrnSensitivity.FixedValue = 4
                [Phenology].PpSensitivity.FixedValue = 4
                [Structure].Phyllochron.BasePhyllochron.FixedValue = 100
                [Grain].NumberFunction.GrainNumber.GrainsPerGramOfStem.FixedValue = 16
                [Grain].MaximumPotentialGrainSize.FixedValue = 0.050
                [Grain].MaximumNConc.FixedValue = 0.026
                [Phenology].GrainFilling.Target.FixedValue = 450
                [Stem].DMRetranslocationFactor.ReproductiveGrowth.DMRetranslocationFactor.FixedValue = 0.2
                [Stem].StructuralFraction.VegetativeGrowth.Fraction.FixedValue = 0.6
                [Leaf].ExtinctionCoeff.VegetativePhase.FixedValue = 0.8
          CultivarFolder China
            Cultivar Keyu13
              Command:
                [Phenology].MinimumLeafNumber.FixedValue = 7
                [Phenology].VrnSensitivity.FixedValue = 5
                [Phenology].PpSensitivity.FixedValue = 3
                [Structure].Phyllochron.BasePhyllochron.FixedValue = 100
          CultivarFolder USA
            Cultivar Yecora
              Command:
                [Phenology].MinimumLeafNumber.FixedValue = 6
                [Phenology].VrnSensitivity.FixedValue = 0
                [Phenology].PpSensitivity.FixedValue = 4
                [Structure].Phyllochron.BasePhyllochron.FixedValue = 90
                [Leaf].CohortParameters.MaxArea.AreaLargestLeaves.FixedValue = 4000
            Cultivar Rex
              Command:
                [Phenology].MinimumLeafNumber.FixedValue = 7
                [Phenology].VrnSensitivity.FixedValue = 6
                [Phenology].PpSensitivity.FixedValue = 4
                [Grain].NumberFunction.GrainNumber.GrainsPerGramOfStem.FixedValue = 18
                [Grain].MaximumNConc.FixedValue = 0.02
            Cultivar Nugaines
              Command:
                [Phenology].MinimumLeafNumber.FixedValue = 7
                [Phenology].VrnSensitivity.FixedValue = 6
                [Phenology].PpSensitivity.FixedValue = 4
                [Grain].NumberFunction.GrainNumber.GrainsPerGramOfStem.FixedValue = 20
                [Grain].MaximumNConc.FixedValue = 0.02
            Cultivar Hyslop
              Command:
                [Phenology].MinimumLeafNumber.FixedValue = 7
                [Phenology].VrnSensitivity.FixedValue = 6
                [Phenology].PpSensitivity.FixedValue = 4
                [Grain].NumberFunction.GrainNumber.GrainsPerGramOfStem.FixedValue = 22
                [Grain].MaximumNConc.FixedValue = 0.02
            Cultivar Stephens
              Command:
                [Phenology].MinimumLeafNumber.FixedValue = 7
                [Phenology].VrnSensitivity.FixedValue = 6
                [Phenology].PpSensitivity.FixedValue = 4
                [Grain].NumberFunction.GrainNumber.GrainsPerGramOfStem.FixedValue = 25
                [Grain].MaximumNConc.FixedValue = 0.02
          CultivarFolder Europe
            Cultivar Dekan
              Command:
                [Phenology].MinimumLeafNumber.FixedValue = 9
                [Phenology].VrnSensitivity.FixedValue = 7
                [Phenology].PpSensitivity.FixedValue = 3
                [Phenology].EarlyReproductivePpSensitivity.FixedValue = 3
                [Structure].Phyllochron.BasePhyllochron.FixedValue = 100
                [Leaf].ExtinctionCoeff.VegetativePhase.FixedValue = 0.8
            Cultivar Rosario
              Command:
                [Phenology].MinimumLeafNumber.FixedValue = 9
                [Phenology].VrnSensitivity.FixedValue = 7
                [Phenology].PpSensitivity.FixedValue = 3
                [Phenology].EarlyReproductivePpSensitivity.FixedValue = 3
                [Structure].Phyllochron.BasePhyllochron.FixedValue = 100
                [Leaf].ExtinctionCoeff.VegetativePhase.FixedValue = 0.8
            Cultivar Ararat
              Command:
                [Phenology].MinimumLeafNumber.FixedValue = 9
                [Phenology].VrnSensitivity.FixedValue = 7
                [Phenology].PpSensitivity.FixedValue = 3
                [Phenology].EarlyReproductivePpSensitivity.FixedValue = 3
                [Structure].Phyllochron.BasePhyllochron.FixedValue = 100
                [Leaf].ExtinctionCoeff.VegetativePhase.FixedValue = 0.8
          CultivarFolder Africa
            Cultivar HAR1685
              Command:
                [Phenology].MinimumLeafNumber.FixedValue = 7
                [Phenology].VrnSensitivity.FixedValue = 0
                [Phenology].PpSensitivity.FixedValue = 3
                [Structure].Phyllochron.BasePhyllochron.FixedValue = 100
                [Grain].NumberFunction.GrainNumber.GrainsPerGramOfStem.FixedValue = 17
                [Phenology].GrainFilling.Target.FixedValue = 350
          CultivarFolder Iran
            Cultivar Gorgan
              Command:
                [Phenology].MinimumLeafNumber.FixedValue = 7
                [Phenology].VrnSensitivity.FixedValue = 0
                [Phenology].PpSensitivity.FixedValue = 4
                [Structure].Phyllochron.BasePhyllochron.FixedValue = 100
      LifeCycle: InitialPopulation=[1, 0]
        LifeStage Egg
          Memo
            **Larva I**

            Lives on or near the soil surface and litter layer

            Development driven by thermal time

            Mortality:

            - too dry

            - too hot

            - predation (ants, beetles)

            Develops to Larva I
          LifeStageProcess EggDevelopment: ProcessAction=1; TransferTo=LarvaI
            AirTemperatureFunction EggThermalTimeDevelopment
              XYPairs: X=[0.1, 10, 20, 30, 34]; Y=[0, 0, 0.1, 0.2, 0]
          LifeStageProcess EggMaturation: ProcessAction=0; TransferTo=LarvaI
            LinearInterpolationFunction TransferToLarvaI: XProperty=[Egg].CurrentCohort.PhysiologicalAge
              XYPairs: X=[0, 0.99, 1, 2]; Y=[0, 0, 1, 1]
          LifeStageProcess EggMortality: ProcessAction=2
            LinearInterpolationFunction LowTempMortality: XProperty=[Weather].MinT
              XYPairs: X=[-16, 0, 4]; Y=[1, 0.2, 0]
            LinearInterpolationFunction HighTempMortality: XProperty=[Weather].MaxT
              XYPairs: X=[34, 44, 54]; Y=[0, 0.5, 1]
            LinearInterpolationFunction SoilHIghLowMoistureMortality: XProperty=SoilWaterScale
              SoilWaterScale
              XYPairs: X=[0, 0.1, 1, 1.5, 2]; Y=[1, 0, 0, 0, 1]
        LifeStage LarvaI
          Memo
            **Larva I**

            Lives in the nodules

            Eats nodules

            Development driven by thermal time

            Mortality:

            - nodule availability

            - predation unknown

            - disease minimal as protected by the nodule

            Develop to Larva II
          LifeStageProcess LarvaIDevelopment: ProcessAction=1; TransferTo=LarvaII
            AirTemperatureFunction LarvaIThermalTimeDevelopment
              XYPairs: X=[0.1, 10, 20, 30, 34]; Y=[0, 0, 0.1, 0.2, 0]
            ExpressionFunction: Expression=([Soil].Temperature[1] - 4.3) * 0.014
              Memo
                Just taken from https://doi.org/10.1016/j.ecolmodel.2006.11.013
          LifeStageProcess LarvaIMaturation: ProcessAction=0; TransferTo=LarvaII
            LinearInterpolationFunction TransferToLarvaII: XProperty=[LarvaI].CurrentCohort.PhysiologicalAge
              XYPairs: X=[0, 0.99, 1, 2]; Y=[0, 0, 1, 1]
          LifeStageProcess LarvaIMortality: same as CRW_base.Field.LifeCycle.Egg.EggMortality
        LifeStage LarvaII
          Memo
            **Larva II**

            Migrates from the nodules to the soil near the root system

            Eats nodules and roots

            Development driven by thermal time and food availability (latter not yet implemented)

            Mortality from:

            - too hot

            - too dry

            - too wet

            - predation (beetles)

            - disease (general)

            Develop to Larva III
          LifeStageProcess LarvaIIDevelopment: ProcessAction=1; TransferTo=Larva_II
            AirTemperatureFunction LarvaIIThermalTimeDevelopment
              XYPairs: X=[0.1, 10, 20, 30, 34]; Y=[0, 0, 0.1, 0.2, 0]
          LifeStageProcess LarvaIIMaturation: ProcessAction=0; TransferTo=LarvaIII
            LinearInterpolationFunction TransferToLarvaIII: XProperty=[LarvaII].CurrentCohort.PhysiologicalAge
              XYPairs: X=[0, 0.99, 1, 2]; Y=[0, 0, 1, 1]
          LifeStageProcess LarvaIIMortality: ProcessAction=2
            LinearInterpolationFunction LowTempMortality: XProperty=[Weather].MinT
              XYPairs: X=[-16, 0, 4]; Y=[1, 0.2, 0]
            LinearInterpolationFunction HighTempMortality: XProperty=[Weather].MaxT
              XYPairs: X=[34, 44, 54]; Y=[0, 0.5, 1]
            LinearAfterThresholdFunction DensityDependentMortality: XProperty=[LifeCycle].LarvaII.TotalPopulation; XTrigger=1000; Slope=1e-06
            LinearInterpolationFunction SoilHIghLowMoistureMortality: XProperty=SoilWaterScale
              SoilWaterScale
              XYPairs: X=[0, 0.1, 1, 1.5, 2]; Y=[1, 0, 0, 0, 1]
        LifeStage LarvaIII
          Memo
            **Larva III**

            Free living in the soil

            Eats roots and below-ground (not aerial) stolons

            Development driven by thermal time and food availability (latter not yet implemented)

            Mortality from:

            - too hot

            - too dry

            - too wet

            - predation (beetles, wire worm, ants)

            - disease (general, population dependent and seasonal with higher values in autumn)

            Develop to Larva IV
          LifeStageProcess LarvaIIIDevelopment: ProcessAction=1; TransferTo=Larva_II
            AirTemperatureFunction LarvaIIIThermalTimeDevelopment
              XYPairs: X=[0.1, 10, 20, 30, 34]; Y=[0, 0, 0.1, 0.2, 0]
          LifeStageProcess LarvaIIIMaturation: ProcessAction=0; TransferTo=LarvaIV
            LinearInterpolationFunction TransferToLarvaIV: XProperty=[LarvaIII].CurrentCohort.PhysiologicalAge
              XYPairs: X=[0, 0.99, 1, 2]; Y=[0, 0, 1, 1]
          LifeStageProcess LarvaIIIMortality: ProcessAction=2
            LinearInterpolationFunction LowTempMortality: XProperty=[Weather].MinT
              XYPairs: X=[-16, 0, 4]; Y=[1, 0.2, 0]
            LinearInterpolationFunction HighTempMortality: XProperty=[Weather].MaxT
              XYPairs: X=[34, 44, 54]; Y=[0, 0.5, 1]
            LinearAfterThresholdFunction DensityDependentMortality: XProperty=[LifeCycle].LarvaIII.TotalPopulation; XTrigger=1000; Slope=1e-06
            LinearInterpolationFunction SoilHIghLowMoistureMortality: XProperty=SoilWaterScale
              SoilWaterScale
              XYPairs: X=[0, 0.1, 1, 1.5, 2]; Y=[1, 0, 0, 0, 1]
        LifeStage LarvaIV
          Memo
            **Larva IV**

            Free living in the soil - size?

            Eats roots, below-ground (not aerial) stolons

            Development driven by thermal time and food availability (latter not yet implemented)

            Mortality from:

            - too hot

            - too dry

            - too wet

            - predation (beetles, wire worm, ants)

            - disease (general, population dependent and seasonal with higher values in autumn)

            Develop to Pupa
          LifeStageProcess LarvaIVDevelopment: ProcessAction=1; TransferTo=Pupa
            AirTemperatureFunction LarvaIVThermalTimeDevelopment
              XYPairs: X=[0.1, 10, 20, 30, 34]; Y=[0, 0, 0.1, 0.2, 0]
          LifeStageProcess LarvaIVMaturation: ProcessAction=0; TransferTo=Pupa
            LinearInterpolationFunction TransferToPupa: XProperty=[LarvaIV].CurrentCohort.PhysiologicalAge
              XYPairs: X=[0, 0.99, 1, 2]; Y=[0, 0, 1, 1]
          LifeStageProcess LarvaIVMortality: ProcessAction=2
            LinearInterpolationFunction LowTempMortality: XProperty=[Weather].MinT
              XYPairs: X=[-16, 0, 4]; Y=[1, 0.2, 0]
            LinearInterpolationFunction HighTempMortality: XProperty=[Weather].MaxT
              XYPairs: X=[34, 44, 54]; Y=[0, 0.5, 1]
            LinearAfterThresholdFunction DensityDependentMortality: XProperty=[LifeCycle].LarvaIV.TotalPopulation; XTrigger=1000; Slope=1e-06
            LinearInterpolationFunction SoilHIghLowMoistureMortality: XProperty=SoilWaterScale
              SoilWaterScale
              XYPairs: X=[0, 0.1, 1, 1.5, 2]; Y=[1, 0, 0, 0, 1]
        LifeStage Pupa
          Memo
            **Pupa**

            Eathern cell in the soil so well-protected - size?

            Not eating

            Development driven by thermal time

            Mortality from:

            - too wet

            - too dry

            - disease (general, population dependent and seasonal with higher values in autumn)

            Develop to Adult
          LifeStageProcess PupaDevelopment: ProcessAction=1; TransferTo=Adult
            AirTemperatureFunction PupaThermalTimeDevelopment
              XYPairs: X=[0.1, 10, 20, 30, 34]; Y=[0, 0, 0.1, 0.2, 0]
          LifeStageProcess PupaMaturation: ProcessAction=0; TransferTo=Adult
            LinearInterpolationFunction TransferToAdult: XProperty=[Pupa].CurrentCohort.PhysiologicalAge
              XYPairs: X=[0, 0.99, 1, 2]; Y=[0, 0, 1, 1]
          LifeStageProcess PupaMortality: same as CRW_base.Field.LifeCycle.Egg.EggMortality
        LifeStage Adult
          Memo
            **Adult**

            Mostly above-ground around the plant (aggregate around clover plants) or on the soil surface,

            Mobility - fly in and fly out (driven by wind/weather)

            Eats clover (white and red) leaves

            Development driven by thermal time and food availability (latter not yet implemented)

            Mortality from:

            - too hot

            - too dry

            - too wet

            - too old

            - predation (beetles, spiders)

            - parasitism (wasp)

            - disease (general, population dependent and seasonal with higher values in autumn)

            Mate frequently

            Lay eggs (broadcast around the plants they feed on)

            Overwinter as adults
          LifeStageProcess AdultMortality: ProcessAction=2
            LinearInterpolationFunction AgeBasedMortality: XProperty=[LifeCycle].CurrentLifeStage.CurrentCohort.PhenoAge
              XYPairs: X=[0, 19.99, 20, 30]; Y=[0, 0, 1, 1]
            LinearAfterThresholdFunction DensityDependentMortality: XProperty=[LifeCycle].Adult.TotalPopulation; XTrigger=1000; Slope=1e-06
            LinearInterpolationFunction LowTempMortality: XProperty=[Weather].MinT
              XYPairs: X=[-16, -4, -2, 0, 1, 2, 3, 4]; Y=[1, 0.4, 0.3, 0.2, 0.15, 0.1, 0.05, 0]
            LinearInterpolationFunction HighTempMortality: XProperty=[Weather].MaxT
              XYPairs: X=[34, 44, 54]; Y=[0, 0.5, 1]
            LinearInterpolationFunction SoilDrynessMortality: XProperty=SoilWaterScale
              SoilWaterScale
              XYPairs: X=[0, 1, 2]; Y=[1, 0, 1]
          LifeStageReproductionProcess ReproductionProcesses: TransferTo=Egg; FecundityFunctionName=Fecundity; ProgenyFunctonName=ProgenyProduction
            LinearAfterThresholdFunction ProgenyProduction: XProperty=[LifeCycle].CurrentLifeStage.CurrentCohort.PhenoAge; XTrigger=8; Slope=0.2
            Constant Fecundity: FixedValue=5
      Report: EventNames=[Clock].DoReport
        VariableNames:
          [Clock].Today
          [LifeCycle].Egg.TotalPopulation
          [LifeCycle].LarvaI.TotalPopulation
          [LifeCycle].LarvaII.TotalPopulation
          [LifeCycle].LarvaIII.TotalPopulation
          [LifeCycle].LarvaIV.TotalPopulation
          [LifeCycle].Pupa.TotalPopulation
          [LifeCycle].Adult.TotalPopulation
  Simulation CRW_active1
    Clock: Start=2000-08-01; End=2002-12-31
    Summary SummaryFile
    Weather: FileName=VCS_Lincoln.met
    SoilArbitrator
    MicroClimate: a_interception=0; b_interception=1; c_interception=0; d_interception=0; soil_albedo=0.3; SoilHeatFluxFraction=0.4; NightInterceptionFraction=0.5; ReferenceHeight=2
    Zone Field: Area=1; Slope=0; AspectAngle=0; Altitude=50
      Fertiliser
      Soil: ASCOrder=Vertosol; ASCSubOrder=Black; SoilType=Clay; Site=Norwin; NearestTown=Norwin; Region=Darling Downs and Granite Belt; State=Queensland; Country=Australia; NaturalVegetation=Qld. Bluegrass, possible Qld. Blue gum; ApsoilNumber=900; Latitude=-27.581836; Longitude=151.320206; LocationAccuracy=+/- 20m
        DataSource=CSIRO Sustainable Ecosystems, Toowoomba; Characteriesd as part of the GRDC funded project"Doing it better, doing it smarter, managing soil water in Australian agriculture' 2011
        Comments=OC, CLL for all crops estimated-based on Bongeen Mywybilla Soil No1
        Physical
          Thickness  BD       AirDry    LL15      DUL       SAT       KS
          150        1.01056  0.13025   0.2605    0.521     0.588655  20
          150        1.07146  0.198689  0.248362  0.496723  0.565677  20
          300        1.09394  0.28      0.28      0.488438  0.557193  20
          300        1.15861  0.28      0.28      0.480297  0.532787  20
          300        1.17301  0.28      0.28      0.471584  0.527354  20
          300        1.16287  0.28      0.28      0.457071  0.53118   20
          300        1.1875   0.28      0.28      0.452332  0.521888  20
          SoilCrop WheatSoil: LL=[0.261, 0.248, 0.28, 0.306, 0.36, 0.392, 0.446]; KL=[0.06, 0.06, 0.06, 0.04, 0.04, 0.02, 0.01]; XF=[1, 1, 1, 1, 1, 1, 1]
        SoilWater: SummerDate=1-Nov; SummerU=5; SummerCona=5; WinterDate=1-Apr; WinterU=5; WinterCona=5; DiffusConst=40; DiffusSlope=16; Salb=0.12; CN2Bare=73; CNRed=20; CNCov=0.8; max_pond=0; Thickness=[150, 150, 300, 300, 300, 300, 300]; SWCON=[0.3, 0.3, 0.3, 0.3, 0.3, 0.3, 0.3]; PrecipitationInterception=0
        SoilNitrogen: fom_types=[default, manure, mucuna, lablab, shemp, stable]; fract_carb=[0.2, 0.3, 0.54, 0.57, 0.45, 0]; fract_cell=[0.7, 0.3, 0.37, 0.37, 0.47, 0.1]; fract_lign=[0.1, 0.4, 0.09, 0.06, 0.08, 0.9]
          SoilNitrogenNO3 NO3
          SoilNitrogenNH4 NH4
          SoilNitrogenUrea Urea
          SoilNitrogenPlantAvailableNO3 PlantAvailableNO3
          SoilNitrogenPlantAvailableNH4 PlantAvailableNH4
        Organic: FOMCNRatio=40
          Thickness  Carbon  SoilCNRatio  FBiom  FInert  FOM
          150        1.2     12           0.04   0.4     347.129
          150        0.96    12           0.02   0.6     270.344
          300        0.6     12           0.02   0.8     163.972
          300        0.3     12           0.02   1       99.4541
          300        0.18    12           0.01   1       60.322
          300        0.12    12           0.01   1       36.5871
          300        0.12    12           0.01   1       22.1912
        Chemical
          Thickness  NO3N  NH4N  PH
          150        1     0.1   8
          150        1     0.1   8
          300        1     0.1   8
          300        1     0.1   8
          300        1     0.1   8
          300        1     0.1   8
          300        1     0.1   8
        InitialWater: PercentMethod=1; FractionFull=1
        Sample InitialN: Thickness=[150, 150, 300, 300, 300, 300, 300]; SWUnits=Volumetric; OCUnits=Total; PHUnits=Water
        CERESSoilTemperature
      SurfaceOrganicMatter: InitialResidueName=wheat_stubble; InitialResidueType=wheat; InitialResidueMass=500; InitialStandingFraction=0; InitialCPR=0; InitialCNR=100; FractionFaecesAdded=0.5
      Plant Wheat: CropType=Wheat; IsEnding=false; DaysAfterEnding=0
        Memo TitlePage
          # The APSIM Wheat Model

          _Brown, H.E., Huth, N.I. and Holzworth, D.P._

          The APSIM wheat model has been developed using the Plant Modelling Framework (PMF) of [brown_plant_2014]. This new framework provides a library of plant organ and process submodels that can be coupled, at runtime, to construct a model in much the same way that models can be coupled to construct a simulation. This means that dynamic composition of lower level process and organ classes (e.g. photosynthesis, leaf) into larger constructions (e.g. maize, wheat, sorghum) can be achieved by the model developer without additional coding.

          The model consists of:

          * a phenology model to simulate development between developmental phases
          * a structure model to simulate plant morphology
          * a collection of organs to simulate the various plant parts
          * an arbitrator to allocate resources (N, biomass) to the various plant organs
        OrganArbitrator Arbitrator
          RelativeAllocation NArbitrator
          RelativeAllocation DMArbitrator
        Phenology
          Memo
            Wheat exhibits a range of developmental responses to environment and these are strongly influences by genotype characteristics.
            Temperature effects development increasing development rates and decreasing phase durations as temperatures increase.  Theset affects are captured by thermal time, .  However, wheat also exhibits vernalisation and photoperiod sensitivities in its Vegetative phase and further photoperiod sensitivity in the EarlyReproducivePhase.  Photoperiod responses are seen as a reduction in the length of a phase for a photoperiod sensitive genotype in response to a longer photoperiod.  Vernalisation responses are more complicated as they are driven by temperature but interact with photoperiod.  For vernalisation sensitive varieties (Winter types) exposure to cool temperatures or short photoperiods during the Vegetative phase will reduce the thermal time duration of the vegetative phase.

            We draw on the Kirby Framework to capture these vernalisation and photoperiod responses.  This framework assumes that the timing of anthesis is a result of the timing of flag leaf and an additional thermal time passage from there to anthesis.  It also assumes the timing of flag leaf is a result of the Final Leaf Number which sets a target, and leaf appearance rate, which sets the rate of progress toward this target.  Leaf appearance rate is a function of Thermal time and a genotype specific Phyllochron which changes with Haun stage as described by [Jamieson_LeafAppearance_1995].

            Final Leaf Number (FLN) is modeled as the sum of three numbers:

            FLN = MinLeafNumber + VernalLeaves + PhotoLeaves

            Where MinLeafNumber is the number of leaves that a wheat crop will produce when vernalisation is satisified early in the crops duration (before 2nd true leaf) and it is grown in a long photoperiod..  VernalLeaves are the number of leaves that are added due to vernalisation effects.  For insensitive varieties this will always be zero but this is potentially a larger number for sensitivie varieties and the number progresively decreases as the crop encounters more vernalisation.  PhotoLeaves are the number of leaves that are added to the minimum leaf number as a result of short day exposure.  For insensitive varieties this will be zero but is potential larger for more sensitivie varieties and decreases as day length increases.  More detailed explinations of the components of phenology are provided below.
          DivideFunction MeanTemp
            AddFunction TempSum
              VariableReference MaxT: VariableName=[IWeather].MaxT
              VariableReference MinT: VariableName=[IWeather].MinT
            Constant Two: FixedValue=2
          AirTemperatureFunction ThermalTime
            XYPairs: X=[0, 26, 37]; Y=[0, 26, 0]
            Memo
              Thermal time determines the rate of developmental progress through many of the crops phases and is used by organs to determing potential growth rates.
          MultiplyFunction DailyVernalisation
            Memo
              Vernalisation responses are based on those described by [Brown_Anthesis_2013].   Vernalisation is assumed to be related to the expression of the Vrn1 Gene.  Its experssion is accumulated daily and daily upregulation as a function of development (DeltaHaunStage) and a TempResponseProfile that declines exponentially from a maximum at 1<sup>o</sup>C to zero at 0<sup>o</sup>C and at 18<sup>o</sup>C.
            VariableReference DeltaHaunStage: VariableName=[Structure].DeltaHaunStage
            AirTemperatureFunction TempResponseProfile
              XYPairs
                X=[0, 1, 2, 3, 4, 5, 6, 7, 8, 9, 10, 11, 12, 13, 14, 15, 16, 17, 18, 19, 20, 30, 32]
                Y=[0, 1.205, 1.037, 0.893, 0.768, 0.661, 0.569, 0.49, 0.422, 0.363, 0.312, 0.269, 0.231, 0.199, 0.171, 0.148, 0.127, 0.109, 0.094, 0.081, 0, 0, -0.5]
          PhotoperiodFunction Photoperiod: Twilight=-6; DayLength=0
          PhaseLookup PerceivedPhotoPeriod
            PhaseLookupValue ApexBelowGround: Start=Germination; End=Emergence
              Constant Photoperiod: FixedValue=0; Units=h
            PhaseLookupValue ApexAboveGround: Start=Emergence; End=HarvestRipe
              VariableReference Photoperiod: VariableName=[Phenology].Photoperiod.Value()
          MinimumFunction Vrn1
            Memo
              Vrn1 accumulation begins when Vrn4 experssion is down regulated to zero and stops, assuming vernalisation saturation, at a value of 1
            Constant Saturation: FixedValue=1; Units=Relative Experssion
            AccumulateFunction CurrentExpression: StartStageName=Germination; EndStageName=TerminalSpikelet; FractionRemovedOnCut=0; FractionRemovedOnHarvest=0; FractionRemovedOnGraze=0; FractionRemovedOnPrune=0
              LessThanFunction Vernalisation
                VariableReference If_Vrn4: VariableName=[Phenology].Vrn4.Value()
                VariableReference IsLessThanLag: VariableName=[Phenology].VernLag.Value()
                Constant Return_Zero: FixedValue=0
                VariableReference elseReturn_Vernalisation: VariableName=[Phenology].DailyVernalisation.Value()
          MinimumFunction Vrn4
            VariableReference MaxExpression: VariableName=[Phenology].VernLag.Value()
            AccumulateFunction CurrentExpression: StartStageName=Germination; EndStageName=TerminalSpikelet; FractionRemovedOnCut=0; FractionRemovedOnHarvest=0; FractionRemovedOnGraze=0; FractionRemovedOnPrune=0
              VariableReference VernalisationConditioning: VariableName=[Phenology].DailyVernalisation.Value()
          Constant MinimumLeafNumber: FixedValue=7; Units=Leaves
            Memo
              Number of leaves the plant will produce when fully vernalised early and grown in long photoperiod
          Constant VrnSensitivity: FixedValue=0; Units=Leaves
            Memo
              The difference between Inherent earlyness leaf number and the number of leaves produced when the plant is unvernalised and grown in long photoperiod
          Constant VernLag: FixedValue=1; Units=Unitless
            Memo
              The amount of vernalising temperature required before vernalisation response will be evident.  Value of relative to the amount offl vernalisation temperature required from the end of the lag until vernalisation saturation.  A value of 0 means there is no lag, a value of 1 means the lag is the same (in vernal time) as the vernalisation requirement and a value of 2 means the lag is twice as long as the vernalisation response phase
          Constant PpSensitivity: FixedValue=3; Units=Leaves
            Memo
              The reduction in leaf number going from 8 to 16 h Pp
          Constant EarlyReproductivePpSensitivity: FixedValue=0
            Memo
              The phyllochrons duration for the plant to go from flag leaf ligual appearance at 16 h Pp compared to the phyllochron duration for the same phase at 8 h Pp.
          Constant EarlyReproductiveLongDayBase: FixedValue=2.5
            Memo
              The phyllochrons duration for the plant to go from flag leaf ligual appearance at 16 h Pp.
          GerminatingPhase Germinating: Start=Sowing; End=Germination
          EmergingPhase Emerging: ShootLag=40; ShootRate=1.5; Start=Germination; End=Emergence; TTForTimeStep=0
            VariableReference ThermalTime: VariableName=[Phenology].ThermalTime.Value()
          NodeNumberPhase Vegetative: Start=Emergence; End=TerminalSpikelet
            VariableReference ThermalTime: VariableName=[Phenology].ThermalTime.Value()
            VariableReference CompletionNodeNumber: VariableName=[Structure].HaunStageTerminalSpikelet.Value()
          LeafAppearancePhase StemElongation: Start=TerminalSpikelet; End=FlagLeaf
            Memo
              The Final leaf number is fixed at Terminal Spikelet and leaves contune to appear at a rate set by thermal time and phyllochron until flag leaf liguale appears and this phase is completed.
            VariableReference ThermalTime: VariableName=[Phenology].ThermalTime.Value()
          GenericPhase EarlyReproductive: Start=FlagLeaf; End=Flowering
            VariableReference Progression: VariableName=[Phenology].ThermalTime.Value()
            MultiplyFunction Target
              VariableReference Phyllochron: VariableName=[Structure].Phyllochron.BasePhyllochron.Value()
              AddFunction Phyllochrons
                VariableReference LongDayBase: VariableName=[Phenology].EarlyReproductiveLongDayBase.Value()
                MultiplyFunction IncreaseDueToShortPhotoPeriod
                  LinearInterpolationFunction PhotoPeriodResponse: XProperty=[Phenology].Photoperiod.Value()
                    XYPairs: X=[11, 16]; Y=[1, 0]
                  VariableReference PpSensitivity: VariableName=[Phenology].EarlyReproductivePpSensitivity.Value()
          GenericPhase GrainDevelopment: Start=Flowering; End=StartGrainFill
            Constant Target: FixedValue=120
            VariableReference Progression: VariableName=[Phenology].ThermalTime.Value()
          GenericPhase GrainFilling: Start=StartGrainFill; End=EndGrainFill
            Constant Target: FixedValue=545
            VariableReference Progression: VariableName=[Phenology].ThermalTime.Value()
          GenericPhase Maturing: Start=EndGrainFill; End=Maturity
            Constant Target: FixedValue=35
            VariableReference Progression: VariableName=[Phenology].ThermalTime.Value()
          GenericPhase Ripening: Start=Maturity; End=HarvestRipe
            Constant Target: FixedValue=300
            VariableReference Progression: VariableName=[Phenology].ThermalTime.Value()
          EndPhase ReadyForHarvesting: Start=HarvestRipe; End=Unused
            VariableReference ThermalTime: VariableName=[Phenology].ThermalTime.Value()
          ZadokPMF Zadok
          OnEventFunction FlagLeafDAS: SetEvent=FlagLeaf; ReSetEvent=never
            Memo
              A function is used to provide flowering date as days after sowing(DAS).
            Constant PreEventValue: FixedValue=0
            VariableReference PostEventValue: VariableName=[Phenology].DaysAfterSowing
          OnEventFunction FloweringDAS: SetEvent=Flowering; ReSetEvent=never
            Memo
              A function is used to provide flowering date as days after sowing(DAS).
            Constant PreEventValue: FixedValue=0
            VariableReference PostEventValue: VariableName=[Phenology].DaysAfterSowing
          OnEventFunction MaturityDAS: SetEvent=Maturity; ReSetEvent=never
            Memo
              A function is used to provide maturity date as days after sowing(DAS).
            Constant PreEventValue: FixedValue=0
            VariableReference PostEventValue: VariableName=[Phenology].DaysAfterSowing
        Structure: CohortInitialisationStage=Germination; LeafInitialisationStage=Emergence
          VariableReference ThermalTime: VariableName=[Phenology].ThermalTime.Value()
          MultiplyFunction Phyllochron
            Memo Rational
              This is the thermal time between the emergence of leaf tips.  The model used here is based on [Jamieson_SIRIUS_1998] where leaf appearace could be described by a base phyllochron determined between leaves 2 and 7 and a phyllochron that was 70% of base phyllochron for leaves < 2 and 130% of base phyllochron for leaves > 7
            LinearInterpolationFunction LeafStageFactor: XProperty=[Leaf].AppearedCohortNo
              XYPairs: X=[0, 2, 3, 7, 8, 11, 12]; Y=[0.75, 0.75, 1, 1, 1.4, 1.4, 1.4]
            Constant BasePhyllochron: FixedValue=120; Units=oC.d
            LinearInterpolationFunction PhotoPeriodEffect: XProperty=[Phenology].Photoperiod.Value()
              XYPairs: X=[8, 12, 14]; Y=[1.6, 1, 1]
          MultiplyFunction BranchingRate
            Memo
              Potential branching rate is determined by the commonly observed pattern of tillering in wheat, in which each tiller emerges with the third leaf on its parent axis (e.g. first tiller emerges at the same time as the third leaf on the main stem, the first secondary tiller appears with the third leaf on tiller 1).  This is described as a simple function of main stem leaf number.
            PhaseLookup PotentialBranchingRate
              PhaseLookupValue Vegetative: Start=Emergence; End=TerminalSpikelet
                LinearInterpolationFunction PotentialBranchingRate: XProperty=[Structure].LeafTipsAppeared
                  XYPairs: X=[1, 2, 3, 4, 5, 6, 7, 8]; Y=[0, 0, 1, 2, 4, 7, 12, 20]
              PhaseLookupValue Reproductive: Start=TerminalSpikelet; End=HarvestRipe
                Constant Zero: FixedValue=0
            MinimumFunction StressFactors
              LinearInterpolationFunction NitrogenEffect: XProperty=[Arbitrator].FN
                Memo
                  Inadequate Nitrogen supply is assumed to affect tillering prior to any effect on photosynthesis or leaf size.
                XYPairs: X=[0.5, 2, 3]; Y=[0, 1, 1]
              LinearInterpolationFunction CoverEffect: XProperty=[Leaf].CoverTotal
                Memo
                  Tillering is said to cease once a threshold fraction of incoming radiation has been achieved.  This captures shading effects on tillering described by [evers2006cessation].
                XYPairs: X=[0, 0.1, 0.25]; Y=[1, 1, 0]
              LinearInterpolationFunction WaterStressEffect: XProperty=[Root].WaterTensionFactor
                XYPairs: X=[0, 1]; Y=[0, 1]
          PhaseLookup BranchMortality
            PhaseLookupValue MortalityPhase: Start=FlagLeaf; End=Flowering
              MultiplyFunction Mortality
                LinearInterpolationFunction MortalityPerDegDay: XProperty=[Structure].MeanTillerGrowthRate.Value()
                  XYPairs: X=[0, 0.005]; Y=[0.002, 0]
                VariableReference ThermalTime: VariableName=[Phenology].ThermalTime.Value()
          HeightFunction HeightModel
            LinearInterpolationFunction PotentialHeight: XProperty=[Phenology].Stage
              XYPairs: X=[3, 4, 5, 6, 7]; Y=[10, 200, 1000, 1100, 1200]
            LinearInterpolationFunction WaterStress: XProperty=[Leaf].Fw
              XYPairs: X=[0.3, 1]; Y=[0, 1]
          MovingAverageFunction MeanTillerGrowthRate: NumberOfDays=5; StageToStartMovingAverage=Emergence
            Memo
              This is calculated to represent the supply of asslimilate to individual tillers over the past 5 days to use as an index to determine tiller mortality.  When tiller numbers are high or total crop assimilate supply is small there will not be enough assimilate to maintain all of the tillers so the model will senesce some.
            DivideFunction TillerGrowthRate
              VariableReference DailyGrowth: VariableName=[Arbitrator].DM.TotalFixationSupply
              VariableReference ThermalTime: VariableName=[Phenology].ThermalTime.Value()
              VariableReference StemPopulation: VariableName=[Structure].TotalStemPopn
          MovingAverageFunction MeanPhyllochron: NumberOfDays=300; StageToStartMovingAverage=Emergence
            VariableReference Phyllochron: VariableName=[Structure].Phyllochron.Value()
          HoldFunction FinalLeafNumber: WhenToHold=TerminalSpikelet
            AddFunction FinalNodeNumber
              VariableReference MinLeafNumber: VariableName=[Phenology].MinimumLeafNumber.Value()
              MultiplyFunction VernalLeaves
                VariableReference UnVernalisedLeaves: VariableName=[Phenology].VrnSensitivity.Value()
                SubtractFunction VernalisationReductionFactor
                  Constant One: FixedValue=1
                  VariableReference RelativeVrn1Expression: VariableName=[Phenology].Vrn1.Value()
              MultiplyFunction PhotoPLeaves
                VariableReference ShortPpLeaves: VariableName=[Phenology].PpSensitivity.Value()
                LinearInterpolationFunction PhotoPeriodReductionFactor: XProperty=[Phenology].Photoperiod.Value()
                  XYPairs: X=[10, 16]; Y=[1, 0]
          ExpressionFunction HaunStageTerminalSpikelet: Expression=([Structure].FinalLeafNumber.Value() - 2.85)/1.1
            Memo
              The Haun stage at which Terminal Spikelet occurs is determined from final leaf number using the approach described in [Brown_Anthesis_2013].
          AddFunction HaunStage
            VariableReference AppearedLeaves: VariableName=[Leaf].ExpandedCohortNo
            VariableReference ProportionOfExpandingLeaf: VariableName=[Leaf].NextExpandingLeafProportion
          Constant StemSenescenceAge: FixedValue=0
        ReproductiveOrgan Grain: GrowthRespiration=0; MaintenanceRespiration=0; RipeStage=Ripe
          Biomass Live: DMDOfStructural=0.6
          Biomass Dead: DMDOfStructural=0.6
          HoldFunction NumberFunction: WhenToHold=Flowering
            MultiplyFunction GrainNumber
              Constant GrainsPerGramOfStem: FixedValue=26; Units=grains
              VariableReference StemMass: VariableName=[StemPlusSpike].Wt
          Constant DMConversionEfficiency: FixedValue=1
          Constant RemobilisationCost: FixedValue=0
          Constant InitialGrainProportion: FixedValue=0.05
          Constant MaximumPotentialGrainSize: FixedValue=0.05; Units=g
          PhaseLookup DMDemandFunction
            PhaseLookupValue InitialPhase: Start=Flowering; End=StartGrainFill
              FillingRateFunction
                VariableReference NumberFunction: VariableName=[Grain].NumberFunction.Value()
                VariableReference FillingDuration: VariableName=[Phenology].GrainDevelopment.Target.Value()
                VariableReference ThermalTime: VariableName=[Phenology].ThermalTime.Value()
                MultiplyFunction PotentialSizeIncrement
                  VariableReference InitialProportion: VariableName=[Grain].InitialGrainProportion.Value()
                  VariableReference MaximumSize: VariableName=[Grain].MaximumPotentialGrainSize.Value()
            PhaseLookupValue LinearPhase: Start=StartGrainFill; End=EndGrainFill
              FillingRateFunction
                VariableReference NumberFunction: VariableName=[Grain].NumberFunction.Value()
                VariableReference FillingDuration: VariableName=[Phenology].GrainFilling.Target.Value()
                VariableReference ThermalTime: VariableName=[Phenology].ThermalTime.Value()
                MultiplyFunction PotentialSizeIncrement
                  SubtractFunction ProportionLinearPhase
                    Constant One: FixedValue=1
                    VariableReference InitialProportion: VariableName=[Grain].InitialGrainProportion.Value()
                  VariableReference MaximumSize: VariableName=[Grain].MaximumPotentialGrainSize.Value()
          Constant MinimumNConc: FixedValue=0.0123
          Constant MaxNConcDailyGrowth: FixedValue=0.03
          Constant MaximumNConc: FixedValue=0.03
          PhaseLookup NFillingRate
            PhaseLookupValue GrainFilling: Start=Flowering; End=EndGrainFill
              FillingRateFunction
                VariableReference NumberFunction: VariableName=[Grain].NumberFunction.Value()
                AddFunction FillingDuration
                  VariableReference FloweringToGrainFilling: VariableName=[Phenology].GrainDevelopment.Target.Value()
                  VariableReference GrainFilling: VariableName=[Phenology].GrainFilling.Target.Value()
                VariableReference ThermalTime: VariableName=[Phenology].ThermalTime.Value()
                MultiplyFunction PotentialSizeIncrement
                  VariableReference MaximumSize: VariableName=[Grain].MaximumPotentialGrainSize.Value()
                  VariableReference MaximumNConc: VariableName=[Grain].MaximumNConc.Value()
          Constant WaterContent: FixedValue=0.12
          AccumulateFunction AccumThermalTime: StartStageName=Flowering; EndStageName=Maturity; FractionRemovedOnCut=0; FractionRemovedOnHarvest=0; FractionRemovedOnGraze=0; FractionRemovedOnPrune=0
            VariableReference DailyThermalTimeValue: VariableName=[Phenology].ThermalTime.Value()
          ExpressionFunction Protein
            Expression=([Grain].Live.N + [Grain].Dead.N)/([Grain].Live.Wt + [Grain].Dead.Wt) * 100 * 5.71
          BiomassRemoval BiomassRemovalDefaults
            OrganBiomassRemovalType Harvest: FractionLiveToRemove=1; FractionDeadToRemove=0; FractionLiveToResidue=0; FractionDeadToResidue=0
            OrganBiomassRemovalType Cut: FractionLiveToRemove=1; FractionDeadToRemove=0; FractionLiveToResidue=0; FractionDeadToResidue=0
            OrganBiomassRemovalType Prune: FractionLiveToRemove=0; FractionDeadToRemove=0; FractionLiveToResidue=0.8; FractionDeadToResidue=0
            OrganBiomassRemovalType Graze: FractionLiveToRemove=0.6; FractionDeadToRemove=0; FractionLiveToResidue=0.2; FractionDeadToResidue=0
            OrganBiomassRemovalType Thin: FractionLiveToRemove=0; FractionDeadToRemove=0; FractionLiveToResidue=0.05; FractionDeadToResidue=0
          Constant CarbonConcentration: FixedValue=0.4
        Root: GrowthRespiration=0; MaintenanceRespiration=0; RootAngle=45; SWAvailabilityRatio=0
          Constant DMConversionEfficiency: FixedValue=1
          Constant RemobilisationCost: FixedValue=0
          Constant KLModifier: FixedValue=1
          Constant SoilWaterEffect: FixedValue=1
          Constant MaxDailyNUptake: FixedValue=20
          Constant SenescenceRate: FixedValue=0.005
          Constant MaximumRootDepth: FixedValue=1000000
          Constant MaximumNConc: FixedValue=0.01
          Constant MinimumNConc: FixedValue=0.01
          PhaseBasedSwitch NitrogenDemandSwitch: Start=Germination; End=Maturity
          BiomassRemoval BiomassRemovalDefaults
            OrganBiomassRemovalType Harvest: FractionLiveToRemove=0; FractionDeadToRemove=0; FractionLiveToResidue=0.2; FractionDeadToResidue=0
            OrganBiomassRemovalType Cut: FractionLiveToRemove=0; FractionDeadToRemove=0; FractionLiveToResidue=0.3; FractionDeadToResidue=0
            OrganBiomassRemovalType Prune: FractionLiveToRemove=0; FractionDeadToRemove=0; FractionLiveToResidue=0.1; FractionDeadToResidue=0
            OrganBiomassRemovalType Graze: FractionLiveToRemove=0; FractionDeadToRemove=0; FractionLiveToResidue=0.15; FractionDeadToResidue=0
            OrganBiomassRemovalType Thin: FractionLiveToRemove=0; FractionDeadToRemove=0; FractionLiveToResidue=0.05; FractionDeadToResidue=0
          Constant KNO3: FixedValue=0.02
          Constant KNH4: FixedValue=0.01
          Constant InitialDM: FixedValue=0.005; Units=g/plant
          Constant SpecificRootLength: FixedValue=105; Units=m/g
          MultiplyFunction RootFrontVelocity
            PhaseLookup PotentialRootFrontVelocity
              PhaseLookupValue PreEmergence: Start=Germination; End=Emergence
                Constant Value: FixedValue=5; Units=mm/d
              PhaseLookupValue PostEmergence: Start=Emergence; End=Maturity
                Constant Value: FixedValue=20; Units=mm/d
            WeightedTemperatureFunction TemperatureFactor: MaximumTemperatureWeighting=0.5
              XYPairs: X=[0, 15, 25, 35]; Y=[0, 1, 1, 0]
            LinearInterpolationFunction WaterFactor: XProperty=[SoilWaterScale]
              SoilWaterScale
              XYPairs: X=[0, 0.25, 1]; Y=[0, 1, 1]
          LinearInterpolationFunction NUptakeSWFactor: XProperty=[SoilWaterScale]
            SoilWaterScale
            XYPairs: X=[0, 1]; Y=[0, 1]
            Memo
              This is modelled in the same way as the old wheat model where potential N uptake is decreased as the soil dries as described by NUptakeSWFactor
          Constant CarbonConcentration: FixedValue=0.4
          Constant MaintenanceRespirationFunction: FixedValue=0
          BiomassDemand DMDemands
            MultiplyFunction Structural
              PartitionFractionDemandFunction DMDemandFunction
                PhaseLookup PartitionFraction
                  PhaseLookupValue PreEmergence: Start=Germination; End=Emergence
                    Constant Value: FixedValue=0
                  PhaseLookupValue PreFlowering: Start=Emergence; End=Flowering
                    LinearInterpolationFunction AgeFactor: XProperty=[Phenology].Stage
                      XYPairs: X=[3, 4]; Y=[0.5, 0.2]
                  PhaseLookupValue PostFlowering: Start=Flowering; End=EndGrainFill
                    Constant Value: FixedValue=0.2
              Constant StructuralFraction: FixedValue=1
            Constant Metabolic: FixedValue=0
            StorageDMDemandFunction Storage
              SubtractFunction StorageFraction
                Constant One: FixedValue=1
                VariableReference StructuralFraction: VariableName=[Root].DMDemands.Structural.StructuralFraction.Value()
          BiomassDemand NDemands
            MultiplyFunction Structural
              VariableReference MinNconc: VariableName=[Root].minimumNconc.Value()
              VariableReference PotentialDMAllocation: VariableName=[Root].potentialDMAllocation.Structural
            MultiplyFunction Metabolic
              SubtractFunction MetabolicNconc
                VariableReference CritNconc: VariableName=[Root].criticalNConc.Value()
                VariableReference MinNconc: VariableName=[Root].minimumNconc.Value()
              VariableReference PotentialDMAllocation: VariableName=[Root].potentialDMAllocation.Structural
            StorageNDemandFunction Storage
              VariableReference NitrogenDemandSwitch: VariableName=[Root].nitrogenDemandSwitch.Value()
              VariableReference MaxNconc: VariableName=[Root].maximumNconc.Value()
        Leaf: MaxCover=1; Albedo=0.25; Gsmax350=0.011; R50=150; KDead=0.3; MaximumMainStemLeafNumber=30
          zero: CurrentExpandingLeaf, StartFractionExpanded, FractionNextleafExpanded, DeadNodesYesterday, GrowthRespiration, FRGR, PotentialEP, WaterDemand, TipsAtEmergence, CohortsAtInitialisation, FractionDied
          LeafCohort InitialLeaves[1]: Rank=1; Area=200
            zero: NReallocationFactor, DMReallocationFactor, NRetranslocationFactor, DMRetranslocationFactor, ShadeInducedSenRate, SenescedFrac, DeltaPotentialArea, DeltaStressConstrainedArea, DeltaCarbonConstrainedArea, PotentialStructuralDMAllocation, PotentialMetabolicDMAllocation, MetabolicNReallocated, MetabolicWtReallocated, StorageNReallocated, StorageWtReallocated, MetabolicNRetranslocated, StorageNRetrasnlocated, DMRetranslocated, MetabolicNAllocation, StructuralDMAllocation, MetabolicDMAllocation, MaintenanceRespiration
          LeafCohort InitialLeaves[2]: Rank=2
            zero: NReallocationFactor, DMReallocationFactor, NRetranslocationFactor, DMRetranslocationFactor, ShadeInducedSenRate, SenescedFrac, DeltaPotentialArea, DeltaStressConstrainedArea, DeltaCarbonConstrainedArea, PotentialStructuralDMAllocation, PotentialMetabolicDMAllocation, MetabolicNReallocated, MetabolicWtReallocated, StorageNReallocated, StorageWtReallocated, MetabolicNRetranslocated, StorageNRetrasnlocated, DMRetranslocated, MetabolicNAllocation, StructuralDMAllocation, MetabolicDMAllocation, Area, MaintenanceRespiration
          LeafCohortParameters CohortParameters: ExpansionStressValue=0
            Constant NReallocationFactor: FixedValue=1
            Constant RemobilisationCost: FixedValue=0
            Constant MaintenanceRespirationFunction: FixedValue=0
            Constant NRetranslocationFactor: FixedValue=0.03
            Constant DMReallocationFactor: FixedValue=1
            Constant DMRetranslocationFactor: FixedValue=1
            MinimumFunction CellDivisionStress
              LinearInterpolationFunction WaterStressEffect: XProperty=[Leaf].Fw
                XYPairs: X=[0.5, 1]; Y=[0.1, 1]
              LinearInterpolationFunction NitrogenStressEffect: XProperty=[Wheat].Leaf.Fn
                XYPairs: X=[0, 0.5, 1]; Y=[0.1, 0.1, 1]
            MinimumFunction ExpansionStress
              LinearInterpolationFunction WaterStressEffect: XProperty=[Root].WaterTensionFactor
                XYPairs: X=[0.1, 1.1, 1.3]; Y=[0, 1, 1]
              LinearInterpolationFunction TemperatureEffect: XProperty=[Phenology].MeanTemp.Value()
                XYPairs: X=[0, 12, 14]; Y=[0, 1, 1]
              LinearInterpolationFunction NitrogenStressEffect: XProperty=[Wheat].Leaf.Fn
                XYPairs: X=[0, 0.5, 1]; Y=[0.1, 0.1, 1]
            MultiplyFunction MaxArea
              Constant AreaLargestLeaves: FixedValue=2600; Units=mm^2
              LinearInterpolationFunction AgeFactor: XProperty=[Phenology].Stage
                XYPairs: X=[3, 3.45, 4]; Y=[0.1, 0.5, 1]
            MultiplyFunction GrowthDuration
              Constant Multiplier: FixedValue=1.3
              VariableReference Phyllochron: VariableName=[Structure].Phyllochron.Value()
            MultiplyFunction LagDuration
              LinearInterpolationFunction AgeFactor: XProperty=[Phenology].Stage
                XYPairs: X=[3, 4]; Y=[0.4, 1]
              SubtractFunction LastLeafDuration
                AddFunction ThermalTimeToRipe
                  VariableReference EarlyReproductive: VariableName=[Phenology].EarlyReproductive.Target.Value()
                  VariableReference GrainDevelopment: VariableName=[Phenology].GrainDevelopment.Target.Value()
                  VariableReference GrainFilling: VariableName=[Phenology].GrainFilling.Target.Value()
                  VariableReference Maturing: VariableName=[Phenology].Maturing.Target.Value()
                  VariableReference Ripening: VariableName=[Phenology].Ripening.Target.Value()
                VariableReference SenescenceDuration: VariableName=[Leaf].CohortParameters.SenescenceDuration.Value()
            MultiplyFunction SenescenceDuration
              Constant Multiplier: FixedValue=3
              VariableReference Phyllochron: VariableName=[Structure].Phyllochron.Value()
            Constant DetachmentLagDuration: FixedValue=1000000
            Constant DetachmentDuration: FixedValue=1000000
            Constant RelativeBranchLeafSize: FixedValue=1
            LinearInterpolationFunction MaximumNConc: XProperty=[Phenology].Stage
              XYPairs: X=[3, 4, 6]; Y=[0.05, 0.05, 0.02]
            MultiplyFunction CriticalNConc
              LinearInterpolationFunction CriticalNConcAt350ppm: XProperty=[Phenology].Stage
                XYPairs: X=[3, 4, 6]; Y=[0.04, 0.04, 0.015]
              LinearInterpolationFunction CO2Factor: XProperty=[IWeather].CO2
                XYPairs: X=[350, 700]; Y=[1, 0.93]
            LinearInterpolationFunction MinimumNConc: XProperty=[Phenology].Stage
              XYPairs: X=[3, 4, 6]; Y=[0.01, 0.01, 0.01]
            AddFunction DroughtInducedLagAcceleration
              Constant One: FixedValue=1
              MultiplyFunction Stress
                Constant StressResponseCoefficient: FixedValue=1
                LinearInterpolationFunction StressFactor: XProperty=[Leaf].Fw
                  XYPairs: X=[0, 1]; Y=[2, 0]
            AddFunction DroughtInducedSenAcceleration: same as CRW_active1.Field.Wheat.Leaf.CohortParameters.DroughtInducedLagAcceleration
            LinearInterpolationFunction SpecificLeafAreaMax: XProperty=[Phenology].Stage
              XYPairs: X=[3, 4, 6]; Y=[17000, 20000, 17000]
            LinearInterpolationFunction SpecificLeafAreaMin: XProperty=[Leaf].Fn
              XYPairs: X=[0.4, 1]; Y=[14000, 14000]
            Constant InitialNConc: FixedValue=0
            Constant StructuralFraction: FixedValue=0.5
            Constant StorageFraction: FixedValue=0.3
            Constant LeafSizeShapeParameter: FixedValue=0.3
            Constant SenessingLeafRelativeSize: FixedValue=1; Units=0-1
            MultiplyFunction ShadeInducedSenescenceRate
              Constant RatePerDegDay: FixedValue=0
                Memo
                  1% per degree day means it takes one phyllochron for a shaded leaf to fully sceness
              VariableReference ThermalTime: VariableName=[Phenology].ThermalTime.Value()
            ArrayFunction LagDurationAgeMultiplier: Values=1 1 1
            ArrayFunction SenescenceDurationAgeMultiplier: Values=1 1 1
            ArrayFunction LeafSizeAgeMultiplier: Values=1 1 1 1 1 1 1 1 1 1 1 1
          RUEModel Photosynthesis
            Constant RUE: FixedValue=1.5
            WeightedTemperatureFunction FT: MaximumTemperatureWeighting=0.75
              XYPairs: X=[0, 15, 25, 35]; Y=[0, 1, 1, 0]
            LinearInterpolationFunction FN: XProperty=[Leaf].Fn
              XYPairs: X=[0, 1, 1.5]; Y=[0, 1, 1]
            LinearInterpolationFunction FW: XProperty=[Leaf].Fw
              XYPairs: X=[0, 1, 1]; Y=[0, 1, 1]
            LinearInterpolationFunction FVPD: XProperty=[Photosynthesis].VPD
              XYPairs: X=[0, 10, 40]; Y=[1, 1, 0]
            RUECO2Function FCO2: PhotosyntheticPathway=C3
            VariableReference RadnInt: VariableName=[Leaf].RadIntTot
          Constant FrostFraction: FixedValue=0
          Constant RemobilisationCost: FixedValue=0
          VariableReference ThermalTime: VariableName=[Phenology].ThermalTime.Value()
          MinimumFunction FRGRFunction
            VariableReference RUE_FT: VariableName=[Leaf].Photosynthesis.FT.Value()
            MinimumFunction Others
              VariableReference RUE_FN: VariableName=[Leaf].Photosynthesis.FN.Value()
              VariableReference RUE_FVPD: VariableName=[Leaf].Photosynthesis.FVPD.Value()
          BiomassRemoval BiomassRemovalDefaults
            OrganBiomassRemovalType Harvest: FractionLiveToRemove=0; FractionDeadToRemove=0; FractionLiveToResidue=0.3; FractionDeadToResidue=0.3
            OrganBiomassRemovalType Cut: FractionLiveToRemove=0.8; FractionDeadToRemove=0.8; FractionLiveToResidue=0; FractionDeadToResidue=0
            OrganBiomassRemovalType Prune: FractionLiveToRemove=0; FractionDeadToRemove=0; FractionLiveToResidue=0.6; FractionDeadToResidue=0.6
            OrganBiomassRemovalType Graze: FractionLiveToRemove=0.6; FractionDeadToRemove=0.6; FractionLiveToResidue=0.1; FractionDeadToResidue=0.1
            OrganBiomassRemovalType Thin: FractionLiveToRemove=0; FractionDeadToRemove=0; FractionLiveToResidue=0.05; FractionDeadToResidue=0.05
          MultiplyFunction ExtinctionCoeff
            Constant VegetativePhase: FixedValue=0.5
            LinearInterpolationFunction DevelopmentFactor: XProperty=[Phenology].Stage
              XYPairs: X=[3, 4.7, 5]; Y=[1, 1, 1.2]
              Memo
                Exntiction coefficient increases at stem extension as leaves become more prostrate
          Constant StructuralFraction: FixedValue=0.5
          Constant DMConversionEfficiency: FixedValue=1
          Constant CarbonConcentration: FixedValue=0.4
          Constant StomatalConductanceCO2Modifier: FixedValue=1
        GenericOrgan Spike
          Constant NReallocationFactor: FixedValue=0
          Constant RemobilisationCost: FixedValue=0
          PhaseLookup NRetranslocationFactor
            PhaseLookupValue EarlyGrowth: Start=Emergence; End=StartGrainFill
              Constant ValueDuringEarlyGrowth: FixedValue=0
            PhaseLookupValue ReproductiveGrowth: Start=StartGrainFill; End=EndGrainFill
              Constant ValueDuringGrainFill: FixedValue=0.5
          LinearInterpolationFunction MaximumNConc: XProperty=[Phenology].Stage
            XYPairs: X=[4, 4.5, 5.5, 6]; Y=[0.01, 0.01, 0.025, 0.025]
          Constant MinimumNConc: FixedValue=0.004
          BiomassRemoval BiomassRemovalDefaults
            OrganBiomassRemovalType Harvest: FractionLiveToRemove=0.5; FractionDeadToRemove=0; FractionLiveToResidue=0.1; FractionDeadToResidue=0
            OrganBiomassRemovalType Cut: FractionLiveToRemove=0.8; FractionDeadToRemove=0; FractionLiveToResidue=0; FractionDeadToResidue=0
            OrganBiomassRemovalType Prune: FractionLiveToRemove=0; FractionDeadToRemove=0; FractionLiveToResidue=0.6; FractionDeadToResidue=0
            OrganBiomassRemovalType Graze: FractionLiveToRemove=0.6; FractionDeadToRemove=0; FractionLiveToResidue=0.2; FractionDeadToResidue=0
            OrganBiomassRemovalType Thin: FractionLiveToRemove=0; FractionDeadToRemove=0; FractionLiveToResidue=0.05; FractionDeadToResidue=0
          PhaseBasedSwitch NitrogenDemandSwitch: Start=Emergence; End=StartGrainFill
          PhaseLookup DMRetranslocationFactor
            PhaseLookupValue VegetativeGrowth: Start=Emergence; End=StartGrainFill
              Constant DMRetranslocationFactor: FixedValue=0
            PhaseLookupValue ReproductiveGrowth: Start=StartGrainFill; End=EndGrainFill
              Constant DMRetranslocationFactor: FixedValue=0.5
          Constant InitialWtFunction: FixedValue=0; Units=g/m^2
          Constant DetachmentRateFunction: FixedValue=0; Units=/d
          Constant MaintenanceRespirationFunction: FixedValue=0; Units=0-1
          Constant DMConversionEfficiency: FixedValue=1; Units=0-1
          VariableReference HeadNumber: VariableName=[Structure].TotalStemPopn
          Constant DMReallocationFactor: FixedValue=0
          AddFunction CriticalNConc
            VariableReference MinimumNConc: VariableName=[Spike].MinimumNConc.Value()
            MultiplyFunction MetabolicNconc
              SubtractFunction NonStructuralN
                VariableReference MaximumNConc: VariableName=[Spike].MaximumNConc.Value()
                VariableReference MinimumNConc: VariableName=[Spike].MinimumNConc.Value()
              Constant Proportion: FixedValue=0.8
          LinearInterpolationFunction SenescenceRate: XProperty=[Phenology].Stage
            XYPairs: X=[3, 4, 5, 6]; Y=[0.07, 0.04, 0.015, 0.012]
          Constant CarbonConcentration: FixedValue=0.4
          BiomassDemand DMDemands
            MultiplyFunction Structural
              PartitionFractionDemandFunction DMDemandFunction
                LinearInterpolationFunction PartitionFraction: XProperty=[Phenology].Stage
                  XYPairs: X=[3, 4, 4.7, 5, 7, 7.000001]; Y=[0, 0, 0.01, 0.7, 0.7, 0]
              PhaseLookup StructuralFraction
                PhaseLookupValue VegetativeGrowth: Start=Emergence; End=StartGrainFill
                  Constant StructuralFractionEG: FixedValue=0.3
                PhaseLookupValue ReproductiveGrowth: Start=StartGrainFill; End=EndGrainFill
                  Constant StructuralFractionGF: FixedValue=0
            Constant Metabolic: FixedValue=0
            StorageDMDemandFunction Storage
              SubtractFunction StorageFraction
                Constant One: FixedValue=1
                VariableReference StructuralFraction: VariableName=[Spike].DMDemands.Structural.StructuralFraction.Value()
          BiomassDemand NDemands
            MultiplyFunction Structural
              VariableReference MinNconc: VariableName=[Spike].minimumNconc.Value()
              VariableReference PotentialDMAllocation: VariableName=[Spike].potentialDMAllocation.Structural
            MultiplyFunction Metabolic
              SubtractFunction MetabolicNconc
                VariableReference CritNconc: VariableName=[Spike].criticalNConc.Value()
                VariableReference MinNconc: VariableName=[Spike].minimumNconc.Value()
              VariableReference PotentialDMAllocation: VariableName=[Spike].potentialDMAllocation.Structural
            StorageNDemandFunction Storage
              VariableReference NitrogenDemandSwitch: VariableName=[Spike].nitrogenDemandSwitch.Value()
              VariableReference MaxNconc: VariableName=[Spike].maximumNconc.Value()
          RetranslocateNonStructural RetranslocateNitrogen
        GenericOrgan Stem
          LinearInterpolationFunction SenescenceRate: XProperty=[Phenology].Stage
            XYPairs: X=[3, 7, 8, 9]; Y=[0, 0, 0.2, 0.5]
          Constant RemobilisationCost: FixedValue=0
          LinearInterpolationFunction MaximumNConc: XProperty=[Phenology].Stage
            XYPairs: X=[3, 4, 5, 6]; Y=[0.07, 0.04, 0.015, 0.012]
          Constant MinimumNConc: FixedValue=0.0025
          PhaseBasedSwitch NitrogenDemandSwitch: Start=Emergence; End=StartGrainFill
          Constant NReallocationFactor: FixedValue=0
          PhaseLookup NRetranslocationFactor
            PhaseLookupValue VegetativeGrowth: Start=Sowing; End=Flowering
              Constant Fraction: FixedValue=0
            PhaseLookupValue ReproductiveGrowth: Start=Flowering; End=HarvestRipe
              Constant Fraction: FixedValue=0.5
          PhaseLookup DMRetranslocationFactor: same as CRW_active1.Field.Wheat.Spike.DMRetranslocationFactor
          BiomassRemoval BiomassRemovalDefaults: same as CRW_active1.Field.Wheat.Spike.BiomassRemovalDefaults
          DivideFunction PercentWSC
            VariableReference WSC: VariableName=[Stem].Live.StorageWt
            VariableReference StemWt: VariableName=[Stem].Live.Wt
          Constant InitialWtFunction: FixedValue=0; Units=g/m^2
          Constant DetachmentRateFunction: FixedValue=0; Units=/d
          Constant MaintenanceRespirationFunction: FixedValue=0; Units=0-1
          Constant DMConversionEfficiency: FixedValue=1; Units=0-1
          Constant DMReallocationFactor: FixedValue=0
          AddFunction CriticalNConc
            VariableReference MinimumNConc: VariableName=[Stem].MinimumNConc.Value()
            MultiplyFunction MetabolicNconc
              SubtractFunction NonStructuralN
                VariableReference MaximumNConc: VariableName=[Stem].MaximumNConc.Value()
                VariableReference MinimumNConc: VariableName=[Stem].MinimumNConc.Value()
              Constant Proportion: FixedValue=0.5
          Constant CarbonConcentration: FixedValue=0.4
          BiomassDemand DMDemands
            MultiplyFunction Structural
              PartitionFractionDemandFunction DMDemandFunction
                PhaseLookup PartitionFraction
                  PhaseLookupValue PreStemElongation: Start=Emergence; End=TerminalSpikelet
                    Constant StemFraction: FixedValue=0.2
                  PhaseLookupValue StemElongation: Start=TerminalSpikelet; End=StartGrainFill
                    Constant StemFraction: FixedValue=0.7; Units=0
                  PhaseLookupValue EarEmergence: Start=StartGrainFill; End=HarvestRipe
                    Constant StemFraction: FixedValue=0
              PhaseLookup StructuralFraction
                PhaseLookupValue VegetativeGrowth: Start=Sowing; End=StartGrainFill
                  Constant Fraction: FixedValue=0.3
                PhaseLookupValue ReproductiveGrowth: Start=StartGrainFill; End=HarvestRipe
                  Constant Fraction: FixedValue=0.01
            Constant Metabolic: FixedValue=0
            StorageDMDemandFunction Storage
              SubtractFunction StorageFraction
                Constant One: FixedValue=1
                VariableReference StructuralFraction: VariableName=[Stem].DMDemands.Structural.StructuralFraction.Value()
          BiomassDemand NDemands
            MultiplyFunction Structural
              VariableReference MinNconc: VariableName=[Stem].minimumNconc.Value()
              VariableReference PotentialDMAllocation: VariableName=[Stem].potentialDMAllocation.Structural
            MultiplyFunction Metabolic
              SubtractFunction MetabolicNconc
                VariableReference CritNconc: VariableName=[Stem].criticalNConc.Value()
                VariableReference MinNconc: VariableName=[Stem].minimumNconc.Value()
              VariableReference PotentialDMAllocation: VariableName=[Stem].potentialDMAllocation.Structural
            StorageNDemandFunction Storage
              VariableReference NitrogenDemandSwitch: VariableName=[Stem].nitrogenDemandSwitch.Value()
              VariableReference MaxNconc: VariableName=[Stem].maximumNconc.Value()
          RetranslocateNonStructural RetranslocateNitrogen
        CompositeBiomass AboveGround: DMDOfStructural=0.6
          Propertys=[[Leaf].Live, [Leaf].Dead, [Stem].Live, [Stem].Dead, [Spike].Live, [Spike].Dead, [Grain].Live, [Grain].Dead]
        CompositeBiomass AboveGroundLive: Propertys=[[Leaf].Live, [Stem].Live, [Spike].Live, [Grain].Live]; DMDOfStructural=0.6
        CompositeBiomass AboveGroundDead: Propertys=[[Leaf].Dead, [Stem].Dead, [Spike].Dead, [Grain].Dead]; DMDOfStructural=0.6
        CompositeBiomass BelowGround: Propertys=[[Root].Live, [Root].Dead]; DMDOfStructural=0.6
        CompositeBiomass Total: DMDOfStructural=0.6
          Propertys=[[Leaf].Live, [Leaf].Dead, [Stem].Live, [Stem].Dead, [Root].Live, [Root].Dead, [Spike].Live, [Spike].Dead, [Grain].Live, [Grain].Dead]
        CompositeBiomass TotalLive: DMDOfStructural=0.6
          Propertys=[[Leaf].Live, [Stem].Live, [Root].Live, [Spike].Live, [Grain].Live]
        CompositeBiomass TotalDead: DMDOfStructural=0.6
          Propertys=[[Leaf].Dead, [Stem].Dead, [Root].Dead, [Spike].Dead, [Grain].Dead]
        CompositeBiomass Ear: Propertys=[[Spike].Live, [Grain].Live, [Spike].Dead, [Grain].Dead]; DMDOfStructural=0.6
          Memo
            The Ear composite biomass object includes the Live and dead pools of all organs within the Ear to allow output for total dry matter and Nutrient contents, including total structural, non-structural and metabolic pools.
        CompositeBiomass StemPlusSpike: Propertys=[[Stem].Live, [Spike].Live, [Stem].Dead, [Spike].Dead]; DMDOfStructural=0.6
        CultivarFolder Cultivars
          CultivarFolder New Zealand
            Cultivar Alberic
              Command:
                [Phenology].MinimumLeafNumber.FixedValue = 9
                [Phenology].VrnSensitivity.FixedValue = 7
                [Phenology].PpSensitivity.FixedValue = 3
            Cultivar Amarok
              Command:
                [Phenology].MinimumLeafNumber.FixedValue = 9
                [Phenology].VrnSensitivity.FixedValue = 10
                [Phenology].PpSensitivity.FixedValue = 6
                [Phenology].EarlyReproductivePpSensitivity.FixedValue = 5
                [Structure].Phyllochron.BasePhyllochron.FixedValue = 80
            Cultivar Aspiring
              Command:
                [Phenology].MinimumLeafNumber.FixedValue = 9
                [Phenology].VrnSensitivity.FixedValue = 7
                [Phenology].PpSensitivity.FixedValue = 3
            Cultivar BattenWinter
              Command:
                [Phenology].MinimumLeafNumber.FixedValue = 8
                [Phenology].VrnSensitivity.FixedValue = 8
                [Phenology].PpSensitivity.FixedValue = 5
                [Phenology].EarlyReproductivePpSensitivity.FixedValue = 3
                [Structure].Phyllochron.BasePhyllochron.FixedValue = 100
                [Leaf].ExtinctionCoeff.VegetativePhase.FixedValue = 0.7
                [Grain].NumberFunction.GrainNumber.GrainsPerGramOfStem.FixedValue = 22
            Cultivar BattenSpring
              Command:
                [Phenology].MinimumLeafNumber.FixedValue = 7
                [Phenology].VrnSensitivity.FixedValue = 0
                [Phenology].PpSensitivity.FixedValue = 5
                [Phenology].EarlyReproductivePpSensitivity.FixedValue = 3
                [Structure].Phyllochron.BasePhyllochron.FixedValue = 100
                [Leaf].ExtinctionCoeff.VegetativePhase.FixedValue = 0.7
                [Grain].NumberFunction.GrainNumber.GrainsPerGramOfStem.FixedValue = 22
            Cultivar Centaur
              Command:
                [Phenology].MinimumLeafNumber.FixedValue = 9
                [Phenology].VrnSensitivity.FixedValue = 7
                [Phenology].PpSensitivity.FixedValue = 3
            Cultivar Claire
              Command:
                [Phenology].MinimumLeafNumber.FixedValue = 8
                [Phenology].VrnSensitivity.FixedValue = 8
                [Phenology].PpSensitivity.FixedValue = 8
                [Phenology].EarlyReproductivePpSensitivity.FixedValue = 3
                [Structure].Phyllochron.BasePhyllochron.FixedValue = 100
            Cultivar Conquest
              Command:
                [Phenology].MinimumLeafNumber.FixedValue = 7
                [Phenology].VrnSensitivity.FixedValue = 0
                [Phenology].PpSensitivity.FixedValue = 3
                [Structure].Phyllochron.BasePhyllochron.FixedValue = 100
            Cultivar Discovery
              Command:
                [Phenology].MinimumLeafNumber.FixedValue = 8.5
                [Phenology].VrnSensitivity.FixedValue = 0
                [Phenology].PpSensitivity.FixedValue = 0
                [Structure].Phyllochron.BasePhyllochron.FixedValue = 80
                [Leaf].CohortParameters.MaxArea.AreaLargestLeaves.FixedValue = 1600
                [Grain].MaximumPotentialGrainSize.FixedValue = 0.051
                [Grain].NumberFunction.GrainNumber.GrainsPerGramOfStem.FixedValue = 35
                [Leaf].ExtinctionCoeff.VegetativePhase.FixedValue = 0.5
                [Structure].BranchingRate.PotentialBranchingRate.Vegetative.PotentialBranchingRate.XYPairs.Y = 0,0,0,0,4,7,12,20
                [Grain].MaximumNConc.FixedValue = 0.025
                [Grain].MaxNConcDailyGrowth.FixedValue = 0.025
                [Leaf].ExtinctionCoeff.DevelopmentFactor.XYPairs.Y = 1,1,1.4
                [Leaf].CohortParameters.MinimumNConc.XYPairs.Y = 0.01,0.008,0.008
                [Stem].MinimumNConc.FixedValue = 0.006
                [Spike].DMRetranslocationFactor.ReproductiveGrowth.DMRetranslocationFactor.FixedValue = 0.05
              Memo
                This is a spring wheat with a high grain number and later tillering
            Cultivar Einstein
              Command:
                [Phenology].MinimumLeafNumber.FixedValue = 9
                [Phenology].VrnSensitivity.FixedValue = 7
                [Phenology].PpSensitivity.FixedValue = 3
            Cultivar Exceed
              Command:
                [Phenology].MinimumLeafNumber.FixedValue = 9
                [Phenology].VrnSensitivity.FixedValue = 7
                [Phenology].PpSensitivity.FixedValue = 3
            Cultivar Majestic
              Command:
                [Phenology].MinimumLeafNumber.FixedValue = 9
                [Phenology].VrnSensitivity.FixedValue = 7
                [Phenology].PpSensitivity.FixedValue = 3
            Cultivar Option
              Command:
                [Phenology].MinimumLeafNumber.FixedValue = 9
                [Phenology].VrnSensitivity.FixedValue = 7
                [Phenology].PpSensitivity.FixedValue = 3
            Cultivar Otane
              Command:
                [Phenology].MinimumLeafNumber.FixedValue = 6
                [Phenology].VrnSensitivity.FixedValue = 0
                [Phenology].PpSensitivity.FixedValue = 4
                [Phenology].EarlyReproductivePpSensitivity.FixedValue = 2
                [Structure].Phyllochron.BasePhyllochron.FixedValue = 100
            Cultivar Pennant
              Command:
                [Phenology].MinimumLeafNumber.FixedValue = 9
                [Phenology].VrnSensitivity.FixedValue = 7
                [Phenology].PpSensitivity.FixedValue = 3
            Cultivar Regency
              Command:
                [Phenology].MinimumLeafNumber.FixedValue = 9
                [Phenology].VrnSensitivity.FixedValue = 7
                [Phenology].PpSensitivity.FixedValue = 3
            Cultivar Richmond
              Command:
                [Phenology].MinimumLeafNumber.FixedValue = 9
                [Phenology].VrnSensitivity.FixedValue = 7
                [Phenology].PpSensitivity.FixedValue = 3
            Cultivar Robigus
              Command:
                [Phenology].MinimumLeafNumber.FixedValue = 9
                [Phenology].VrnSensitivity.FixedValue = 7
                [Phenology].PpSensitivity.FixedValue = 3
            Cultivar Rongotea
              Command:
                [Phenology].MinimumLeafNumber.FixedValue = 7
                [Phenology].VrnSensitivity.FixedValue = 0
                [Phenology].PpSensitivity.FixedValue = 2
                [Phenology].EarlyReproductivePpSensitivity.FixedValue = 3
                [Structure].Phyllochron.BasePhyllochron.FixedValue = 100
            Cultivar Rubric
              Command:
                [Phenology].MinimumLeafNumber.FixedValue = 9
                [Phenology].VrnSensitivity.FixedValue = 7
                [Phenology].PpSensitivity.FixedValue = 3
            Cultivar Sage
              Command:
                [Phenology].MinimumLeafNumber.FixedValue = 9
                [Phenology].VrnSensitivity.FixedValue = 7
                [Phenology].PpSensitivity.FixedValue = 3
            Cultivar Saracen
              Command:
                [Phenology].MinimumLeafNumber.FixedValue = 9
                [Phenology].VrnSensitivity.FixedValue = 7
                [Phenology].PpSensitivity.FixedValue = 3
            Cultivar Savannah
              Command:
                [Phenology].MinimumLeafNumber.FixedValue = 9
                [Phenology].VrnSensitivity.FixedValue = 7
                [Phenology].PpSensitivity.FixedValue = 3
            Cultivar Solstice
              Command:
                [Phenology].MinimumLeafNumber.FixedValue = 9
                [Phenology].VrnSensitivity.FixedValue = 7
                [Phenology].PpSensitivity.FixedValue = 3
            Cultivar Tanker
              Command:
                [Phenology].MinimumLeafNumber.FixedValue = 9
                [Phenology].VrnSensitivity.FixedValue = 7
                [Phenology].PpSensitivity.FixedValue = 3
            Cultivar Tribute
              Command:
                [Phenology].MinimumLeafNumber.FixedValue = 9
                [Phenology].VrnSensitivity.FixedValue = 7
                [Phenology].PpSensitivity.FixedValue = 3
            Cultivar Wakanui
              Command:
                [Phenology].MinimumLeafNumber.FixedValue = 8
                [Phenology].VrnSensitivity.FixedValue = 10
                [Phenology].PpSensitivity.FixedValue = 0
                [Phenology].EarlyReproductiveLongDayBase.FixedValue = 4
                [Structure].Phyllochron.BasePhyllochron.FixedValue = 100
                [Phenology].DailyVernalisation.TempResponseProfile.XYPairs.X = 0,1,8
                [Phenology].DailyVernalisation.TempResponseProfile.XYPairs.Y = 0,1.204,0
                [Leaf].ExtinctionCoeff.VegetativePhase.FixedValue = 0.7
                [Grain].NumberFunction.GrainNumber.GrainsPerGramOfStem.FixedValue = 22
                [Grain].MaximumPotentialGrainSize.FixedValue = 0.035
                [Leaf].CohortParameters.MaxArea.AreaLargestLeaves.FixedValue = 3000
            Cultivar Weston
              Command:
                [Phenology].MinimumLeafNumber.FixedValue = 9
                [Phenology].VrnSensitivity.FixedValue = 7
                [Phenology].PpSensitivity.FixedValue = 3
          CultivarFolder Australia
            Cultivar Axe
              Command:
                [Phenology].MinimumLeafNumber.FixedValue = 5
                [Phenology].VrnSensitivity.FixedValue = 0
                [Phenology].PpSensitivity.FixedValue = 4
                [Phenology].EarlyReproductivePpSensitivity.FixedValue = 0
                [Structure].Phyllochron.BasePhyllochron.FixedValue = 100
            Cultivar Bolac
              Command:
                [Phenology].MinimumLeafNumber.FixedValue = 6
                [Phenology].VrnSensitivity.FixedValue = 0
                [Phenology].PpSensitivity.FixedValue = 4
                [Structure].Phyllochron.BasePhyllochron.FixedValue = 100
            Cultivar Cunningham
              Command:
                [Phenology].MinimumLeafNumber.FixedValue = 6
                [Phenology].VrnSensitivity.FixedValue = 0
                [Phenology].PpSensitivity.FixedValue = 4
                [Structure].Phyllochron.BasePhyllochron.FixedValue = 100
              Alias Anlace
              Alias Arrivato
              Alias Babbler
              Alias Barham
              Alias Baxter
              Alias Bowie
              Alias Buckley
              Alias Buckly
              Alias Burunga
              Alias Camm
              Alias Carinya
              Alias ChiefCLPlus
              Alias CLF_Janz
              Alias Dagger
              Alias DBAAurora
              Alias ElmoreCLPlus
              Alias Espada
              Alias Frame
              Alias Gazelle
              Alias Halberd
              Alias Hybrid_Meteor
              Alias JusticaCLPlus
              Alias Preston
              Alias Saphire
              Alias Scout
              Alias Stiletto
              Alias Ventura
              Alias Wallup
            Cultivar Derrimut
              Command:
                [Phenology].MinimumLeafNumber.FixedValue = 6
                [Phenology].VrnSensitivity.FixedValue = 0
                [Phenology].PpSensitivity.FixedValue = 4
                [Structure].Phyllochron.BasePhyllochron.FixedValue = 100
            Cultivar EGAGregory
              Command:
                [Phenology].MinimumLeafNumber.FixedValue = 6
                [Phenology].VrnSensitivity.FixedValue = 1
                [Phenology].PpSensitivity.FixedValue = 4
                [Structure].Phyllochron.BasePhyllochron.FixedValue = 100
              Alias Gregory
              Alias Lancer
            Cultivar GattonHartog
              Command:
                [Phenology].MinimumLeafNumber.FixedValue = 8
                [Phenology].VrnSensitivity.FixedValue = 0
                [Phenology].PpSensitivity.FixedValue = 4
            Cultivar Gamenya
              Command:
                [Phenology].MinimumLeafNumber.FixedValue = 5
                [Phenology].VrnSensitivity.FixedValue = 0
                [Phenology].PpSensitivity.FixedValue = 3.5
                [Structure].Phyllochron.BasePhyllochron.FixedValue = 100
                [Phenology].EarlyReproductivePpSensitivity.FixedValue = 0
                [Phenology].EarlyReproductiveLongDayBase.FixedValue
            Cultivar Gauntlet
              Command:
                [Phenology].MinimumLeafNumber.FixedValue = 5
                [Phenology].VrnSensitivity.FixedValue = 0
                [Phenology].PpSensitivity.FixedValue = 4
                [Structure].Phyllochron.BasePhyllochron.FixedValue = 100
              Alias Braewood
              Alias Chara
              Alias Clearfield_stl
              Alias Drysdale
              Alias Envoy
              Alias Estoc
              Alias Giles
              Alias Harper
              Alias Krichauff
              Alias Magenta
              Alias Mitch
              Alias Phantom
              Alias Pugsley
              Alias Sentinel
              Alias Silverstar
              Alias Suneca
              Alias Sunlin
              Alias Sunvale
              Alias Trojan
              Alias Strzelecki
            Cultivar Gladius
              Command:
                [Phenology].MinimumLeafNumber.FixedValue = 6
                [Phenology].VrnSensitivity.FixedValue = 0
                [Phenology].PpSensitivity.FixedValue = 5
                [Structure].Phyllochron.BasePhyllochron.FixedValue = 100
            Cultivar Gutha
              Command:
                [Phenology].MinimumLeafNumber.FixedValue = 6
                [Phenology].VrnSensitivity.FixedValue = 0
                [Phenology].PpSensitivity.FixedValue = 5
                [Structure].Phyllochron.BasePhyllochron.FixedValue = 100
                [Grain].MaximumPotentialGrainSize.FixedValue = 0.041
                [Grain].NumberFunction.GrainNumber.GrainsPerGramOfStem.FixedValue = 17
            Cultivar H45
              Command:
                [Phenology].MinimumLeafNumber.FixedValue = 6
                [Phenology].VrnSensitivity.FixedValue = 0
                [Phenology].PpSensitivity.FixedValue = 4
                [Structure].Phyllochron.BasePhyllochron.FixedValue = 100
                [Grain].NumberFunction.GrainNumber.GrainsPerGramOfStem.FixedValue = 20
              Alias Saintly
              Alias Tamarinrock
              Alias Waagin
              Alias Wollaroi
              Alias Zippy
            Cultivar H46
              Command:
                [Phenology].MinimumLeafNumber.FixedValue = 8
                [Phenology].VrnSensitivity.FixedValue = 0
                [Phenology].PpSensitivity.FixedValue = 4
                [Structure].Phyllochron.BasePhyllochron.FixedValue = 100
            Cultivar Hartog
              Command:
                [Phenology].MinimumLeafNumber.FixedValue = 6
                [Phenology].VrnSensitivity.FixedValue = 0
                [Phenology].PpSensitivity.FixedValue = 5
                [Structure].Phyllochron.BasePhyllochron.FixedValue = 100
                [Grain].MaximumPotentialGrainSize.FixedValue = 0.041
              Alias Annuello
              Alias Carnamah
              Alias Catalina
              Alias CLF_Stiletto
              Alias Cobra
              Alias Corack
              Alias Correll
              Alias Diamondbird
              Alias Gladius
              Alias Goroke
              Alias GrenadeCLPlus
              Alias Guardian
              Alias Halbred
              Alias Impala
              Alias Justica
              Alias Kord
              Alias Merlin
              Alias Mitre
              Alias Peake
              Alias Shield
              Alias Spitfire
              Alias Sunguard
              Alias Sunstate
              Alias Yallaroi
              Alias Yawa
              Alias Yitpi
            Cultivar Hibred_Mercury
              Command:
                [Phenology].MinimumLeafNumber.FixedValue = 6
                [Phenology].VrnSensitivity.FixedValue = 0
                [Phenology].PpSensitivity.FixedValue = 4
                [Structure].Phyllochron.BasePhyllochron.FixedValue = 100
              Alias Agtscythe
              Alias Arrino
              Alias Bonnie_rock
              Alias Bowerbird
              Alias Condo
              Alias Dart
              Alias Dollarbird
              Alias Emurock
              Alias Hyperno
              Alias ImposeCLPlus
              Alias Kalka
              Alias Kirchauff
              Alias Kukri
              Alias Hunter
              Alias LRPBArrow
              Alias Mace
              Alias Ouyen
              Alias Ruby
              Alias Tamaroi
              Alias Young
              Alias Katana
            Cultivar Janz
              Command:
                [Phenology].MinimumLeafNumber.FixedValue = 6
                [Phenology].VrnSensitivity.FixedValue = 1
                [Phenology].PpSensitivity.FixedValue = 4
                [Structure].Phyllochron.BasePhyllochron.FixedValue = 100
            Cultivar Kelallac
              Command:
                [Phenology].MinimumLeafNumber.FixedValue = 8
                [Phenology].VrnSensitivity.FixedValue = 0
                [Phenology].PpSensitivity.FixedValue = 4
                [Structure].Phyllochron.BasePhyllochron.FixedValue = 100
              Alias Beaufort
              Alias Calingiri
              Alias Endure
              Alias Forrest
              Alias Scenario
              Alias Zen
            Cultivar Kennedy
              Command:
                [Phenology].MinimumLeafNumber.FixedValue = 8
                [Phenology].VrnSensitivity.FixedValue = 0
                [Phenology].PpSensitivity.FixedValue = 4
                [Structure].Phyllochron.BasePhyllochron.FixedValue = 100
            Cultivar Lang
              Command:
                [Phenology].MinimumLeafNumber.FixedValue = 6
                [Phenology].VrnSensitivity.FixedValue = 0
                [Phenology].PpSensitivity.FixedValue = 5
                [Structure].Phyllochron.BasePhyllochron.FixedValue = 100
            Cultivar Livingston
              Command:
                [Phenology].MinimumLeafNumber.FixedValue = 5
                [Phenology].VrnSensitivity.FixedValue = 0
                [Phenology].PpSensitivity.FixedValue = 4
                [Structure].Phyllochron.BasePhyllochron.FixedValue = 100
            Cultivar Lincoln
              Command:
                [Phenology].MinimumLeafNumber.FixedValue = 6
                [Phenology].VrnSensitivity.FixedValue = 0
                [Phenology].PpSensitivity.FixedValue = 4
                [Structure].Phyllochron.BasePhyllochron.FixedValue = 100
              Alias Crusader
            Cultivar Mace
              Command:
                [Phenology].MinimumLeafNumber.FixedValue = 6
                [Phenology].VrnSensitivity.FixedValue = 0
                [Phenology].PpSensitivity.FixedValue = 4
                [Structure].Phyllochron.BasePhyllochron.FixedValue = 100
            Cultivar MacKellar
              Command:
                [Phenology].MinimumLeafNumber.FixedValue = 7
                [Phenology].VrnSensitivity.FixedValue = 5
                [Phenology].PpSensitivity.FixedValue = 5
                [Phenology].EarlyReproductiveLongDayBase.FixedValue = 3.5
                [Structure].Phyllochron.BasePhyllochron.FixedValue = 100
              Alias Adagio
              Alias Brennan
              Alias Declic
              Alias Revenue
            Cultivar Matong
              Command:
                [Phenology].MinimumLeafNumber.FixedValue = 7
                [Phenology].VrnSensitivity.FixedValue = 1
                [Phenology].PpSensitivity.FixedValue = 4
                [Structure].Phyllochron.BasePhyllochron.FixedValue = 100
                [Grain].NumberFunction.GrainNumber.GrainsPerGramOfStem.FixedValue = 22
            Cultivar McCubbin
              Command:
                [Phenology].MinimumLeafNumber.FixedValue = 8
                [Phenology].VrnSensitivity.FixedValue = 0
                [Phenology].PpSensitivity.FixedValue = 5
                [Structure].Phyllochron.BasePhyllochron.FixedValue = 90
            Cultivar Mercury
              Command:
                [Phenology].MinimumLeafNumber.FixedValue = 7
                [Phenology].VrnSensitivity.FixedValue = 0
                [Phenology].PpSensitivity.FixedValue = 4
                [Phenology].EarlyReproductiveLongDayBase.FixedValue = 3.5
                [Structure].Phyllochron.BasePhyllochron.FixedValue = 80
            Cultivar Ruby
              Command:
                [Phenology].MinimumLeafNumber.FixedValue = 8
                [Phenology].VrnSensitivity.FixedValue = 0
                [Phenology].PpSensitivity.FixedValue = 4
                [Structure].Phyllochron.BasePhyllochron.FixedValue = 100
            Cultivar Spear
              Command:
                [Phenology].MinimumLeafNumber.FixedValue = 7
                [Phenology].VrnSensitivity.FixedValue = 0
                [Phenology].PpSensitivity.FixedValue = 4
                [Structure].Phyllochron.BasePhyllochron.FixedValue = 100
                [Grain].MaximumPotentialGrainSize.FixedValue = 0.045
            Cultivar Sunbri
              Command:
                [Phenology].MinimumLeafNumber.FixedValue = 7
                [Phenology].VrnSensitivity.FixedValue = 0
                [Phenology].PpSensitivity.FixedValue = 5
                [Structure].Phyllochron.BasePhyllochron.FixedValue = 100
            Cultivar Sunco
              Command:
                [Phenology].MinimumLeafNumber.FixedValue = 6.5
                [Phenology].VrnSensitivity.FixedValue = 0
                [Phenology].PpSensitivity.FixedValue = 3.5
                [Phenology].EarlyReproductivePpSensitivity.FixedValue = 4
                [Structure].Phyllochron.BasePhyllochron.FixedValue = 100
              Alias Advantage
              Alias Bellaroi
              Alias Caparoi
              Alias Ellison
              Alias Suntop
            Cultivar Ventura
              Command:
                [Phenology].MinimumLeafNumber.FixedValue = 8
                [Phenology].VrnSensitivity.FixedValue = 0
                [Phenology].PpSensitivity.FixedValue = 4
                [Structure].Phyllochron.BasePhyllochron.FixedValue = 100
            Cultivar Wedgetail
              Command:
                [Phenology].MinimumLeafNumber.FixedValue = 8
                [Phenology].VrnSensitivity.FixedValue = 0
                [Phenology].PpSensitivity.FixedValue = 4
                [Structure].Phyllochron.BasePhyllochron.FixedValue = 100
              Alias Lorikeet
              Alias Rosella
              Alias Whistler
              Alias Wylah
              Alias Eaglehawk
            Cultivar Westonia
              Command:
                [Phenology].MinimumLeafNumber.FixedValue = 5
                [Phenology].VrnSensitivity.FixedValue = 0
                [Phenology].PpSensitivity.FixedValue = 4
                [Structure].Phyllochron.BasePhyllochron.FixedValue = 100
            Cultivar Wilgoyne
              Command:
                [Phenology].MinimumLeafNumber.FixedValue = 6
                [Phenology].VrnSensitivity.FixedValue = 0
                [Phenology].PpSensitivity.FixedValue = 4
                [Structure].Phyllochron.BasePhyllochron.FixedValue = 100
                [Grain].NumberFunction.GrainNumber.GrainsPerGramOfStem.FixedValue = 20
                [Grain].MaximumPotentialGrainSize.FixedValue = 0.045
            Cultivar Wyalkatchem
              Command:
                [Phenology].MinimumLeafNumber.FixedValue = 8
                [Phenology].VrnSensitivity.FixedValue = 0
                [Phenology].PpSensitivity.FixedValue = 4
                [Structure].Phyllochron.BasePhyllochron.FixedValue = 100
            Cultivar Yitpi
              Command:
                [Phenology].MinimumLeafNumber.FixedValue = 8
                [Phenology].VrnSensitivity.FixedValue = 0
                [Phenology].PpSensitivity.FixedValue = 5
                [Phenology].EarlyReproductiveLongDayBase.FixedValue = 2.5
                [Phenology].EarlyReproductivePpSensitivity.FixedValue = 5
                [Structure].Phyllochron.BasePhyllochron.FixedValue = 80
            Cultivar Young
              Command:
                [Phenology].MinimumLeafNumber.FixedValue = 8
                [Phenology].VrnSensitivity.FixedValue = 0
                [Phenology].PpSensitivity.FixedValue = 4
                [Structure].Phyllochron.BasePhyllochron.FixedValue = 100
          CultivarFolder Turkey
            Cultivar Konya
              Command:
                [Phenology].MinimumLeafNumber.FixedValue = 7
                [Phenology].VrnSensitivity.FixedValue = 4
                [Phenology].PpSensitivity.FixedValue = 4
                [Structure].Phyllochron.BasePhyllochron.FixedValue = 100
                [Grain].NumberFunction.GrainNumber.GrainsPerGramOfStem.FixedValue = 16
                [Grain].MaximumPotentialGrainSize.FixedValue = 0.050
                [Grain].MaximumNConc.FixedValue = 0.026
                [Phenology].GrainFilling.Target.FixedValue = 450
                [Stem].DMRetranslocationFactor.ReproductiveGrowth.DMRetranslocationFactor.FixedValue = 0.2
                [Stem].StructuralFraction.VegetativeGrowth.Fraction.FixedValue = 0.6
                [Leaf].ExtinctionCoeff.VegetativePhase.FixedValue = 0.8
          CultivarFolder China
            Cultivar Keyu13
              Command:
                [Phenology].MinimumLeafNumber.FixedValue = 7
                [Phenology].VrnSensitivity.FixedValue = 5
                [Phenology].PpSensitivity.FixedValue = 3
                [Structure].Phyllochron.BasePhyllochron.FixedValue = 100
          CultivarFolder USA
            Cultivar Yecora
              Command:
                [Phenology].MinimumLeafNumber.FixedValue = 6
                [Phenology].VrnSensitivity.FixedValue = 0
                [Phenology].PpSensitivity.FixedValue = 4
                [Structure].Phyllochron.BasePhyllochron.FixedValue = 90
                [Leaf].CohortParameters.MaxArea.AreaLargestLeaves.FixedValue = 4000
            Cultivar Rex
              Command:
                [Phenology].MinimumLeafNumber.FixedValue = 7
                [Phenology].VrnSensitivity.FixedValue = 6
                [Phenology].PpSensitivity.FixedValue = 4
                [Grain].NumberFunction.GrainNumber.GrainsPerGramOfStem.FixedValue = 18
                [Grain].MaximumNConc.FixedValue = 0.02
            Cultivar Nugaines
              Command:
                [Phenology].MinimumLeafNumber.FixedValue = 7
                [Phenology].VrnSensitivity.FixedValue = 6
                [Phenology].PpSensitivity.FixedValue = 4
                [Grain].NumberFunction.GrainNumber.GrainsPerGramOfStem.FixedValue = 20
                [Grain].MaximumNConc.FixedValue = 0.02
            Cultivar Hyslop
              Command:
                [Phenology].MinimumLeafNumber.FixedValue = 7
                [Phenology].VrnSensitivity.FixedValue = 6
                [Phenology].PpSensitivity.FixedValue = 4
                [Grain].NumberFunction.GrainNumber.GrainsPerGramOfStem.FixedValue = 22
                [Grain].MaximumNConc.FixedValue = 0.02
            Cultivar Stephens
              Command:
                [Phenology].MinimumLeafNumber.FixedValue = 7
                [Phenology].VrnSensitivity.FixedValue = 6
                [Phenology].PpSensitivity.FixedValue = 4
                [Grain].NumberFunction.GrainNumber.GrainsPerGramOfStem.FixedValue = 25
                [Grain].MaximumNConc.FixedValue = 0.02
          CultivarFolder Europe
            Cultivar Dekan
              Command:
                [Phenology].MinimumLeafNumber.FixedValue = 9
                [Phenology].VrnSensitivity.FixedValue = 7
                [Phenology].PpSensitivity.FixedValue = 3
                [Phenology].EarlyReproductivePpSensitivity.FixedValue = 3
                [Structure].Phyllochron.BasePhyllochron.FixedValue = 100
                [Leaf].ExtinctionCoeff.VegetativePhase.FixedValue = 0.8
            Cultivar Rosario
              Command:
                [Phenology].MinimumLeafNumber.FixedValue = 9
                [Phenology].VrnSensitivity.FixedValue = 7
                [Phenology].PpSensitivity.FixedValue = 3
                [Phenology].EarlyReproductivePpSensitivity.FixedValue = 3
                [Structure].Phyllochron.BasePhyllochron.FixedValue = 100
                [Leaf].ExtinctionCoeff.VegetativePhase.FixedValue = 0.8
            Cultivar Ararat
              Command:
                [Phenology].MinimumLeafNumber.FixedValue = 9
                [Phenology].VrnSensitivity.FixedValue = 7
                [Phenology].PpSensitivity.FixedValue = 3
                [Phenology].EarlyReproductivePpSensitivity.FixedValue = 3
                [Structure].Phyllochron.BasePhyllochron.FixedValue = 100
                [Leaf].ExtinctionCoeff.VegetativePhase.FixedValue = 0.8
          CultivarFolder Africa
            Cultivar HAR1685
              Command:
                [Phenology].MinimumLeafNumber.FixedValue = 7
                [Phenology].VrnSensitivity.FixedValue = 0
                [Phenology].PpSensitivity.FixedValue = 3
                [Structure].Phyllochron.BasePhyllochron.FixedValue = 100
                [Grain].NumberFunction.GrainNumber.GrainsPerGramOfStem.FixedValue = 17
                [Phenology].GrainFilling.Target.FixedValue = 350
          CultivarFolder Iran
            Cultivar Gorgan
              Command:
                [Phenology].MinimumLeafNumber.FixedValue = 7
                [Phenology].VrnSensitivity.FixedValue = 0
                [Phenology].PpSensitivity.FixedValue = 4
                [Structure].Phyllochron.BasePhyllochron.FixedValue = 100
      LifeCycle: InitialPopulation=[2500, 0, 0]
        LifeStage Egg
          Memo
            **Egg**

            (As at 14 November 2019 - VOS)

            In the first layer of the soil.

            Development is driven by temperature in the first layer of the soil. No development below 4 C, increases to 16 DegDay / day at 20 C and remains at that value. Physiological age is the accumulation of degree days.

            Once the physiological age reaches 236 DegDay the egg hatches.

            Mortality is driven by:

            - if soil temperature (daylong average) in the first layer is below -5 then all eggs die immediately

            - if soil temperature (daylong average) in the first layer rises above 20 C the eggs start to die off at a rate that increases to 0.1 per day at 30 C (at 0.1 /day maintained for 14 days would leave 23% viable eggs remaining), between 30 and 50 C the die-off rate increases more steeply so that a day at 50 C would kill all eggs immediately.

            - a dryness soil moisture function is defined that is: < 0 below 15 bars, 0 at 15 bars, 1 at the drained upper limit, and > 1 for moister soils. The mortality rate is 0 (i.e. no deaths due to soil dryness) when the water content is at or above 50% of the water content between 15 bars and the drained upper limit, and is 0.1 at the 15 bar water content. For drier soils the mortality increases steeply and is 0.5 when the water content is half the 15 bar value (i.e. pretty close to air dry). A mortality rate of 0.1 for a week will kill about 50% of the population; at 0.5 it would kill 50% of the population in two days.

            - an excess soil moisture function is defined that is: < 0 below DUL, 0 at DUL, and 1 at saturation. The mortality rate is 0 (i.e. no deaths due to soil excess moisture) when the water content is at or below the DUL, and is 0.1 at saturation. A mortality rate of 0.1 for a week will kill about 50% of the population.
          LifeStageProcess EggDevelopment: ProcessAction=1; TransferTo=Larva
            LinearInterpolationFunction EggThermalTimeDevelop: XProperty=[Soil].Temperature[1]
              XYPairs: X=[-5, 4, 20, 30]; Y=[0, 0, 16, 16]
          LifeStageProcess EggMaturation: ProcessAction=0; TransferTo=Larva
            LinearInterpolationFunction TransferToLarva: XProperty=[Egg].CurrentCohort.PhysiologicalAge
              XYPairs: X=[0, 236, 237, 300]; Y=[0, 0, 1, 1]
            Memo
              new memo
          LifeStageProcess EggMortality: ProcessAction=2
            LinearInterpolationFunction LowTempMortality: XProperty=[Soil].Temperature[1]
              XYPairs: X=[-16, -6, -5, 20]; Y=[1, 1, 0, 0]
            LinearInterpolationFunction HighTempMortality: XProperty=[Soil].Temperature[1]
              XYPairs: X=[0, 20, 30, 50]; Y=[0, 0, 0.1, 1]
            LinearInterpolationFunction SoilDrynessMortality
              XProperty=([Soil].SoilWater.SWmm[1]-[Soil].LL15mm[1])/([Soil].DULmm[1]-[Soil].LL15mm[1])
              XYPairs: X=[-0.5, 0, 0.5, 1, 2]; Y=[0.5, 0.1, 0, 0, 0]
            LinearInterpolationFunction SoilWetnessMortality
              XProperty=([Soil].SoilWater.SWmm[1]-[Soil].DULmm[1])/([Soil].SATmm[1]-[Soil].DULmm[1])
              XYPairs: X=[-1, 0, 1, 2]; Y=[0, 0, 0.05, 0.05]
        LifeStage Larva
          Memo
            **Larva as a placeholder for all larval and pupa instars **
          LifeStageProcess LarvaDevelopment: ProcessAction=1
            LinearInterpolationFunction LarvaThermalTimeDevelop: XProperty=([Weather].MaxT+[Weather].MinT)/2
              XYPairs: same as CRW_active1.Field.LifeCycle.Egg.EggDevelopment.EggThermalTimeDevelop.XYPairs
          LifeStageProcess LarvaMaturation: ProcessAction=0; TransferTo=Adult
            LinearInterpolationFunction TransferToAdult: XProperty=[Larva].CurrentCohort.PhysiologicalAge
              XYPairs: X=[0, 500, 501, 1000]; Y=[0, 0, 1, 1]
          LifeStageProcess LarvaMortality: ProcessAction=2
            LinearInterpolationFunction LowTempMortality: XProperty=[Soil].Temperature[1]
              XYPairs: X=[-16, -6, -5, 20]; Y=[1, 1, 0, 0]
            LinearInterpolationFunction HighTempMortality: XProperty=[Soil].Temperature[1]
              XYPairs: X=[0, 20, 30, 50]; Y=[0, 0, 0.1, 1]
            LinearInterpolationFunction SoilDrynessMortality
              XProperty=([Soil].SoilWater.SWmm[1]-[Soil].LL15mm[1])/([Soil].DULmm[1]-[Soil].LL15mm[1])
              XYPairs: X=[-0.5, 0, 1, 2]; Y=[0.5, 0.05, 0, 0]
            LinearInterpolationFunction SoilWetnessMortality
              XProperty=([Soil].SoilWater.SWmm[1]-[Soil].DULmm[1])/([Soil].SATmm[1]-[Soil].DULmm[1])
              XYPairs: X=[-1, 0, 1, 2]; Y=[0, 0, 0.025, 0.025]
        LifeStage Adult
          Memo
            **Adult - not up to date**

            Mostly above-ground around the plant (aggregate around clover plants) or on the soil surface,

            Mobility - fly in and fly out (driven by wind/weather)

            Eats clover (white and red) leaves

            Development driven by thermal time and food availability (latter not yet implemented)

            Mortality from:

            - too hot

            - too dry

            - too wet

            - too old

            - predation (beetles, spiders)

            - parasitism (wasp)

            - disease (general, population dependent and seasonal with higher values in autumn)

            Mate frequently

            Lay eggs (broadcast around the plants they feed on)

            Overwinter as adults
          LifeStageProcess AdultDevelopment: ProcessAction=1; TransferTo=Larva
            LinearInterpolationFunction AdultThermalTimeDevelop: same as CRW_active1.Field.LifeCycle.Larva.LarvaDevelopment.LarvaThermalTimeDevelop
          LifeStageReproductionProcess ReproductionProcesses: TransferTo=Egg; FecundityFunctionName=Fecundity; ProgenyFunctonName=ProgenyProduction
            LinearAfterThresholdFunction ProgenyProduction: XProperty=[LifeCycle].CurrentLifeStage.CurrentCohort.PhysiologicalAge; XTrigger=200; Slope=0.05
            Constant Fecundity: FixedValue=6
          LifeStageProcess AdultMortality: ProcessAction=2
            LinearInterpolationFunction AgeBasedMortality: XProperty=[LifeCycle].CurrentLifeStage.CurrentCohort.PhysiologicalAge
              XYPairs: X=[0, 250, 350, 400]; Y=[0, 0, 1, 1]
            LinearAfterThresholdFunction DensityDependentMortality: XProperty=[LifeCycle].Adult.TotalPopulation; XTrigger=1000; Slope=1e-06
            LinearInterpolationFunction LowTempMortality: XProperty=[Weather].MinT
              XYPairs: X=[-16, -2, 20]; Y=[1, 0, 0]
            LinearInterpolationFunction HighTempMortality: XProperty=[Weather].MaxT
              XYPairs: X=[0, 20, 30, 50]; Y=[0, 0, 0.1, 1]
      Report: EventNames=[Clock].DoReport
        VariableNames:
          [Clock].Today
          [LifeCycle].Egg.TotalPopulation
          [LifeCycle].Larva.TotalPopulation
          [LifeCycle].Adult.TotalPopulation
      Report EggDev: EventNames=[Clock].DoReport
        VariableNames:
          [Clock].Today
          [Soil].Temperature[1] as SoilTemp
          [LifeCycle].Egg.EggDevelopment.EggThermalTimeDevelop
          Mean([LifeCycle].Egg.Cohorts.PhysiologicalAge) as meanEggPhysAge
          Mean([LifeCycle].Egg.Cohorts.ChronoAge) as meanEggChronoAge
          [LifeCycle].Egg.TotalPopulation as EggCount
          [LifeCycle].Egg.CohortCount as numEggCohorts
          StdDev([LifeCycle].Egg.Cohorts.PhysiologicalAge) as stdEggPhysAge
          Median([LifeCycle].Egg.Cohorts.PhysiologicalAge) as medianEggPhysAge
          Percentile25([LifeCycle].Egg.Cohorts.PhysiologicalAge) as p25EggPhysAge
          Percentile75([LifeCycle].Egg.Cohorts.PhysiologicalAge) as p75EggPhysAge
          Sum([LifeCycle].Egg.Cohorts.Mortality) as sumEggMortality
          [LifeCycle].Egg.EggMortality.LowTempMortality as LowTempMortality
          [LifeCycle].Egg.EggMortality.HighTempMortality as HighTempMortality
          [LifeCycle].Egg.EggMortality.SoilDrynessMortality as DrySoilMortality
          [LifeCycle].Egg.EggMortality.SoilWetnessMortality as WetSoilMortality
      Report LarvaDev: EventNames=[Clock].DoReport
        VariableNames:
          [Clock].Today
          [Soil].Temperature[1] as SoilTemp
          [LifeCycle].Larva.LarvaDevelopment.LarvaThermalTimeDevelop
          Mean([LifeCycle].Larva.Cohorts.PhysiologicalAge) as meanLarvaPhysAge
          Mean([LifeCycle].Larva.Cohorts.ChronoAge) as meanLarvaChronoAge
          [LifeCycle].Larva.TotalPopulation as LarvaCount
          [LifeCycle].Larva.CohortCount as numLarvaCohorts
          StdDev([LifeCycle].Larva.Cohorts.PhysiologicalAge) as stdLarvaPhysAge
          Median([LifeCycle].Larva.Cohorts.PhysiologicalAge) as medianLarvaPhysAge
          Percentile25([LifeCycle].Larva.Cohorts.PhysiologicalAge) as p25LarvaPhysAge
          Percentile75([LifeCycle].Larva.Cohorts.PhysiologicalAge) as p75LarvaPhysAge
          Sum([LifeCycle].Larva.Cohorts.Mortality) as sumLarvaMortality
          [LifeCycle].Larva.LarvaMortality.LowTempMortality as LowTempMortality
          [LifeCycle].Larva.LarvaMortality.HighTempMortality as HighTempMortality
          [LifeCycle].Larva.LarvaMortality.SoilDrynessMortality as DrySoilMortality
          [LifeCycle].Larva.LarvaMortality.SoilWetnessMortality as WetSoilMortality
      Report AdultDev: EventNames=[Clock].DoReport
        VariableNames:
          [Clock].Today
          Mean([LifeCycle].Adult.Cohorts.PhenoAge) as meanAdultPhenoAge
          [Soil].Temperature[1] as SoilTemp
          [LifeCycle].Adult.AdultDevelopment.AdultThermalTimeDevelop
          Mean([LifeCycle].Adult.Cohorts.PhysiologicalAge) as meanAdultPhysAge
          Mean([LifeCycle].Adult.Cohorts.ChronoAge) as meanAdultChronoAge
          [LifeCycle].Adult.TotalPopulation as AdultCount
          [LifeCycle].Adult.CohortCount as numAdultCohorts
          StdDev([LifeCycle].Adult.Cohorts.PhysiologicalAge) as stdAdultPhysAge
          Median([LifeCycle].Adult.Cohorts.PhysiologicalAge) as medianAdultPhysAge
          Percentile25([LifeCycle].Adult.Cohorts.PhysiologicalAge) as p25AdultPhysAge
          Percentile75([LifeCycle].Adult.Cohorts.PhysiologicalAge) as p75AdultPhysAge
          Sum([LifeCycle].Adult.Cohorts.Mortality) as sumAdultMortality
          [LifeCycle].Adult.AdultMortality.LowTempMortality as LowTempMortality
          [LifeCycle].Adult.AdultMortality.HighTempMortality as HighTempMortality
          [LifeCycle].Adult.AdultMortality.SoilDrynessMortality as DrySoilMortality
          [LifeCycle].Adult.AdultMortality.SoilWetnessMortality as WetSoilMortality
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