Simulations: Version=88
  Memo
    *Datasets*

    1 - WEPP, done, graphs plotting OK

    2 - Ames2017 (Soybean), plots need some work

    Tests/Validation/System/Lincoln Rotation 2017

    Test/Validation/SoilWEater/Evaporation / Norwin
  DataStore
    ExcelInput Observed (disabled): FileNames=[Observed.xlsx]; SheetNames=[PLOT5]
    ExcelInput ExcelMultiInput: FileNames=[Observed.xlsx, ObservedFACTS.xlsx]
      SheetNames=[PLOT5, ObservedFACTSSW, ObservedFACTSST, ObservedFACTSSoilN]
    PredictedObserved PredictedObservedWEPP: PredictedTableName=Report; ObservedTableName=PLOT5; FieldNameUsedForMatch=Date
  Folder Validation
    Folder WEPP
      Simulation Wagga
        Memo
          This simulation is a duplicate of the Eucalyptus validation Wagga simulation. The only change is the addition of the soil temperature model.
        Weather: FileName=%root%\Tests\Validation\Eucalyptus\wwepp.met
        Clock: Start=1991-07-01; End=1995-06-30
        Summary
        SoilArbitrator Soil Arbitrator
        Zone Plantation: Area=1; Slope=0; AspectAngle=0; Altitude=50
          Soil: Latitude=0; Longitude=0
            InitialWater Initial water: PercentMethod=1; FractionFull=0.8
            Physical
              Thickness  ParticleSizeClay  BD    AirDry  LL15  DUL   SAT
              100        9                 1.5   0.01    0.05  0.16  0.29
              300        11                1.6   0.01    0.05  0.15  0.29
              600        13                1.68  0.01    0.05  0.14  0.29
              1000       14                1.75  0.02    0.05  0.13  0.29
              1000       25                1.7   0.05    0.05  0.12  0.29
              1000       35                1.7   0.05    0.05  0.12  0.29
              1000       42                1.7   0.05    0.05  0.12  0.29
              1000       40                1.7   0.05    0.05  0.12  0.29
              SoilCrop EucalyptusSoil: LL=[0.01, 0.01, 0.01, 0.01, 0.01, 0.01, 0.01, 0.01]; KL=[0.07, 0.07, 0.05, 0.02, 0.02, 0.02, 0.01, 0.01]; XF=[1, 1, 1, 1, 0.3, 0.2, 0, 0]
              SoilCrop SCRUMSoil: LL=[0.01, 0.01, 0.01, 0.01, 0.01, 0.01, 0.01, 0.01]; KL=[0.07, 0.07, 0.05, 0.02, 0.02, 0.02, 0.01, 0.01]; XF=[1, 1, 1, 1, 0.3, 0.2, 0, 0]
            WaterBalance SoilWater: SummerDate=1-Nov; SummerU=4; SummerCona=3.5; WinterDate=1-Apr; WinterU=4; WinterCona=3.5; DiffusConst=88; DiffusSlope=35.4; Salb=0.13; CN2Bare=65; CNRed=20; CNCov=0.8; Slope=0; DischargeWidth=0; CatchmentArea=0
              Thickness  SWCON  KLAT
              100        0.9    0
              300        0.9    0
              600        0.9    0
              1000       0.6    0
              1000       0.6    0
              1000       0.6    0
              1000       0.6    0
              1000       0.6    0
            Organic: FOMCNRatio=60
              Thickness  Carbon  SoilCNRatio  FBiom  FInert  FOM
              100        2       14.5         0.04   0.4     0.29407
              300        1       14.5         0.03   0.5     0.253108
              600        0.5     14.5         0.02   0.5     0.187507
              1000       0.2     14.5         0.01   0.5     0.113729
              1000       0.12    14.5         0.01   0.9     0.06898
              1000       0.1     14.5         0.01   0.99    0.0418385
              1000       0.1     14.5         0.01   0.99    0.0253763
              1000       0.1     14.5         0.01   0.99    0.0153915
            Chemical
              Thickness  NO3N  NH4N  PH
              100        0.1   0.01  5.8
              300        0.1   0.01  5.7
              600        0.1   0.01  5.7
              1000       0.01  0.01  5.9
              1000       0.01  0.01  5.7
              1000       0.01  0.01  5.7
              1000       0.01  0.01  5.7
              1000       0.01  0.01  5.7
            Sample Initial nitrogen: Thickness=[100, 300, 600, 1000, 1000, 1000, 1000, 1000]; SWUnits=Volumetric; OCUnits=Total; PHUnits=Water
            CERESSoilTemperature
            Nutrient
            SoilTemperature
            LayerStructure: Thickness=[2, 2, 6, 10, 30, 50, 100, 100, 100, 100, 100]
          Irrigation
          Fertiliser
          SurfaceOrganicMatter: InitialResidueName=Wheat; InitialResidueType=Wheat; InitialResidueMass=2000; InitialStandingFraction=0; InitialCPR=0; InitialCNR=80
          MicroClimate: a_interception=0; b_interception=1; c_interception=0; d_interception=0; soil_albedo=0.13; SoilHeatFluxFraction=0; MinimumHeightDiffForNewLayer=0; NightInterceptionFraction=0; ReferenceHeight=0
          Plant Eucalyptus: CropType=Eucalyptus
          Plant SCRUM: CropType=SCRUM
          Manager TreeTransplantRule
            RowSpace = 3
            RowWidth = 3
            CultivarName = grandisCoffsHarbour
            SowingDate = 07/01/1991 00:00:00
```csharp
using Models.PMF;
using Models.Core;
using System;
namespace Models
{
    [Serializable] 
    [System.Xml.Serialization.XmlInclude(typeof(Model))]
    public class Script : Model
    {
        [Link] Plant Plant;
        [Link] Clock Clock;

        [Description("Spacing (m) between plants within rows")]
        public double RowSpace { get; set; }
        [Description("Spacing (m) between rows")]
        public double RowWidth { get; set; }

        [Description("Cultivar")]
        [Display(Type=DisplayType.CultivarName)]
        public string CultivarName { get; set; }
        [Description("Sowing Date")]
        public DateTime SowingDate { get; set; }

        [EventSubscribe("DoManagement")]
        private void OnDoManagement(object sender, EventArgs e)
        {
            double PlantPopulation = 1 / (RowWidth * RowSpace);

            if (Clock.Today.Date == SowingDate)
                Plant.Sow(population: PlantPopulation, 
                    cultivar: CultivarName, 
                    depth: 100, 
                    rowSpacing: 150);
            //Plant.Sow(... Contains the following arguements:
            //Population  double  Required  Seeds sowing/m2
            //Cultivar    string  Required  "NameOfCultivar"
            //Depth       double  Optional  Depth (mm) seed sown.   Default is 100mm 
            //MaxCover    double  Optional  Proportion (0-1) of the ground row crop will cover.   Default is 1.0
            //BudNumber   double  Optional  Number of mainstems per seed sown.  Default is 1.0
            //RowSpacing  double  Optional  Spaceing (mm) between drill rows when crop is sown.  Default is 150mm
            //CropClass   string  Optional  Crop class to instantiate when crop is sown.  Default is "Plant"
        }
    }
}
```
          Operations WeedSowing
            1991-07-01  [SCRUM].Sow(population: 1, cultivar: Barley_Autumn, depth: 10, rowSpacing: 150);
          Operations FertiliserOperations
            1987-02-09  [Fertiliser].Apply(192, Fertiliser.Types.UreaN, 0);
            1987-05-20  [Fertiliser].Apply(192, Fertiliser.Types.UreaN, 0);
            1987-08-28  [Fertiliser].Apply(96, Fertiliser.Types.UreaN, 0);
            1987-12-06  [Fertiliser].Apply(256, Fertiliser.Types.UreaN, 0);
            1988-02-29  [Fertiliser].Apply(256, Fertiliser.Types.UreaN, 0);
            1988-07-18  [Fertiliser].Apply(128, Fertiliser.Types.UreaN, 0);
            1988-10-26  [Fertiliser].Apply(192, Fertiliser.Types.UreaN, 0);
            1989-06-09  [Fertiliser].Apply(128, Fertiliser.Types.UreaN, 0);
            1989-10-27  [Fertiliser].Apply(96, Fertiliser.Types.UreaN, 0);
          Report: EventNames=[Clock].DoReport
            VariableNames:
              [Clock].Today as Date
              [Soil].SoilTemperature.ave_soil_temp[1] as SoilTemperature@1
              [Soil].SoilTemperature.ave_soil_temp[2] as SoilTemperature@25
              [Soil].SoilTemperature.ave_soil_temp[3] as SoilTemperature@75
              [Soil].SoilTemperature.ave_soil_temp[4] as SoilTemperature@150
              [Soil].SoilTemperature.ave_soil_temp[5] as SoilTemperature@250
              [Eucalyptus].Age
              [Eucalyptus].AboveGround.Wt
              [Eucalyptus].BelowGround.Wt
              [Eucalyptus].Leaf.Dead.Wt
              [Eucalyptus].Leaf.Live.Wt
              [Eucalyptus].Branch.Live.Wt
              [Eucalyptus].Leaf.Detached.Wt
              [Eucalyptus].Stem.Live.Wt
              [Eucalyptus].Total.N
              [Eucalyptus].Leaf.Live.N
              [Eucalyptus].Wood.Wt
              [Eucalyptus].Leaf.CoverGreen
              [Eucalyptus].Leaf.LAI
              [Eucalyptus].TotalLive.Wt
              [Eucalyptus].IndividualTreeLiveWt
              [Eucalyptus].IndividualTreeStemWt
              [Eucalyptus].Stem.DBH
              [Eucalyptus].Stem.Ht
              [Eucalyptus].RootShootRatio
              [Eucalyptus].Stem.Vol
              [Eucalyptus].Stem.MAI
              [SCRUM].Stover.LAI
              [SCRUM].Stover.Wt
          Manager AutoFertigate
            FASW = 0
            WaterDeficit = 0
            AutoIrrigationOn = True
            FASWThreshold = 0.95
            FASWDepth = 1000
            NConc = 3
```csharp
using APSIM.Shared.Utilities;
using System.Xml.Serialization;
using Models;
using Models.PMF;
using Models.Soils.Nutrients;
using Models.Soils;
using System.Text;
using System.Collections.Generic;
using Models.Core;
using System;

namespace Models
{
    [Serializable] 
    public class Script : Model
    {
        public double FASW { get; set; }
        public double WaterDeficit  { get; set; }
    
        [Link] Plant Chickpea;
        [Link] Zone zone;
        [Link] Irrigation irrigation;
        [Link] Fertiliser fertiliser;
        [Link] Soil soil;
        
        [Description("Auto irrigation on?")]
        public bool AutoIrrigationOn { get; set; }
        
        [Description("Threshold fraction available water (0-1)")]
        public double FASWThreshold { get; set; }

        [Description("Soil depth (mm) to which fraction available water is calculated")]
        public double FASWDepth { get; set; }

        [Description("N Concentration in irrigation water (ppm)")]
        public double NConc { get; set; }

        [EventSubscribe("DoManagement")]
        private void OnDoManagement(object sender, EventArgs e)
        {
            CalculateFASW();
            if (AutoIrrigationOn)
            {
                if (FASW < FASWThreshold)
                {
                    double amount = WaterDeficit * 10000.0 * NConc/1000000.0;
                    irrigation.Apply(WaterDeficit, depth: 0);
                    fertiliser.Apply(Amount: amount, Type: Fertiliser.Types.NO3N);
                }
            }
        }
        
        private void CalculateFASW()
        {
            double[] LL15 = MathUtilities.Multiply(soil.LL15, soil.Thickness);
            double[] DUL = MathUtilities.Multiply(soil.DUL, soil.Thickness);
        
            int nlayr = GetLayerIndex();
            double cumdep = MathUtilities.Sum(soil.Thickness, 0, nlayr, 0.0);

            double excess_fr = MathUtilities.Divide((cumdep - FASWDepth), soil.Thickness[nlayr], 0.0);

            // note that results may be strange if swdep < ll15
            double avail_sw = (MathUtilities.Sum(soil.Water, 0, nlayr, 0.0)
                              - excess_fr * soil.Water[nlayr])
                              - (MathUtilities.Sum(LL15, 0, nlayr, 0.0)
                              - excess_fr * LL15[nlayr]);


            double pot_avail_sw = (MathUtilities.Sum(DUL, 0, nlayr, 0.0)
                                  - excess_fr * DUL[nlayr])
                                  - (MathUtilities.Sum(LL15, 0, nlayr, 0.0)
                                  - excess_fr * LL15[nlayr]);

            FASW = MathUtilities.Divide(avail_sw, pot_avail_sw, 0.0);
            WaterDeficit = MathUtilities.Constrain(pot_avail_sw - avail_sw, 0.0, 100000);
        }

        private int GetLayerIndex()
        {
            double[] cumThickness = soil.ThicknessCumulative;
            for (int i = 1; i < cumThickness.Length; i++)
            {
                if (FASWDepth < cumThickness[i])
                    return i - 1;
            }
            
            return cumThickness.Length - 1;
        }

    }
}
```
          Manager Harvesting
            Crop = [Eucalyptus]
```csharp
using APSIM.Shared.Utilities;
using Models.Utilities;
using Models.Soils.Nutrients;
using Models.Soils;
using Models.PMF;
using Models.Core;
using System;

namespace Models
{
    [Serializable] 
    public class Script : Model
    {
        [Description("Crop")]
        public IPlant Crop { get; set; }
        
        [EventSubscribe("DoManagement")]
        private void OnDoManagement(object sender, EventArgs e)
        {
            if (Crop.IsReadyForHarvesting)
            {
                Crop.Harvest();
                Crop.EndCrop();
            }
        }
    }
}
```
    Folder Ames2017
      Memo FACTS data description
        This trial was conducted on deep fertile soils, in central Iowa (Ames) and in northwest Iowa (Sutherland), USA, in years 2015, 2016 and 2017. In each year two planting date were studied, early versus late. Row spacing was 76 cm, and plant population was around 35 plants/m2 (see details in APSIM managers). No nitrogen or irrigation applied. This region has shallow water tables (about 1.2 m below surface, range 0.3 to 3m) and the soil has no subsurface drainage. Data from years 2015 and 2017 have been incorporated while data from year 2016 will be added later. Local weather data (the station was positioned 10 m from the trial) and actual soil profile data (measured in Nov 2014 up to 1.2 meter, soil organic matter, texture, and pH by layer) were used. Additional soil data were taken from ssurgo. The following measurements were taken per plot (each treatment was replicated 3 times): Phenology (visual observations in the field using the V/R coding system); biomass samplings 6-9 times per season and per treatment (destructive sampling of 1 m2 per plot); biomass partitioning and dry weight of each plant tissue including green and yellow leaves, stem plus petioles, and pod-walls plus seeds (note that seeds were separated at the final harvest only); carbon and nitrogen concentration of each plant tissue (LECO CN analyzer); green leaf area index (LI Area Meter); node number and pod number per plant; leaf area per node in year 2015 only; root front depth over time (manual soil core technique) and maximum root depth, mass and length (mechanical gidding prode technique, depth of 240 cm) at approximately middle grain fill stage; daily soil water and temperature at two depths, 15 and 45 cm (5TM sensors placed horizontally, METEO group), daily water table depth (CTD-10 sensors, METEO group), and soil nitrate and ammonium approximately 10 times over each season and treatment at two depths 0-30 and 30-60 cm (sample was extracted in 2 M potassium chloride), and N-fixation over time (Isotope dilution method); soybean leaf senescence (gages to measure drop leaves dry matter and CN concentration, 1m2 size, 3-4 measurements per season per treatment); crop residue dry matter, soil cover and soil nitrogen and water measurements (manual samplings 10 times from crop harvest to planting of the next crop). This dataset is licensed by the Iowa State University Research Foundation.
      Experiment Ames2017
        Factors
          Factor Sow
            CompositeFactor Early
              Specifications:
                [SowingRule].Script.SowingDate=2017-05-16
                [SowingRule].Script.SowingRate=32
                [SowingRule].Script.SowingDepth=50
            CompositeFactor Late
              Specifications:
                [SowingRule].Script.SowingDate=2017-05-30
                [SowingRule].Script.SowingRate=35
                [SowingRule].Script.SowingDepth=5
        Simulation Ames2017Base
          Clock: Start=2017-01-01; End=2017-12-31
          Summary summaryfile
          Weather: FileName=Ames.met
          SoilArbitrator Soil Arbitrator
          Zone paddock: Area=1; Slope=0; AspectAngle=0; Altitude=50
            MicroClimate: a_interception=0; b_interception=1; c_interception=0.1; d_interception=0; soil_albedo=0.23; SoilHeatFluxFraction=0.4; MinimumHeightDiffForNewLayer=0; NightInterceptionFraction=0.5; ReferenceHeight=2
            Irrigation
            Fertiliser
            SurfaceOrganicMatter: InitialResidueName=maize; InitialResidueType=maize; InitialResidueMass=2000; InitialStandingFraction=0; InitialCPR=0; InitialCNR=80
            Report DailyReport: EventNames=[Clock].DoReport
              VariableNames:
                [Clock].Today
                [DiagnosticsVariables].Script.AccumPlantN
                [DiagnosticsVariables].Script.AccumMineralisation
                [DiagnosticsVariables].Script.AccumDenit
                [DiagnosticsVariables].Script.AccumFert
                [DiagnosticsVariables].Script.AccumLeach
                [DiagnosticsVariables].Script.AccumDetach
                [DiagnosticsVariables].Script.DeltaSoilOMN
                [DiagnosticsVariables].Script.DeltaSurfaceOMN
                [DiagnosticsVariables].Script.DeltaSoilMineralN
                [Soybean].Root.NSupply
                [Soil].SoilWater.Eo
                [Soil].SoilWater.Es
                [DiagnosticsVariables].Script.SWC
                [DiagnosticsVariables].Script.DUL
                [Soil].SoilWater.Drainage
                [Soil].SoilWater.Runoff
                [DiagnosticsVariables].Script.OutFlowLat
                [Soil].SoilWater.pond
                [DiagnosticsVariables].Script.AccumEO
                [DiagnosticsVariables].Script.AccumEP
                [DiagnosticsVariables].Script.AccumES
                [DiagnosticsVariables].Script.AccumDrainage
                [DiagnosticsVariables].Script.AccumRunoff
                [DiagnosticsVariables].Script.AccumRainfall
                [DiagnosticsVariables].Script.AccumIrrigation
                [DiagnosticsVariables].Script.AccumOutflowLat
                [DiagnosticsVariables].Script.SoilWaterDeficit
                [Soybean].Grain.Live.Wt
                [Soybean].Shell.Live.Wt
                [Soybean].Stem.Live.Wt
                [Soybean].Stem.Live.Wt
                [Soybean].Grain.Live.N
                [Soybean].Shell.Live.N
                [Soybean].Leaf.Live.Wt
                [Soybean].Root.Live.Wt
                [Soybean].Leaf.Live.N
                [Soybean].Root.Live.N
                [Soybean].Leaf.Live.NConc
                [Soybean].Root.Live.NConc
                [Soybean].Root.WaterSupply
                [Soybean].Root.WaterUptake
                [Soybean].Leaf.Transpiration
                [Soybean].Leaf.WaterDemand
                [Soybean].Root.Depth
                [Soybean].Leaf.CoverTotal
                [Soybean].Leaf.CoverDead
                [Soybean].Leaf.LAI
                [Soybean].Leaf.Height
                [Soybean].Leaf.PotentialBiomass
                [Soil].SoilWater.SWmm
                [Soil].Nutrient.NO3.kgha
                [DiagnosticsVariables].Script.SoilNitrogenContent
                [Soybean].Arbitrator.N.TotalPlantDemand
                [MicroClimate].net_radn
                [MicroClimate].peta
                [MicroClimate].petr
                [DiagnosticsVariables].Script.FomN
                [DiagnosticsVariables].Script.HumN
                [DiagnosticsVariables].Script.BiomN
                [DiagnosticsVariables].Script.DltNMinRes
                [DiagnosticsVariables].Script.DltNMinTot
                [Soybean].Leaf.Fw
                [Soybean].Leaf.Fn
                [Soybean].Phenology.CurrentPhaseName
                [Soybean].Phenology.Stage
                [Soybean].Pod.Wt
                [Soybean].Pod.N
                [Soybean].Structure.LeafTipsAppeared
                [Soybean].Structure.MainStemPrimordiaNo
                [Soybean].Leaf.CohortArea[1]
                [Soybean].Leaf.CohortArea[2]
                [Soybean].Leaf.CohortArea[3]
                [Soybean].Leaf.CohortArea[4]
                [Soybean].Leaf.CohortArea[5]
                [Soybean].Leaf.CohortArea[6]
                [Soybean].Leaf.CohortArea[7]
                [Soybean].Leaf.CohortArea[8]
                [Soybean].Leaf.CohortArea[9]
                [Soybean].Leaf.CohortArea[10]
                [Soybean].Leaf.CohortArea[11]
                [Soybean].Leaf.CohortArea[12]
                [Soybean].Leaf.CohortArea[13]
                [Soybean].Leaf.CohortArea[14]
                [Soybean].Leaf.CohortArea[15]
                [Soybean].Leaf.AppearedCohortNo
                [Soybean].Leaf.DeadCohortNo
                [Soybean].AboveGround.Wt
                [Soybean].Phenology.Stage
                [Soybean].Structure.MainStemPrimordiaNo
                [Soybean].Phenology.NFF
                [SoybeanHarvestRule].Script.FinalTag
                [Soybean].Grain.NumberFunction
                [Soybean].Shell.PodNumber
                [Soybean].Phenology.FN
                [Soybean].Phenology.FN.TotalNodes
                [Soybean].Phenology.FN.VegetativeNodes
            Manager SowingRule
              RowSpacing = 760
              SowingDepth = 50
              SowingRate = 32
              CultivarName = PioneerP932T16R_MG32
              SowingDate = 12/23/1997 00:00:00
```csharp
using APSIM.Shared.Utilities;
using Models.PMF;
using Models.Core;
using System;
        
        namespace Models
        {
           [Serializable] 
           [System.Xml.Serialization.XmlInclude(typeof(Model))]
            public class Script : Model
            {      
               [Link] Plant Soybean;
               [Link] Clock Clock;

               [Description("Spacing (mm) between rows")]
               public double RowSpacing { get; set; }
               [Description("Depth (mm) Grains are planted")]
               public double SowingDepth { get; set; }
               [Description("Seeds sown (/m2)")]
               public double SowingRate { get; set; }
               [Description("Cultivar")]
               [Display(Type=DisplayType.CultivarName)]
               public string CultivarName { get; set; }
               [Description("Sowing Date")]
               public DateTime SowingDate { get; set; }

               [EventSubscribe("DoManagement")]
               private void OnDoManagement(object sender, EventArgs e)
               {
                if (Clock.Today.Date == SowingDate)
                    Soybean.Sow(population:SowingRate, cultivar:CultivarName, depth:SowingDepth, rowSpacing:RowSpacing, budNumber:1);
               }
            }
        }
```
            Report HarvestReport: EventNames=[Soybean].Harvesting
              VariableNames:
                [Clock].Today
                [Soybean].Structure.MainStemPrimordiaNo
                [Soybean].Phenology.NFF
                [Soybean].Script.FinalTag
            Operations
            Plant Soybean: CropType=Soybean
            Soil: SoilType=Nicollet; LocalName=SoilAmesCorn; NearestTown=Ames; Region=Boone; State=Iowa; Country=US; ApsoilNumber=34; Latitude=42.02204; Longitude=-93.769115; DataSource=mesured data and web soil survey; Comments=hydrological parameters and BD from Saxton and Rawls, 2006
              Physical
                Thickness  BD    AirDry  LL15   DUL    SAT    KS
                25         1.25  0.135   0.174  0.31   0.445  151
                25         1.25  0.135   0.174  0.31   0.455  128
                50         1.25  0.15    0.174  0.3    0.42   239
                100        1.25  0.165   0.165  0.25   0.43   158
                100        1.25  0.12    0.12   0.22   0.35   144
                150        1.35  0.11    0.11   0.21   0.34   115
                150        1.35  0.102   0.102  0.22   0.33   103
                150        1.36  0.126   0.126  0.265  0.393  182
                150        1.36  0.133   0.133  0.261  0.364  168
                150        1.36  0.128   0.128  0.253  0.335  159
                150        1.4   0.128   0.128  0.2    0.37   2
                300        1.4   0.09    0.09   0.28   0.332  2
                300        1.4   0.09    0.09   0.18   0.242  2
                300        1.4   0.09    0.09   0.2    0.256  2
                400        1.4   0.09    0.09   0.191  0.234  2
                SoilCrop SoybeanSoil
                  LL=[0.174, 0.174, 0.174, 0.165, 0.12, 0.11, 0.102, 0.126, 0.133, 0.128, 0.128, 0.09, 0.09, 0.09, 0.09]
                  KL=[0.08, 0.08, 0.08, 0.08, 0.08, 0.08, 0.07, 0.06, 0.06, 0.04, 0.01, 0.01, 0.01, 0, 0]
                  XF=[1, 1, 1, 1, 1, 1, 1, 1, 1, 1, 1, 1, 0.5, 0, 0]
              Organic: FOMCNRatio=46
                Thickness  Carbon  SoilCNRatio  FBiom  FInert  FOM
                25         2.43    12.5         0.191  0.4     483.114
                25         2.34    12.5         0.164  0.4     468.836
                50         2.44    12.5         0.162  0.4     441.533
                100        2.37    12.5         0.055  0.441   391.605
                100        1.98    12.5         0.017  0.52    347.322
                150        1.95    12.5         0.018  0.619   290.108
                150        0.97    12.5         0.034  0.738   242.318
                150        0.98    12.5         0.04   0.802   202.401
                150        0.49    12.5         0.061  0.797   169.06
                150        0.49    12.5         0.053  0.798   141.211
                150        0.49    12.5         0.011  0.808   117.949
                300        0.49    12.5         0.01   0.857   82.2903
                300        0.49    12.5         0.012  0.95    57.412
                300        0.49    12.5         0.016  0.99    40.055
                400        0.49    12.5         0.01   0.99    24.7854
              Chemical
                Thickness  NO3N       NH4N       PH
                25         3.2        12.8       7.48
                25         4.8        12.8       7.48
                50         3.2        6.4        7.48
                100        1.2        3.2        7.38
                100        1.2        3.2        7.43
                150        0.592593   1.97531    7.43
                150        0.493827   1.97531    7.73
                150        0.490196   0.735294   7.73
                150        0.539216   0.735294   8.08
                150        0.441176   0.0490196  8.08
                150        0.380952   0.0952381  8.08
                300        0.261905   0.0714286  8.08
                300        0.119048   0.0952381  8.08
                300        0.0952381  0          8.08
                400        0          0          8.08
              Sample Initial nitrogen: SWUnits=Volumetric; OCUnits=Total; PHUnits=Water
                Thickness=[25, 25, 50, 100, 100, 150, 150, 150, 150, 150, 150, 300, 300, 300, 400]
                SW=[0.31, 0.31, 0.32, 0.25, 0.327, 0.304, 0.298, 0.285, 0.364, 0.335, 0.37, 0.332, 0.242, 0.256, 0.234]
              WaterBalance SoilWater: SummerDate=1-Nov; SummerU=6; SummerCona=3.5; WinterDate=1-Apr; WinterU=6; WinterCona=3.5; DiffusConst=88; DiffusSlope=35.4; Salb=0.2; CN2Bare=85; CNRed=20; CNCov=0.8; Slope=0; DischargeWidth=0; CatchmentArea=0; Thickness=[150, 150, 150, 150, 150, 150, 300, 300, 1000]; SWCON=[0.7, 0.7, 0.7, 0.7, 0.7, 0.7, 0.7, 0.7, 0.7]
              CERESSoilTemperature
              Nutrient
            Report FACTSReport: EventNames=[Clock].DoReport
              VariableNames:
                [Clock].Today
                [Soil].SoilWater.SW[4] as SW15cm
                ([Soil].SoilWater.SW[6]+[Soil].SoilWater.SW[7])/2 as SW45cm
                [Soil].Temperature[4] as ST15cm
                ([Soil].Temperature[6]+[Soil].Temperature[7])/2 as ST45cm
            Manager WaterTableManager
              InitialWaterTableDepth = 2000
              InSeasonWaterTableDepth = 1000
              StartDate = 05/01/2017 00:00:00
              EndDate = 05/20/2017 00:00:00
```csharp
using Models.Soils.Nutrients;
using Models.Soils;
using APSIM.Shared.Utilities;
using Models.PMF;
using Models.Core;
using System;
        
        namespace Models
        {
           [Serializable] 
           [System.Xml.Serialization.XmlInclude(typeof(Model))]
            public class Script : Model
            {      
               [Link] Soil Soil;
               [Link] Clock Clock;

               [Description("Initial Water Table Depth (mm)")]
               public double InitialWaterTableDepth { get; set; }

              [Description("InSeason Table Depth (mm)")]
               public double InSeasonWaterTableDepth { get; set; }

               [Description("Start Date")]
               public DateTime StartDate { get; set; }

               [Description("End Date")]
               public DateTime EndDate { get; set; }


        [EventSubscribe("StartOfSimulation")]
        private void OnSimulationCommencing(object sender, EventArgs e)
        {
        //(Soil.SoilWater).WaterTable = InitialWaterTableDepth;
        }       

               [EventSubscribe("DoManagement")]
               private void OnDoManagement(object sender, EventArgs e)
               {
                if (Clock.Today.Date >= StartDate && Clock.Today.Date >= EndDate)
                   (Soil.SoilWater).WaterTable = InSeasonWaterTableDepth;
                else
                    (Soil.SoilWater).WaterTable = InitialWaterTableDepth;
               }
            }
        }
```
            Operations Harvesting
              2017-10-20  [Soybean].Harvest();
              2017-10-20  [Soybean].EndCrop();
    Folder LincolnRainshelter
      Experiment RS_Rotation
        Memo Experiment Description
          ## Management
          Pre-experiment actions:
            23/08/2016 - Oats harvested
            02/09/2016 - Site irrigated with 25mm
            05/09/2016 - Site ploughed
            06/09/2016 - Site cambridge rolled
            17/10/2016 - Site power harrowed
            17/10/2016 - Rainshelter was rolled in
            18/10/2016 - Fertiliser application (200kg/ha of KCl, 250kg/ha of Triple Super, 200kg/ha of NaCl and 30kg/ha of Boronate 15%)
            18/10/2016 - Site cambridge rolled and harrowed

          Experiment:
           1) Fodder beet:
               - Cultivar: Rivage
               - Sowing density: 11 plants/m2
                    row spacing: 45 cm
                          depth: 15 mm

              General actions:
                  18/10/2016 - Sowing
                  25/10/2016 - Irrigation of 5mm to all plots
                  27/10/2016 - Plants started to emerge
                  28/10/2016 - Irrigation of 5mm to all plots
                  28/10/2016 - First fertiliser application, 25kgN/ha of urea_N to the 50kg/ha plots and 100kgN/ha o the 300kg/ha plots
                  23/11/2016 - Irrigation treatments started
                  18/01/2017 - Second fertiliser application, 25Nkg/ha of liquid urea_N to the 50kg/ha plots and 100kgN/ha to the 300kg/ha plots
                  15/02/2017 - Final fertiliser application, 100Nkg/ha of liquid urea_N to the 300kg/ha plots
                  17/05/2017 - Plots harvested

           Intercrop actions:
                  19/05/2017 - All crop residues removed
                  25/05/2017 - Dryland plots irrigated with 100mm, over two days
                  29/05/2017 - Dryland 300N plot irrigated with 64.0mm
                  30/05/2017 - Dryland 0N and 50N plots irrigated with 30.3 and 51.0mm
                  22/06/2017 - Site topped with maxitell
                  30/06/2017 - Site cambridge rolled
                  30/06/2017 - Rainshelter was rolled off (but it was put on in a few occasions)

           2) Oats:
               - Cultivar: Milton
               - Sowing density: 300 plants/m2
                    row spacing: 15 cm
                          depth: 45 mm

              General actions:
                  05/07/2017 - Sowing
                  05/07/2017 - Fertiliser application (400kg/ha Potash, Urea: treat4=40kgN/ha, treat5=85kgN/ha, treat6=270kgN/ha)
                  24/07/2017 - Plants started to emerge
                  11/09/2017 - Irrigation started in treatements 4, 5, and 6
                  06/11/2017 - Irrigation extended to all plots
                  04-09/01/2018 - Plots harvested
        Factors
          Permutation
            Factor Nit
              CompositeFactor 0
                Specifications:
                  [FertiliserSchedule]
                  [AdditionalActions].Script.NitFactor = 0
                  [CropOperations].Script.FertFactor = 0
                Operations 0
              CompositeFactor 50
                Specifications:
                  [FertiliserSchedule]
                  [AdditionalActions].Script.NitFactor = 50
                  [CropOperations].Script.FertFactor = 50
                Operations 50
                  2016-10-28  [Fertiliser].Apply(25, Fertiliser.Types.UreaN, 10);
                  2017-01-18  [Fertiliser].Apply(25, Fertiliser.Types.UreaN, 10);
              CompositeFactor 300
                Specifications:
                  [FertiliserSchedule]
                  [AdditionalActions].Script.NitFactor = 300
                  [CropOperations].Script.FertFactor = 300
                Operations 300
                  2016-10-28  [Fertiliser].Apply(100, Fertiliser.Types.UreaN, 10);
                  2017-01-18  [Fertiliser].Apply(100, Fertiliser.Types.UreaN, 10);
                  2017-02-15  [Fertiliser].Apply(100, Fertiliser.Types.UreaN, 10);
            Factor Irr
              CompositeFactor Full
                Specifications:
                  [IrrigationSchedule]
                  [AdditionalActions].Script.IrrFactor = true
                  [CropOperations].Script.IrrgFactor = true
                Operations Full
                  2016-11-23  [Irrigation].Apply(30.0)
                  2016-11-30  [Irrigation].Apply(25.0)
                  2016-12-07  [Irrigation].Apply(25.0)
                  2016-12-21  [Irrigation].Apply(25.2)
                  2016-12-29  [Irrigation].Apply(30.0)
                  2017-01-04  [Irrigation].Apply(40.0)
                  2017-01-11  [Irrigation].Apply(32.9)
                  2017-01-18  [Irrigation].Apply(25.4)
                  2017-01-25  [Irrigation].Apply(31.3)
                  2017-02-08  [Irrigation].Apply(33.0)
                  2017-02-15  [Irrigation].Apply(35.0)
                  2017-02-22  [Irrigation].Apply(29.0)
                  2017-03-08  [Irrigation].Apply(34.0)
                  2017-03-22  [Irrigation].Apply(50.1)
                  2017-04-12  [Irrigation].Apply(30.9)
                  2017-04-27  [Irrigation].Apply(18.9)
                  2017-09-11  [Irrigation].Apply(20.9)
                  2017-09-12  [Irrigation].Apply(21.1)
                  2017-09-13  [Irrigation].Apply(21.4)
                  2017-10-10  [Irrigation].Apply(22.2)
                  2017-10-11  [Irrigation].Apply(22.5)
                  2017-10-12  [Irrigation].Apply(22.5)
                  Memo
                    Have added an extra irrigation, on 22 Oct,

                    Data indcates water applied but no notes of it RFZ

                    In Statefactors have donethe irrigations for
                      17/12  21/1 19/11 14/1
              CompositeFactor Nil
                Specifications:
                  [IrrigationSchedule]
                  [AdditionalActions].Script.IrrFactor = false
                  [CropOperations].Script.IrrgFactor = false
                Operations Nil
                  Memo
                    Have added an extra irrigation, on 3 Nov,

                    Data indcates water applied but no notes of it RFZ
        Simulation Rainshelter
          Clock: Start=2016-09-28; End=2018-01-27
          Summary summaryfile
          Weather: FileName=lincoln.met
          SoilArbitrator Soil Arbitrator
          Zone paddock: Area=1; Slope=0; AspectAngle=0; Altitude=50
            Folder Manager folder
              Operations GeneralIrrigation
                2016-09-02  [Irrigation].Apply(25.0)
                2016-10-25  [Irrigation].Apply(5.0)
                2016-10-28  [Irrigation].Apply(5.0)
                2016-11-17  [Irrigation].Apply(2.0)
                2017-01-18  [Irrigation].Apply(10.0)
                2017-02-15  [Irrigation].Apply(10.0)
                2017-11-06  [Irrigation].Apply(45.0)
                2017-11-15  [Irrigation].Apply(30.0)
                2017-11-22  [Irrigation].Apply(29.7)
                2017-11-29  [Irrigation].Apply(35.0)
                2017-12-06  [Irrigation].Apply(46.7)
              Operations IrrigationSchedule
              Operations FertiliserSchedule
              Manager CropOperations
                FodderBeetPlantingDate = 10/18/2016 00:00:00
                FodderBeetHarvestingDate = 05/30/2017 00:00:00
                OatsPlantingDate = 07/05/2017 00:00:00
                OatsHarvestingDate1 = 01/05/2018 00:00:00
                OatsHarvestingDate2 = 01/10/2018 00:00:00
```csharp
using System.Xml.Serialization;
using APSIM.Shared.Utilities;
using Models.PMF;
using Models.Core;
using System;
        
namespace Models
{
    [Serializable] 
    [System.Xml.Serialization.XmlInclude(typeof(Model))]
    public class Script : Model
    {
        [Link(ByName = true)] Plant FodderBeet;
        [Link(ByName = true)] Plant Oats;
        [Link] Clock Clock;

        [Description("FodderBeet planting date: ")]
        public DateTime FodderBeetPlantingDate { get; set; }
        [Description("FodderBeet harvesting date: ")]
        public DateTime FodderBeetHarvestingDate { get; set; }
        [Description("Oats planting date: ")]
        public DateTime OatsPlantingDate { get; set; }
        [Description("Oats harvesting date 1: ")]
        public DateTime OatsHarvestingDate1 { get; set; }
        [Description("Oats harvesting date 2: ")]
        public DateTime OatsHarvestingDate2 { get; set; }
        
        [XmlIgnore] public string CropSown { get; set; }
        [XmlIgnore] public string CropAction { get; set; }

        [XmlIgnore] public bool IrrgFactor { get; set; }
        [XmlIgnore] public double FertFactor { get; set; }

        private RemovalFractions removalFractions;
        
        [EventSubscribe("StartOfSimulation")]
        private void OnSimulationCommencing(object sender, EventArgs e)
        {
            CropSown = "Fallow";
            CropAction = "-";

            // set removal fractions for FodderBeet(these overrides the default removals in the plant)
            removalFractions = new RemovalFractions();
            removalFractions.SetFractionToRemove("Leaf", 0.95, "Live");
            removalFractions.SetFractionToResidue("Leaf", 0.05, "Live");
            removalFractions.SetFractionToRemove("Leaf", 0.8, "Dead");
            removalFractions.SetFractionToResidue("Leaf", 0.2, "Dead");
            removalFractions.SetFractionToRemove("Petiole", 1.0, "Live");
            removalFractions.SetFractionToResidue("Petiole", 0.0, "Live");
            removalFractions.SetFractionToRemove("Petiole", 0.9, "Dead");
            removalFractions.SetFractionToResidue("Petiole", 0.1, "Dead");
            removalFractions.SetFractionToRemove("StorageRoot", 1.0, "Live");
            removalFractions.SetFractionToResidue("StorageRoot", 0.0, "Live");
            removalFractions.SetFractionToRemove("StorageRoot", 1.0, "Dead");
            removalFractions.SetFractionToResidue("StorageRoot", 0.0, "Dead");
            //complement for oats
            removalFractions.SetFractionToRemove("Stem", 0.9, "Live");
            removalFractions.SetFractionToResidue("Stem", 0.1, "Live");
            removalFractions.SetFractionToRemove("Stem", 0.8, "Dead");
            removalFractions.SetFractionToResidue("Stem", 0.2, "Dead");
            removalFractions.SetFractionToRemove("Panicle", 0.9, "Live");
            removalFractions.SetFractionToResidue("Panicle", 0.1, "Live");
            removalFractions.SetFractionToRemove("Panicle", 0.8, "Dead");
            removalFractions.SetFractionToResidue("Panicle", 0.2, "Dead");
            removalFractions.SetFractionToRemove("Grain", 1.0, "Live");
            removalFractions.SetFractionToResidue("Grain", 0.0, "Live");
            removalFractions.SetFractionToRemove("Grain", 1.0, "Dead");
            removalFractions.SetFractionToResidue("Grain", 0.0, "Dead");

        }
        
        [EventSubscribe("DoManagement")]
        private void OnDoManagement(object sender, EventArgs e)
        {
            CropAction = "-";

            if (Clock.Today.Date == FodderBeetPlantingDate)
            {
                FodderBeet.Sow(population: 9, cultivar: "Rivage", depth: 5, rowSpacing: 500);
                CropSown = "FodderBeet";
                CropAction = "Sowing";
            }
            
            if (Clock.Today.Date == OatsPlantingDate)
            {
                Oats.Sow(population: 400, cultivar: "Milton", depth: 45, rowSpacing: 45);
                CropSown = "Oats";
                CropAction = "Sowing";
            }
            
            
            if (Clock.Today.Date == FodderBeetHarvestingDate)
            {
                FodderBeet.Harvest(removalFractions);
                //FodderBeet.EndCrop();
                //CropSown = "Fallow";
                CropAction = "Harvesting";
            }
            if (Clock.Today.Date == FodderBeetHarvestingDate.AddDays(1))
            {
                //FodderBeet.Harvest(removalFractions);
                FodderBeet.EndCrop();
                CropSown = "Fallow";
            }

            if (Clock.Today.Date == OatsHarvestingDate1)
            {
               if((FertFactor == 0) || ((IrrgFactor == false) && (FertFactor == 50)))
               {
                   Oats.Harvest(removalFractions);
                   CropAction = "Harvesting";
               }
            }

            if (Clock.Today.Date == OatsHarvestingDate2)
            {
               if((FertFactor == 300) || ((IrrgFactor == true) && (FertFactor == 50)))
               {
                   Oats.Harvest(removalFractions);
                   CropAction = "Harvesting";
               }
            }

            if (Clock.Today.Date == OatsHarvestingDate1.AddDays(1))
            {
               if((FertFactor == 0) || ((IrrgFactor == false) && (FertFactor == 50)))
               {
                   Oats.EndCrop();
                   CropSown = "Fallow";
               }
            }

            if (Clock.Today.Date == OatsHarvestingDate2.AddDays(1))
            {
               if((FertFactor == 300) || ((IrrgFactor == true) && (FertFactor == 50)))
               {
                   Oats.EndCrop();
                   CropSown = "Fallow";
               }
            }
        }
        
    }
}
```
              Manager ClimateControl
                StartDate = 10/17/2016 00:00:00
                EndDate = 06/30/2017 00:00:00
                OtherDateString = 27/07/2017 28/07/2017 29/07/2017 30/07/2017 31/07/2017 08/08/2017 09/08/2017 10/08/2017 11/08/2017 12/08/2017 13/08/2017 14/08/2017 15/08/2017 16/08/2017 17/08/2017 18/08/2017 28/08/2017 29/08/2017 30/08/2017 31/08/2017
```csharp
using System.Xml.Serialization;
using Models;
using Models.PMF;
using System.Text;
using System.Collections.Generic;
using APSIM.Shared.Utilities;
using Models.Core;
using System;

// This script simulates a rainshelter, it controls the amount of rainfall (=0.0) and radiation (=95% of weather)
// It does that for a period between two dates, as well as at sporadic dates

namespace Models
{
    [Serializable] 
    [System.Xml.Serialization.XmlInclude(typeof(Model))]
    public class Script : Model
    {
        [Link] Weather Met;
        [Link] Clock Clock;
    
        [Description("Start date: ")]
        public DateTime StartDate { get; set; }
        [Description("End date: ")]
        public DateTime EndDate { get; set; }
         [Description("Other dates: ")]
         public string OtherDateString  { get; set; }

         [XmlIgnore] public string RainshelterCover  { get; set; }

         private DateTime[] OtherDates;
         private double todaysRain;

        [EventSubscribe("StartOfSimulation")]
        private void OnSimulationCommencing(object sender, EventArgs e)
        {
            //gather the dates the variables will be controlled
            string[] auxDates = OtherDateString.Split(new Char []{' ',','});
            OtherDates = new DateTime[auxDates.Length];
            for (int i = 0; i < auxDates.Length; i++)
                OtherDates[i] = DateTime.Parse(auxDates[i]);

            RainshelterCover = "Off";
        }

        [EventSubscribe("PreparingNewWeatherData")]
        private void OnPreparingNewWeatherData(object sender, EventArgs e)
        {
            RainshelterCover = "Off";

            if ((Clock.Today.Date >= StartDate.Date) && (Clock.Today.Date <= EndDate.Date))
            {
                todaysRain = Met.Rain;
                changeMetData();
            }
            else
            {
                for (int i = 0; i < OtherDates.Length; i++)
                    if (Clock.Today.Date == OtherDates[0].Date)
                        changeMetData();
            }

            // rain shelter partial day cover
            if (Clock.Today.Date == DateTime.Parse("01/09/2017").Date)
                Met.Rain -= 2.0;
            if (Clock.Today.Date == DateTime.Parse("08/11/2017").Date)
                Met.Rain -= 0.3;

            // rain shelter cover removed for weekend
            if ((Clock.Today.Date == DateTime.Parse("03/06/2017").Date)||(Clock.Today.Date == DateTime.Parse("04/06/2017").Date))
            {
                Met.Rain = todaysRain;
                //Met.Radn /= 0.95;
                RainshelterCover = "Off";
            }
        }

        private void changeMetData()
        {
            Met.Rain *= 0.0;
            //Met.Radn *= 0.95;
            RainshelterCover = "On";
        }
    }
}
```
              Manager AdditionalActions
                IrrFactor = False
                NitFactor = 0
```csharp
using APSIM.Shared.Utilities;
using System.Xml.Serialization;
using Models;
using Models.PMF;
using Models.Soils;
using System.Text;
using System.Collections.Generic;
using Models.Core;
using System;

// This script performs management actions that are not common to all treatments

namespace Models
{
    [Serializable] 
    public class Script : Model
    {
        [Link] Clock Clock;
        [Link] Irrigation Irrigation;
        [Link] Fertiliser Fert;
        [Link] Soil ThisSoil;

        [Description("Allow irrigation to be applied?")]
        public bool IrrFactor { get; set; }
        [Description("Amount of fertiliser to be applied (kg/ha)")]
        public double NitFactor { get; set; }

        [EventSubscribe("StartOfSimulation")]
        private void OnSimulationCommencing(object sender, EventArgs e)
        {
            //    SetSoilLayers();
        }
        
        [EventSubscribe("DoManagement")]
        private void OnDoManagement(object sender, EventArgs e)
        {
            // Fodderbeet - irrigation on high fert plots only
            if ((IrrFactor == true) && (NitFactor == 300))
            {
                if (Clock.Today.Date == DateTime.Parse("01-Feb-2017"))
                    Irrigation.Apply(40.0);
                if (Clock.Today.Date == DateTime.Parse("01-Mar-2017"))
                    Irrigation.Apply(32.6);
            }
        
            // Oats - Irrigation on dryland plots only, after harvest
            if (IrrFactor == false)
            {
                if ((Clock.Today.Date == DateTime.Parse("25-May-2017")) || (Clock.Today.Date == DateTime.Parse("26-May-2017")))
                    Irrigation.Apply(50.0);

                if (Clock.Today.Date == DateTime.Parse("29-May-2017"))
                if (NitFactor == 300)
                    Irrigation.Apply(64.0);

                if (Clock.Today.Date == DateTime.Parse("30-May-2017"))
                {
                    if (NitFactor == 0)
                        Irrigation.Apply(30.3);
                    if (NitFactor == 50)
                        Irrigation.Apply(51.0);
                }
            }

            // Oats - Irrigation on all 300N plots plus dryland 50N plots
            if (Clock.Today.Date == DateTime.Parse("13-Dec-2017"))
            {
                if (NitFactor == 300)
                    Irrigation.Apply(50.0);
                if ((NitFactor == 50) && (IrrFactor == false))
                    Irrigation.Apply(50.0);
            }

            // Oats - Fertiliser for irrigated plots only, on sowing
            if (Clock.Today.Date == DateTime.Parse("05-Jul-2017"))
            if (IrrFactor == true)
            {
                if (NitFactor == 0)
                    Fert.Apply(40, Models.Fertiliser.Types.UreaN, 10);
                if (NitFactor == 50)
                    Fert.Apply(85, Models.Fertiliser.Types.UreaN, 10);
                if (NitFactor == 300)
                    Fert.Apply(270, Models.Fertiliser.Types.UreaN, 10);
            }
        }
    }
}
```
            MicroClimate: a_interception=0; b_interception=1; c_interception=0; d_interception=0; soil_albedo=0.23; SoilHeatFluxFraction=0.4; MinimumHeightDiffForNewLayer=0; NightInterceptionFraction=0.5; ReferenceHeight=2
            Irrigation
            Fertiliser
            SurfaceOrganicMatter Surface Organic Matter: InitialResidueName=oat_stubble; InitialResidueType=oats; InitialResidueMass=1500; InitialStandingFraction=0.5; InitialCPR=0; InitialCNR=20
            Soil: SoilType=Silt loam over sand; LocalName=Templeton; Site=RainShelter; NearestTown=Lincoln; Region=Plains; State=Canterbury; Country=New Zealand; Latitude=37.15; Longitude=172.28; Comments=TEMPLETON-RS
              Memo Info
                # Soil Profile Description

                Templeton Silt Loam over sand, Typic Immature Pallic soil

                 Horizon  Depth (cm) Description
                 Ah         0-28     Very dark grayish brown (10YR 3/2); silt loam; no stones; moderately developed fine to medium blocky structure
                 Bw(f)     28-55     Dark yellowish brown (10YR 4/4); silt loam; no stones; weakly developed coarse to very coarse blocky structure
                 Bw(g)     55-95     Olive brown (2.5Y 4/4); fine sandy loam; no stones; apedal massive
                 2BC(g)    95-145    Olive brown (2.5Y 4/4); loamy sand;no stones; apedal single-grain
                 3BCg     145-153    Light yellowish brown (2.5Y 6/3); silt loam; no stones; apedal massive
                 4BCg     153-200+   Light yellowish brown (2.5Y 6/3); medium sand; no stones; apedal single-grain
                 ** 2BC(g) horizon contains a band of massive silt loam material between 115-130 cm

                Sampling layers:
                Layer  Depth (cm)
                 1	  0-15
                 2	 15-30
                 3	 30-60
                 4	 60-90
                 5	 90-120
                 6	120-150
                 7	150-180 -- Only for water

                Soil parameterisation was based on the two description of the soil at the Rainshelter, with most data being a combination of "templeton-2" description (SWAMP survey) and the vbalues estimated based on the monitoring of the site.
              Chemical
                Thickness  NO3N      NH4N      PH
                150        8.96057   1.19474   6.1
                150        7.92976   1.41603   6.1
                300        0.917191  1.17925   6
                350        0.849705  0.478277  6
                200        0.712335  0.356168  6
                150        0.697162  0.425201  6
                150        0.689576  0.459717  6
                100        0.573281  0.344105  6
                200        0.456986  0.228493  6
                250        0.361303  0.180651  6
              Physical
                Thickness  ParticleSizeClay  ParticleSizeSand  ParticleSizeSilt  BD     AirDry  LL15   DUL    SAT    KS
                150        24                15.9              60.1              1.116  0.063   0.126  0.359  0.534  3472.3
                150        23.2              14.3              62.5              1.177  0.124   0.127  0.352  0.521  1374.7
                300        17.9              16.1              66                1.272  0.117   0.117  0.346  0.494  539.5
                350        13.3              45.5              41.2              1.337  0.12    0.12   0.344  0.47   3985.6
                200        12                42                46                1.404  0.143   0.143  0.358  0.446  2582.8
                150        16.7              11.4              71.9              1.47   0.147   0.147  0.366  0.424  111
                150        12.7              27.4              59.9              1.434  0.13    0.13   0.3    0.436  516.8
                100        12.8              35.1              52                1.459  0.118   0.118  0.276  0.429  1457.9
                200        11.5              40.7              50.9              1.453  0.099   0.099  0.24   0.433  4616.8
                250        11.8              37.9              50.3              1.482  0.089   0.089  0.227  0.428  4841.5
                SoilCrop FodderBeetSoil
                  LL=[0.126, 0.127, 0.117, 0.12, 0.143, 0.147, 0.13, 0.118, 0.099, 0.089]
                  KL=[0.093, 0.066, 0.059, 0.047, 0.028, 0.014, 0.008, 0.007, 0.003, 0]
                  XF=[1, 1, 1, 1, 1, 1, 1, 1, 1, 1]
                SoilCrop OatsSoil
                  LL=[0.126, 0.127, 0.117, 0.12, 0.143, 0.147, 0.13, 0.118, 0.099, 0.089]
                  KL=[0.083, 0.066, 0.053, 0.043, 0.022, 0.007, 0.008, 0.005, 0.004, 0.002]
                  XF=[1, 1, 1, 1, 1, 1, 1, 1, 1, 1]
              WaterBalance SoilWater: SummerDate=1-Oct; SummerU=9; SummerCona=4; WinterDate=1-Apr; WinterU=6; WinterCona=3; DiffusConst=88; DiffusSlope=35; Salb=0.15; CN2Bare=60; CNRed=10; CNCov=0.8; Slope=0; DischargeWidth=0; CatchmentArea=0
                Thickness  SWCON  KLAT
                150        0.553  0
                150        0.521  0
                300        0.456  0
                350        0.511  0
                200        0.524  0
                150        0.451  0
                150        0.494  0
                100        0.546  0
                200        0.538  0
                250        0.532  0
              SoilNitrogen: fom_types=[default, manure, mucuna, lablab, shemp, stable]; fract_carb=[0.2, 0.3, 0.54, 0.57, 0.45, 0]; fract_cell=[0.7, 0.3, 0.37, 0.37, 0.47, 0.1]; fract_lign=[0.1, 0.4, 0.09, 0.06, 0.08, 0.9]
                SoilNitrogenNO3 NO3
                SoilNitrogenNH4 NH4
                SoilNitrogenUrea Urea
                SoilNitrogenPlantAvailableNO3 PlantAvailableNO3
                SoilNitrogenPlantAvailableNH4 PlantAvailableNH4
              Organic: FOMCNRatio=30
                Thickness  Carbon  SoilCNRatio  FBiom  FInert  FOM
                150        2.55    11           0.08   0.2     291.718
                150        2.09    11           0.04   0.325   232.942
                300        0.52    11           0.018  0.6     148.53
                350        0.23    11           0.01   0.85    87.8638
                200        0.18    11           0.008  0.95    65.0911
                150        0.15    11           0.008  0.98    51.9763
                150        0.15    11           0.008  0.99    41.5039
                100        0.12    11           0.008  0.992   35.7227
                200        0.11    11           0.005  0.995   26.4641
                250        0.1     11           0.005  0.995   18.1885
              CERESSoilTemperature
              Sample Initial Soil Settings: Thickness=[150, 150, 300, 300, 300, 300, 300, 200]; SW=[0.3, 0.28, 0.27, 0.3, 0.28, 0.26, 0.22, 0.22]; SWUnits=Volumetric; OCUnits=Total; PHUnits=Water
              LayerStructure: Thickness=[150, 150, 300, 300, 300, 300, 300, 200]
            Plant Oats: CropType=Wheat
            Report FRNLReport: EventNames=[Clock].DoReport
              VariableNames:
                [Clock].Today
                [CropOperations].Script.CropSown
                [CropOperations].Script.CropAction
                [ClimateControl].Script.RainshelterCover
                [FodderBeet].Phenology.Stage
                [FodderBeet].Phenology.CurrentPhaseName
                [FodderBeet].Phenology.CurrentStageName
                [Oats].Phenology.Stage
                [FodderBeet].Structure.MainStemPopn
                [FodderBeet].Leaf.Live.Wt
                [FodderBeet].Petiole.Live.Wt
                [FodderBeet].StorageRoot.Live.Wt
                [FodderBeet].Root.Live.Wt
                [FodderBeet].AboveGround.N
                [FodderBeet].Leaf.N
                [FodderBeet].Petiole.N
                [FodderBeet].StorageRoot.N
                [FodderBeet].Total.NConc
                [FodderBeet].AboveGround.NConc
                [FodderBeet].Leaf.Live.NConc
                [FodderBeet].Petiole.NConc
                [FodderBeet].StorageRoot.NConc
                [FodderBeet].Root.NConc
                [FodderBeet].Leaf.LAI
                [FodderBeet].Leaf.CoverTotal
                [FodderBeet].Leaf.GreenCohortNo
                [FodderBeet].Leaf.DeadCohortNo
                [FodderBeet].Structure.LeafTipsAppeared
                [FodderBeet].Leaf.Height
                [FodderBeet].Root.Depth
                [FodderBeet].Leaf.Fn
                [FodderBeet].Leaf.Fw
                [FodderBeet].Leaf.Fw
                [Oats].Structure.MainStemPopn
                [Oats].AboveGroundLive.Wt as Oats.AboveGround.Live.Wt
                [Oats].Leaf.Live.Wt
                [Oats].Stem.Live.Wt
                [Oats].Panicle.Live.Wt
                [Oats].Grain.Live.Wt
                [Oats].Root.Live.Wt
                [Oats].Ear.Wt
                [Oats].Panicle.Wt
                [Oats].Leaf.Dead.Wt
                [Oats].AboveGround.N
                [Oats].Leaf.N
                [Oats].Stem.N
                [Oats].Grain.N
                [Oats].Total.NConc
                [Oats].AboveGround.NConc
                [Oats].Leaf.Live.NConc
                [Oats].Stem.Live.NConc
                [Oats].Leaf.Dead.Nconc
                [Oats].Stem.NConc
                [Oats].Grain.NConc
                [Oats].Root.NConc
                [Oats].Ear.NConc
                [Oats].Grain.Live.NConc
                [Oats].Panicle.Live.NConc
                [Oats].Leaf.LAI
                [Oats].Leaf.CoverTotal
                [Oats].Leaf.GreenCohortNo
                [Oats].Leaf.DeadCohortNo
                [Oats].Structure.LeafTipsAppeared
                [Oats].Leaf.ExpandedCohortNo
                [Oats].Leaf.SenescingCohortNo
                [Oats].Leaf.Height
                [Oats].Root.Depth
                [Oats].Leaf.Fn
                [Oats].Leaf.Fw
                [Oats].Leaf.Fw
                [Weather].Rain
                [Irrigation].IrrigationApplied
                ([FodderBeet].Leaf.Transpiration + [Oats].Leaf.Transpiration + [Soil].SoilWater.Es + [MicroClimate].PrecipitationInterception) as ET
                ([FodderBeet].Leaf.Transpiration + [Soil].SoilWater.Es + [MicroClimate].PrecipitationInterception) as FodderBeet_ET
                ([Oats].Leaf.Transpiration + [Soil].SoilWater.Es + [MicroClimate].PrecipitationInterception) as Oats_ET
                [Soil].SoilWater.Es as Evaporation
                ([FodderBeet].Leaf.Transpiration + [Oats].Leaf.Transpiration) as Transpiration
                [Soil].SoilWater.Drainage as Drainage
                [Soil].SoilWater.Runoff as Runoff
                sum([Soil].SoilWater.SWmm) as TotalSoilWater
                sum([Soil].SATmm) as TotalSoilSAT
                sum([Soil].DULmm) as TotalSoilDUL
                sum([Soil].LL15mm) as TotalSoilLL
                sum([Soil].SoilWater.SWmm[1:7]) as Soil.SoilWater.ProfileWater
                [Soil].SoilWater.SW
                [Soil].SoilWater.SWmm
                [Fertiliser].NitrogenApplied as FertiliserN
                sum([Soil].SoilNitrogen.dlt_n_min_res) as SurfOMMineralisedN
                sum([Soil].SoilNitrogen.MineralisedN) as MineralisedN
                sum([Soil].SoilNitrogen.Denitrification) as DenitrifiedN
                (-[FodderBeet].Root.NUptake - [Oats].Root.NUptake) as UptakeN
                ([Soil].SoilWater.LeachNO3+[Soil].SoilWater.LeachNH4) as Soil.SoilNitrogen.NLeached
                ([Soil].SoilWater.FlowNO3[3] + [Soil].SoilWater.FlowNH4[3]) as Soil.SoilNitrogen.NLeach60cm
                [SurfaceOrganicMatter].N as TotalSurfOMN
                sum([Soil].SoilNitrogen.FOMN) as TotalFOMN
                sum([Soil].SoilNitrogen.MicrobialN) as TotalMicrobialN
                sum([Soil].SoilNitrogen.HumicN) as TotalHumicN
                (sum([Soil].SoilNitrogen.NH4.kgha) + sum([Soil].SoilNitrogen.NO3.kgha)) as TotalSoilN
                sum([Soil].SoilNitrogen.Urea.kgha) as TotalUrea
                sum([Soil].SoilNitrogen.NH4.kgha) as TotalNH4
                sum([Soil].SoilNitrogen.NO3.kgha) as TotalNO3
                sum([Soil].SoilNitrogen.NH4.kgha[1:6]) as Soil.SoilNitrogen.ProfileNH4
                sum([Soil].SoilNitrogen.NO3.kgha[1:6]) as Soil.SoilNitrogen.ProfileNO3
                sum([Soil].SoilNitrogen.NH4.kgha[1:6]+[Soil].SoilNitrogen.NO3.kgha[1:6]) as Soil.SoilNitrogen.ProfileMineralN
                [Soil].SoilNitrogen.NH4.kgha
                [Soil].SoilNitrogen.NO3.kgha
                ([Soil].SoilNitrogen.NH4.kgha+[Soil].SoilNitrogen.NO3.kgha) as Soil.SoilNitrogen.mineral_n
                [Soil].Thickness
                [Soil].Temperature
                [Weather].MeanT
                [Weather].Radn
            Plant FodderBeet: CropType=FodderBeet
  Replacements
    Report DailyReport: EventNames=[Clock].DoReport
      VariableNames:
        [Clock].Today
        [Clock].Today.DayOfYear
        [Soybean].Phenology.DaysAfterSowing
        [Soybean].Phenology.Stage
        [Weather].MeanT
        [Weather].Radn
        [Weather].MaxT
        [Weather].MinT
        [Soybean].Arbitrator.DM.TotalFixationSupply
        sum([Soybean].Arbitrator.N.Fixation) as NFixed
        [Soybean].Arbitrator.DM.TotalPlantDemand
        [Soybean].Arbitrator.WDemand
        [Soybean].Arbitrator.WSupply
        [Soybean].Phenology.CurrentStageName
        [Soybean].Phenology.Photoperiod
        [Soybean].AboveGround.Wt
        [Soybean].AboveGround.N
        [Soybean].Leaf.NodeNumber
        [Soybean].Leaf.Fw
        [Soybean].Leaf.Fn
        [Soybean].Leaf.Photosynthesis.FT
        [Soybean].Leaf.LAI
        [Soybean].Leaf.LAITotal
        [Soybean].Leaf.CoverGreen
        [Soybean].Leaf.CoverTotal
        [Soybean].Leaf.Live.Wt
        [Soybean].Leaf.Live.StructuralWt
        [Soybean].Leaf.Live.MetabolicWt
        [Soybean].Leaf.Allocated.MetabolicWt
        [Soybean].Leaf.Allocated.StructuralWt
        [Soybean].Leaf.Dead.StructuralWt
        [Soybean].Leaf.Dead.MetabolicWt
        [Soybean].Leaf.Live.N
        [Soybean].Leaf.Live.NConc
        [Soybean].Leaf.SpecificArea
        [Soybean].Leaf.Wt
        [Soybean].Leaf.Nconc
        [Soybean].Leaf.Senesced.Wt
        [Soybean].Stem.Wt
        [Soybean].Stem.Total.StructuralWt
        [Soybean].Stem.Live.StructuralWt
        [Soybean].Stem.Live.StructuralN
        [Soybean].Stem.N
        [Soybean].Stem.Nconc
        [Soybean].Shell.Wt
        [Soybean].Shell.Live.Wt
        [Soybean].Shell.N
        [Soybean].Shell.Nconc
        [Soybean].Grain.Wt
        [Soybean].Grain.N
        [Soybean].Grain.Nconc
        [Soybean].Shell.Wt
        [Soybean].Pod.Wt
        [Soybean].Pod.N
        [Soybean].Pod.NConc
        [Soybean].Nodule.NFixed
        [Soybean].Root.Wt
        sum([Soil].Nutrient.NO3.kgha) as TotalSoilNO3
        sum([Soil].Nutrient.NH4.kgha) as TotalSoilNH4
        sum([Soil].SoilWater.SWmm) as TotalSW
        [Soil].SoilWater.SW[1:3]
        [Soybean].Leaf.Height
        [Soybean].Root.Depth
        sum([Soil].SoilWater.ESW) as TotalESW
    Report HarvestReport: EventNames=[Soybean].Harvesting
      VariableNames:
        [Clock].Today
        [Soybean].Phenology.CurrentStageName
        [Soybean].Phenology.EmergenceDAS
        [Soybean].Phenology.FloweringDAS
        [Soybean].Phenology.MaturityDAS
        [Soybean].AboveGround.Wt
        [Soybean].Grain.Wt
    Report FACTSReport: EventNames=[Clock].DoReport
      VariableNames:
        [Clock].Today
        [Soil].SoilWater.SW[4] as SW15cm
        ([Soil].SoilWater.SW[6]+[Soil].SoilWater.SW[7])/2 as SW45cm
        [Soil].Temperature[4] as ST15cm
        ([Soil].Temperature[6]+[Soil].Temperature[7])/2 as ST45cm
        [Soil].SoilWater.WaterTable
        ([Soybean].Leaf.Transpiration + [Soil].SoilWater.Es + [MicroClimate].PrecipitationInterception) as ET
        [Soybean].Nodule.FixationRate
        [Soybean].Root.Depth
        sum([Soil].Nutrient.NO3.kgha[1:13]) as RootZoneNO3
        sum([Soil].Nutrient.NH4.kgha[1:13]) as RootZoneNH4
        sum([Soil].Nutrient.NO3.kgha[1:5]) as SoilNO3_30cm
        sum([Soil].Nutrient.NH4.kgha[1:5]) as SoilNH4_30cm
        sum([Soil].Nutrient.NO3.kgha[6:7]) as SoilNO3_60cm
        sum([Soil].Nutrient.NH4.kgha[6:7]) as SoilNH4_60cm
        [SurfaceOrganicMatter].N
        [SurfaceOrganicMatter].C
        [SurfaceOrganicMatter].Wt
        sum([Soil].Nutrient.FOMC[1:13]) as FOM
    Plant Soybean: CropType=Soybean; IsAlive=false; IsEnding=false; DaysAfterEnding=0
      OrganArbitrator Arbitrator
        BiomassTypeArbitrator DMArbitration
          Folder PotentialPartitioningMethods
            ReallocationMethod
            AllocateFixationMethod
            RetranslocationMethod
            SendPotentialDMAllocationsMethod
          Folder AllocationMethods
            NutrientConstrainedAllocationMethod
            DryMatterAllocationsMethod
          RelativeAllocation ArbitrationMethod
        BiomassTypeArbitrator NArbitration
          Folder PotentialPartitioningMethods
            ReallocationMethod
          Folder ActualPartitioningMethods
            AllocateFixationMethod
            RetranslocationMethod
          Folder AllocationMethods
            NitrogenAllocationsMethod
          RelativeAllocation ArbitrationMethod
          AllocateUptakesMethod
        WaterUptakeMethod
        NitrogenUptakeMethod
      Phenology
        Memo Introduction
          In the new model we simplified phenology by taking out stages that are not measurable (e.g. end of juvenile stage) and by adding new stages that are measurable (e.g. start pod).
          The new phenology follows the V/R staging system
        AirTemperatureFunction VegetativeThermalTime
          XYPairs: X=[10, 20, 30, 40]; Y=[0, 10, 20, 0]
        LinearInterpolationFunction VegetativePhotoperiodModifier
          XYPairs: X=[14.43, 21.19]; Y=[1, 0]
          Memo
            These parameters are overridden by cultivar parameter descriptions to capture the difference between individual cultivars in terms of their phenological development.  Responses shown here are only indicative.  See cultivar descriptions for more information.
          VariableReference XValue: VariableName=[Phenology].Photoperiod
        AirTemperatureFunction ReproductiveThermalTime
          XYPairs: X=[10, 15, 30, 40]; Y=[5, 5, 20, 0]
        LinearInterpolationFunction ReproductivePhotoperiodModifier: same as Replacements.Soybean.Phenology.VegetativePhotoperiodModifier
        PhaseLookup ThermalTime
          PhaseLookupValue PreEmergence: Start=Sowing; End=Emergence
            VariableReference Base: VariableName=[Phenology].VegetativeThermalTime
          PhaseLookupValue VegetativeGrowth: Start=Emergence; End=EndCanopyDevelopment
            MultiplyFunction TT
              VariableReference Base: VariableName=[Phenology].VegetativeThermalTime
              VariableReference PPModifier: VariableName=[Phenology].VegetativePhotoperiodModifier
          PhaseLookupValue ReproductiveGrowth: Start=EndCanopyDevelopment; End=HarvestRipe
            MultiplyFunction TT
              VariableReference Base: VariableName=[Phenology].ReproductiveThermalTime
              VariableReference PPModifier: VariableName=[Phenology].ReproductivePhotoperiodModifier
        PhotoperiodFunction Photoperiod: Twilight=0; DayLength=0
        GerminatingPhase Germinating: Start=Sowing; End=Germination
        EmergingPhase Emerging: ShootLag=10; ShootRate=1; Start=Germination; End=Emergence; TTForTimeStep=0
          VariableReference ThermalTime: VariableName=[Phenology].VegetativeThermalTime
        GenericPhase Vegetative: Start=Emergence; End=StartFlowering
          Constant Target: FixedValue=200
          VariableReference Progression: VariableName=[Phenology].ThermalTime
        GenericPhase EarlyFlowering: Start=StartFlowering; End=StartPodDevelopment
          Memo
            The duration of the grain filling phase has been taken from the model of Robertson et al (2002).
          Constant Target: FixedValue=200
          VariableReference Progression: VariableName=[Phenology].ThermalTime
        GenericPhase EarlyPodDevelopment: Start=StartPodDevelopment; End=StartGrainFilling
          Memo
            The duration of the grain filling phase has been taken from the model of Robertson et al (2002).
          Constant Target: FixedValue=140
          VariableReference Progression: VariableName=[Phenology].ThermalTime
        GenericPhase EarlyGrainFilling: Start=StartGrainFilling; End=EndCanopyDevelopment
          MultiplyFunction Target
            Constant FractionofGrainfilling: FixedValue=0.05
            VariableReference EntireGrainfilling
              VariableName=[Phenology].LateGrainFilling.Target.EntireGrainfillPeriod.FixedValue
          VariableReference Progression: VariableName=[Phenology].ThermalTime
        GenericPhase MidGrainFilling: Start=EndCanopyDevelopment; End=EndPodDevelopment
          MultiplyFunction Target
            Constant FractionofMidToLateGrainfilling: FixedValue=0.5
            SubtractFunction MidToLateGrainfilling
              VariableReference EntireGrainfilling
                VariableName=[Phenology].LateGrainFilling.Target.EntireGrainfillPeriod.FixedValue
              VariableReference EarlyGrainfilling: VariableName=[Phenology].EarlyGrainFilling.Target
          VariableReference Progression: VariableName=[Phenology].ThermalTime
        GenericPhase LateGrainFilling: Start=EndPodDevelopment; End=EndGrainFill
          SubtractFunction Target
            Constant EntireGrainfillPeriod: FixedValue=500
            VariableReference EarlyGrainFillingTarget: VariableName=[Phenology].EarlyGrainFilling.Target
            VariableReference MidGrainFillingTarget: VariableName=[Phenology].MidGrainFilling.Target
          VariableReference Progression: VariableName=[Phenology].ThermalTime
        GenericPhase Maturing: Start=EndGrainFill; End=Maturity
          Constant Target: FixedValue=45
          VariableReference Progression: VariableName=[Phenology].ThermalTime
        GenericPhase Ripening: Start=Maturity; End=HarvestRipe
          Constant Target: FixedValue=45
          VariableReference Progression: VariableName=[Phenology].ThermalTime
        EndPhase ReadyForHarvesting: Start=HarvestRipe; End=Unused
          VariableReference ThermalTime: VariableName=[Phenology].ThermalTime
        OnEventFunction EmergenceDAS: SetEvent=Emergence; ReSetEvent=never
          Memo
            A function is used to provide maturity date as days after sowing(DAS).
          Constant PreEventValue: FixedValue=0
          VariableReference PostEventValue: VariableName=[Phenology].DaysAfterSowing
        OnEventFunction FloweringDAS: SetEvent=StartFlowering; ReSetEvent=never
          Memo
            A function is used to provide flowering date as days after sowing(DAS).
          Constant PreEventValue: FixedValue=0
          VariableReference PostEventValue: VariableName=[Phenology].DaysAfterSowing
        OnEventFunction MaturityDAS: SetEvent=Maturity; ReSetEvent=never
          Memo
            A function is used to provide maturity date as days after sowing(DAS).
          Constant PreEventValue: FixedValue=0
          VariableReference PostEventValue: VariableName=[Phenology].DaysAfterSowing
      SimpleLeaf Leaf: Albedo=0.25; Gsmax350=0.015; R50=150; LeafInitialisationStage=Emergence; Height=0; BaseHeight=0; Width=0; FRGR=0; PotentialEP=0; WaterDemand=0; KDead=0.2; LAIDead=0
        Memo Description
          Stover represents any part of the crop that is not removed at harvest (i.e not part of the product).
        RUEModel Photosynthesis
          Constant RUE: FixedValue=1.2
          WeightedTemperatureFunction FT: MaximumTemperatureWeighting=0.5
            XYPairs: X=[10, 20, 30, 40]; Y=[0, 1, 1, 0]
          LinearInterpolationFunction FVPD
            XYPairs: X=[0, 10, 50]; Y=[1, 1, 1]
            VariableReference XValue: VariableName=[Leaf].Photosynthesis.VPD
          LinearInterpolationFunction FN
            XYPairs: X=[0, 1, 1.5]; Y=[0, 1, 1]
            VariableReference XValue: VariableName=[Leaf].Fn
          LinearInterpolationFunction FW
            XYPairs: X=[0, 1]; Y=[0, 1]
            VariableReference XValue: VariableName=[Leaf].Fw
          RUECO2Function FCO2: PhotosyntheticPathway=C3
          VariableReference RadnInt: VariableName=[Leaf].RadIntTot
        ExpressionFunction CO2internal: Expression=(163 - [IWeather].MeanT)/(5 - 0.1*[IWeather].MeanT)
        DivideFunction StomatalConductanceCO2Modifier
          VariableReference FCO2: VariableName=[Leaf].Photosynthesis.FCO2
          ExpressionFunction RelativeCO2Gradient
            Expression=([IWeather].CO2 - [Leaf].CO2internal)/(350 - [Leaf].CO2internal)
        MultiplyFunction Area
          VariableReference SLA: VariableName=[Leaf].SpecificArea
          VariableReference LeafLiveWt: VariableName=[Leaf].Live.Wt
        MinimumFunction FRGR
          VariableReference RUE_FT: VariableName=[Leaf].Photosynthesis.FT
          MinimumFunction Others
            VariableReference RUE_FN: VariableName=[Leaf].Photosynthesis.FN
            VariableReference RUE_FVPD: VariableName=[Leaf].Photosynthesis.FVPD
        LinearInterpolationFunction ExtinctionCoefficient
          XYPairs: X=[200, 1000]; Y=[0.6, 0.4]
          VariableReference XValue: VariableName=[Soybean].SowingData.RowSpacing
        LinearInterpolationFunction Tallness
          XYPairs: X=[1, 2, 3, 4, 5, 6, 9]; Y=[0, 0, 50, 400, 700, 900, 1000]
          VariableReference XValue: VariableName=[Phenology].Stage
        AccumulateFunction NodeNumber: StartStageName=Emergence; EndStageName=EndCanopyDevelopment; FractionRemovedOnCut=1; FractionRemovedOnHarvest=1; FractionRemovedOnGraze=1; FractionRemovedOnPrune=0
          DivideFunction DeltaNode
            VariableReference ThermalTime: VariableName=[Phenology].VegetativeThermalTime
            VariableReference Phyllochron: VariableName=[Leaf].Phyllochron
        Constant NReallocationFactor: FixedValue=1
          Memo
            This model assumes that all metabolic and storage N is available for reallocation from senescing leaves.
        PhaseLookup SenescenceRate
          PhaseLookupValue Vegetative: Start=Emergence; End=EndCanopyDevelopment
            Constant Rate: FixedValue=0
          PhaseLookupValue Reproductive: Start=EndCanopyDevelopment; End=Maturity
            Memo
              Leaf senescence rate is calculated to ensure that all leaves are senesced by crop maturity.
            DivideFunction Rate
              VariableReference TT: VariableName=[Phenology].ThermalTime
              SubtractFunction TTRemaining
                ExpressionFunction TTRequired
                  Expression=[Phenology].MidGrainFilling.Target + [Phenology].LateGrainFilling.Target + [Phenology].Maturing.Target
                ExpressionFunction TTComplete
                  Expression=[Phenology].MidGrainFilling.ProgressThroughPhase + [Phenology].LateGrainFilling.ProgressThroughPhase + [Phenology].Maturing.ProgressThroughPhase
        Constant DetachmentRate: FixedValue=0.05; Units=/d
        Constant InitialWt: FixedValue=1
        MultiplyFunction LAIDead
          VariableReference SLA: VariableName=[Leaf].SpecificArea
          VariableReference LeafDeadWt: VariableName=[Leaf].Dead.Wt
        LinearInterpolationFunction MaximumNConc
          XYPairs: X=[3, 4, 9]; Y=[0.06, 0.05, 0.03]
          VariableReference XValue: VariableName=[Phenology].Stage
        LinearInterpolationFunction CriticalNConc
          XYPairs: X=[3, 4, 9]; Y=[0.06, 0.05, 0.03]
          VariableReference XValue: VariableName=[Phenology].Stage
        Constant MinimumNConc: FixedValue=0.02
        Constant MaintenanceRespiration: FixedValue=0; Units=0-1
        Constant DMConversionEfficiency: FixedValue=1; Units=0-1
        BiomassRemoval BiomassRemovalDefaults
          OrganBiomassRemovalType Harvest: FractionLiveToRemove=0; FractionDeadToRemove=0; FractionLiveToResidue=1; FractionDeadToResidue=1
          OrganBiomassRemovalType Cut: FractionLiveToRemove=0; FractionDeadToRemove=0; FractionLiveToResidue=1; FractionDeadToResidue=1
          OrganBiomassRemovalType Prune: FractionLiveToRemove=0; FractionDeadToRemove=0; FractionLiveToResidue=0; FractionDeadToResidue=0
          OrganBiomassRemovalType Graze: FractionLiveToRemove=0; FractionDeadToRemove=0; FractionLiveToResidue=0; FractionDeadToResidue=0
        Constant NRetranslocationFactor: FixedValue=0.5
        Constant DMReallocationFactor: FixedValue=0
        Constant DMRetranslocationFactor: FixedValue=0.5
        Constant RemobilisationCost: FixedValue=0
        Constant CarbonConcentration: FixedValue=0.4
        BiomassDemand DMDemands
          DivideFunction Structural
            VariableReference DeltaLAI: VariableName=[Leaf].DeltaLAI
            VariableReference SLA: VariableName=[Leaf].SpecificArea
            Memo
              Growth in leaf area is used to calculate the leaf dry matter demand.  Note that leaf biomass is assumed to consist of entirely structural dry matter.
          Constant Storage: FixedValue=0
          Constant Metabolic: FixedValue=0
        BiomassDemand NDemands
          MultiplyFunction Structural
            VariableReference MinNconc: VariableName=[Leaf].minimumNconc
            VariableReference PotentialDMAllocation: VariableName=[Leaf].potentialDMAllocation.Structural
          MultiplyFunction Metabolic
            SubtractFunction MetabolicNconc
              VariableReference CritNconc: VariableName=[Leaf].criticalNConc
              VariableReference MinNconc: VariableName=[Leaf].minimumNconc
            VariableReference PotentialDMAllocation: VariableName=[Leaf].potentialDMAllocation.Structural
          StorageNDemandFunction Storage
            Constant NitrogenDemandSwitch: FixedValue=1
            VariableReference MaxNconc: VariableName=[Leaf].maximumNconc
        LinearInterpolationFunction FrostFraction
          XYPairs: X=[-4, 4]; Y=[1, 0]
          VariableReference XValue: VariableName=[Weather].MinT
        LinearInterpolationFunction SpecificArea
          XYPairs: X=[0.1, 6]; Y=[0.03, 0.03]
          VariableReference XValue: VariableName=[Leaf].LAI
        PhaseLookup DeltaLAI
          PhaseLookupValue Vegetative: Start=Emergence; End=EndCanopyDevelopment
            MultiplyFunction Delta
              VariableReference AreaLargestLeaf: VariableName=[Leaf].AreaLargestLeaf
              PhaseLookup RelativeArea
                PhaseLookupValue BeforeEndPod: Start=Emergence; End=StartPodDevelopment
                  LinearInterpolationFunction RelativeArea
                    XYPairs: X=[2, 7, 10, 18]; Y=[0.6666, 1, 1, 0.83]
                    VariableReference XValue: VariableName=[Leaf].NodeNumber
                PhaseLookupValue AfterEndPod: Start=StartPodDevelopment; End=EndCanopyDevelopment
                  Constant RelativeArea: FixedValue=0.4
              VariableReference PlantNumber: VariableName=[Soybean].SowingData.Population
              LinearInterpolationFunction Branches
                XYPairs: X=[0, 6, 7, 8, 9]; Y=[1, 1, 2, 2, 2]
                VariableReference XValue: VariableName=[Leaf].NodeNumber
              DivideFunction LAR
                VariableReference TT: VariableName=[Phenology].VegetativeThermalTime
                VariableReference Phyllochron: VariableName=[Leaf].Phyllochron
          PhaseLookupValue Reproductive: Start=EndCanopyDevelopment; End=Maturity
            Constant: FixedValue=0
        Constant AreaLargestLeaf: FixedValue=0.006
        Constant Phyllochron: FixedValue=45
      ReproductiveOrgan Grain: GrowthRespiration=0; MaintenanceRespiration=0
        Biomass Live: DMDOfStructural=0.6
        Biomass Dead: DMDOfStructural=0.6
        Constant PotentialHarvestIndex: FixedValue=0.5
        AddFunction FillingDuration
          VariableReference EarlyGrainFillingDuration: VariableName=[Phenology].EarlyGrainFilling.Target
          VariableReference MidGrainFillingDuration: VariableName=[Phenology].MidGrainFilling.Target
          VariableReference LateGrainFillingDuration: VariableName=[Phenology].LateGrainFilling.Target
        PhaseLookup DMDemandFunction
          PhaseLookupValue GrainFilling: Start=StartGrainFilling; End=EndGrainFill
            MultiplyFunction HIGrainDemand
              VariableReference AboveGroundWt: VariableName=[AboveGround].Wt
              DivideFunction HarvestIndexIncrease
                VariableReference PotentialHarvestIndex: VariableName=[Grain].PotentialHarvestIndex
                VariableReference FillingDuration: VariableName=[Grain].FillingDuration
              VariableReference ThermalTime: VariableName=[Phenology].ThermalTime
        Constant MinimumNConc: FixedValue=0.05
        Constant MaximumNConc: FixedValue=0.058
        Constant WaterContent: FixedValue=0.12
        MultiplyFunction NFillingRate
          VariableReference NConc: VariableName=[Grain].MaximumNConc
          VariableReference DMDemand: VariableName=[Grain].DMDemandFunction
          VariableReference DMConversionEfficiency: VariableName=[Grain].DMConversionEfficiency
        BiomassRemoval BiomassRemovalDefaults
          OrganBiomassRemovalType Harvest: FractionLiveToRemove=1; FractionDeadToRemove=1; FractionLiveToResidue=0; FractionDeadToResidue=0
          OrganBiomassRemovalType Cut: FractionLiveToRemove=0; FractionDeadToRemove=0; FractionLiveToResidue=1; FractionDeadToResidue=1
          OrganBiomassRemovalType Prune: FractionLiveToRemove=0; FractionDeadToRemove=0; FractionLiveToResidue=0; FractionDeadToResidue=0
          OrganBiomassRemovalType Graze: FractionLiveToRemove=0; FractionDeadToRemove=0; FractionLiveToResidue=0; FractionDeadToResidue=0
        Constant DMConversionEfficiency: FixedValue=0.89
        Constant RemobilisationCost: FixedValue=0
        Constant CarbonConcentration: FixedValue=0.4
        DivideFunction HarvestIndex
          VariableReference GrainWt: VariableName=[Grain].Wt
          VariableReference AboveGroundWt: VariableName=[AboveGround].Wt
        Constant MaximumPotentialGrainSize: FixedValue=0
          Memo
            This parameter is not used.  Grain growth is calculated from harvest index increase.
        Constant NumberFunction: FixedValue=0
          Memo
            Grain number is not estimated by this model.
      Root: GrowthRespiration=0; MaintenanceRespiration=0; RootAngle=45
        LinearInterpolationFunction KLModifier
          XYPairs: X=[0, 3]; Y=[1, 1]
          VariableReference XValue: VariableName=[Leaf].LAI
        AirTemperatureFunction TemperatureEffect
          XYPairs: X=[0, 26, 35]; Y=[1, 1, 1]
        LinearInterpolationFunction MaxDailyNUptake
          XYPairs: X=[0, 5]; Y=[1, 3]
          VariableReference XValue: VariableName=[Leaf].LAI
        Constant SenescenceRate: FixedValue=0.005
        Constant MaximumRootDepth: FixedValue=1000000
        PhaseLookup RootFrontVelocity
          PhaseLookupValue PreEmergence: Start=Germination; End=Emergence
            Constant Function: FixedValue=5
          PhaseLookupValue early: Start=Emergence; End=StartGrainFilling
            Constant Function: FixedValue=30
          PhaseLookupValue late: Start=StartGrainFilling; End=Maturity
            Constant Function: FixedValue=5
        Constant MaximumNConc: FixedValue=0.01
        Constant MinimumNConc: FixedValue=0.005
        PhaseBasedSwitch NitrogenDemandSwitch: Start=Emergence; End=EndGrainFill
        LinearInterpolationFunction KNO3
          XYPairs: X=[0, 0.003]; Y=[0.02, 0.02]
          VariableReference XValue: VariableName=[Root].LengthDensity
        LinearInterpolationFunction KNH4
          XYPairs: X=[0, 0.003]; Y=[0, 0]
          VariableReference XValue: VariableName=[Root].LengthDensity
        BiomassRemoval BiomassRemovalDefaults
          OrganBiomassRemovalType Harvest: FractionLiveToRemove=0; FractionDeadToRemove=0; FractionLiveToResidue=0.2; FractionDeadToResidue=0
          OrganBiomassRemovalType Cut: FractionLiveToRemove=0; FractionDeadToRemove=0; FractionLiveToResidue=0.2; FractionDeadToResidue=0
          OrganBiomassRemovalType Prune: FractionLiveToRemove=0; FractionDeadToRemove=0; FractionLiveToResidue=0; FractionDeadToResidue=0
          OrganBiomassRemovalType Graze: FractionLiveToRemove=0; FractionDeadToRemove=0; FractionLiveToResidue=0; FractionDeadToResidue=0
        LinearInterpolationFunction NUptakeSWFactor
          XYPairs: X=[0, 1]; Y=[0, 1]
          VariableReference XValue: VariableName=[Root].RWC
        Constant InitialDM: FixedValue=0.2; Units=g/plant
        Constant SpecificRootLength: FixedValue=40; Units=m/g
        Constant DMConversionEfficiency: FixedValue=1
        Constant MaintenanceRespirationFunction: FixedValue=1
        Constant RemobilisationCost: FixedValue=0
        Constant CarbonConcentration: FixedValue=0.4
        BiomassDemand DMDemands
          MultiplyFunction Structural
            PartitionFractionDemandFunction DMDemandFunction
              PhaseLookup PartitionFraction
                PhaseLookupValue Early: Start=Emergence; End=StartFlowering
                  Constant Function: FixedValue=0.2
                PhaseLookupValue Middle: Start=StartFlowering; End=StartGrainFilling
                  Constant Function: FixedValue=0.2
                PhaseLookupValue Late: Start=StartGrainFilling; End=Maturity
                  Constant Function: FixedValue=0.05
            Constant StructuralFraction: FixedValue=1
          Constant Metabolic: FixedValue=0
          StorageDMDemandFunction Storage
            SubtractFunction StorageFraction
              Constant One: FixedValue=1
              VariableReference StructuralFraction: VariableName=[Root].DMDemands.Structural.StructuralFraction
        BiomassDemand NDemands
          MultiplyFunction Structural
            VariableReference MinNconc: VariableName=[Root].minimumNconc
            VariableReference PotentialDMAllocation: VariableName=[Root].potentialDMAllocation.Structural
          MultiplyFunction Metabolic
            SubtractFunction MetabolicNconc
              VariableReference CritNconc: VariableName=[Root].criticalNConc
              VariableReference MinNconc: VariableName=[Root].minimumNconc
            VariableReference PotentialDMAllocation: VariableName=[Root].potentialDMAllocation.Structural
          StorageNDemandFunction Storage
            VariableReference NitrogenDemandSwitch: VariableName=[Root].nitrogenDemandSwitch
            VariableReference MaxNconc: VariableName=[Root].maximumNconc
        VariableReference CriticalNConc: VariableName=[Root].MinimumNConc
      Nodule
        Constant FixationMetabolicCost: FixedValue=0
        Constant MaximumNConc: FixedValue=0.02
        Constant MinimumNConc: FixedValue=0.01
        Constant SenescenceRate: FixedValue=0
        Constant NReallocationFactor: FixedValue=0
        PhaseBasedSwitch NitrogenDemandSwitch: Start=Emergence; End=EndGrainFill
        BiomassRemoval BiomassRemovalDefaults: same as Replacements.Soybean.Root.BiomassRemovalDefaults
        Constant InitialWtFunction: FixedValue=0; Units=g/m^2
        Constant DetachmentRateFunction: FixedValue=0; Units=/d
        Constant MaintenanceRespirationFunction: FixedValue=0; Units=0-1
        Constant DMConversionEfficiency: FixedValue=1; Units=0-1
        Constant NRetranslocationFactor: FixedValue=0
        Constant DMReallocationFactor: FixedValue=0
        Constant DMRetranslocationFactor: FixedValue=0
        VariableReference CriticalNConc: VariableName=[Nodule].MinimumNConc
        Constant RemobilisationCost: FixedValue=0
        Constant CarbonConcentration: FixedValue=0.4
        HoldFunction FixationRate: WhenToHold=StartGrainFilling
          MinimumFunction DailyPotentialFixationRate
            MultiplyFunction PotentialFixationRate
              VariableReference LiveBiomass: VariableName=[AboveGroundLive].Wt
              PhaseLookup SpecificFixationRate
                PhaseLookupValue VegetativeGrowth: Start=Emergence; End=StartFlowering
                  Constant Rate: FixedValue=0.006
                PhaseLookupValue ReproductiveGrowth: Start=StartFlowering; End=EndGrainFill
                  Constant Rate: FixedValue=0.002
            Constant MaximumFixationRate: FixedValue=0.6
        BiomassDemand DMDemands
          MultiplyFunction Structural
            PartitionFractionDemandFunction DMDemandFunction
              PhaseLookup PartitionFraction
                PhaseLookupValue Early: Start=Emergence; End=StartFlowering
                  Constant Function: FixedValue=0.03
                PhaseLookupValue Middle: Start=StartFlowering; End=StartGrainFilling
                  Constant Function: FixedValue=0.02
                PhaseLookupValue Late: Start=StartGrainFilling; End=Maturity
                  Constant Function: FixedValue=0
            Constant StructuralFraction: FixedValue=1; Units=g/g
          Constant Metabolic: FixedValue=0
          StorageDMDemandFunction Storage
            SubtractFunction StorageFraction
              Constant One: FixedValue=1
              VariableReference StructuralFraction: VariableName=[Nodule].DMDemands.Structural.StructuralFraction
        BiomassDemand NDemands
          MultiplyFunction Structural
            VariableReference MinNconc: VariableName=[Nodule].minimumNconc
            VariableReference PotentialDMAllocation: VariableName=[Nodule].potentialDMAllocation.Structural
          MultiplyFunction Metabolic
            SubtractFunction MetabolicNconc
              VariableReference CritNconc: VariableName=[Nodule].criticalNConc
              VariableReference MinNconc: VariableName=[Nodule].minimumNconc
            VariableReference PotentialDMAllocation: VariableName=[Nodule].potentialDMAllocation.Structural
          StorageNDemandFunction Storage
            VariableReference NitrogenDemandSwitch: VariableName=[Nodule].nitrogenDemandSwitch
            VariableReference MaxNconc: VariableName=[Nodule].maximumNconc
      GenericOrgan Shell: IsAboveGround=true
        Constant NReallocationFactor: FixedValue=1
        Constant NRetranslocationFactor: FixedValue=0.5
        Constant MaximumNConc: FixedValue=0.045
        VariableReference CriticalNConc: VariableName=[Shell].MinimumNConc
        Constant MinimumNConc: FixedValue=0.01
        Constant DMRetranslocationFactor: FixedValue=0.1
        PhaseBasedSwitch NitrogenDemandSwitch: Start=StartPodDevelopment; End=EndPodDevelopment
        BiomassRemoval BiomassRemovalDefaults: same as Replacements.Soybean.Leaf.BiomassRemovalDefaults
        Constant InitialWtFunction: FixedValue=0; Units=g/m^2
        PhaseLookup SenescenceRate
          PhaseLookupValue ReproductivePhase: Start=StartPodDevelopment; End=Maturity
            MinimumFunction Rate
              DivideFunction Fraction
                VariableReference TT: VariableName=[Phenology].ThermalTime
                SubtractFunction TTRemaining
                  ExpressionFunction ReproductiveTT
                    Expression=[Phenology].EarlyPodDevelopment.Target+[Phenology].EarlyGrainFilling.Target+[Phenology].MidGrainFilling.Target+[Phenology].LateGrainFilling.Target
                  ExpressionFunction ReproductiveTT1Complete
                    Expression=[Phenology].EarlyPodDevelopment.ProgressThroughPhase+[Phenology].EarlyGrainFilling.ProgressThroughPhase+[Phenology].MidGrainFilling.ProgressThroughPhase+[Phenology].LateGrainFilling.ProgressThroughPhase
              Constant One: FixedValue=1
        Constant DetachmentRateFunction: FixedValue=0; Units=/d
        Constant MaintenanceRespirationFunction: FixedValue=0; Units=0-1
        Constant DMConversionEfficiency: FixedValue=1; Units=0-1
        Constant DMReallocationFactor: FixedValue=0
        Constant RemobilisationCost: FixedValue=0
        Constant CarbonConcentration: FixedValue=0.4
        Constant PotentialHarvestIndex: FixedValue=0.2
        AddFunction FillingDuration
          VariableReference EarlyPodDevelopmentDuration: VariableName=[Phenology].EarlyPodDevelopment.Target
          VariableReference EarlyGrainFillingDuration: VariableName=[Phenology].EarlyGrainFilling.Target
          VariableReference MidGrainFillingDuration: VariableName=[Phenology].MidGrainFilling.Target
        BiomassDemand DMDemands
          MultiplyFunction Structural
            PhaseLookup DMDemandFunction
              PhaseLookupValue PodDevelopment: Start=StartPodDevelopment; End=EndPodDevelopment
                MultiplyFunction HIPodDemand
                  VariableReference AboveGroundWt: VariableName=[AboveGround].Wt
                  DivideFunction HarvestIndexIncrease
                    VariableReference PotentialHarvestIndex: VariableName=[Shell].PotentialHarvestIndex
                    VariableReference FillingDuration: VariableName=[Shell].FillingDuration
                  VariableReference ThermalTime: VariableName=[Phenology].ThermalTime
            Constant StructuralFraction: FixedValue=1
          Constant Metabolic: FixedValue=0
          StorageDMDemandFunction Storage
            SubtractFunction StorageFraction
              Constant One: FixedValue=1
              VariableReference StructuralFraction: VariableName=[Shell].DMDemands.Structural.StructuralFraction
        BiomassDemand NDemands
          MultiplyFunction Structural
            VariableReference MinNconc: VariableName=[Shell].minimumNconc
            VariableReference PotentialDMAllocation: VariableName=[Shell].potentialDMAllocation.Structural
          StorageNDemandFunction Storage
            VariableReference NitrogenDemandSwitch: VariableName=[Shell].nitrogenDemandSwitch
            VariableReference MaxNconc: VariableName=[Shell].maximumNconc
          Constant Metabolic: FixedValue=0
        RetranslocateNonStructural RetranslocateNitrogen
      GenericOrgan Stem: IsAboveGround=true
        Constant NReallocationFactor: FixedValue=1
        Constant NRetranslocationFactor: FixedValue=0.5
        PhaseLookup DMRetranslocationFactor
          PhaseLookupValue GrainFilling: Start=EndCanopyDevelopment; End=EndGrainFill
            Constant RetranslocationFactor: FixedValue=0.2
        LinearInterpolationFunction MaximumNConc
          XYPairs: X=[3, 4, 5]; Y=[0.025, 0.02, 0.015]
          VariableReference XValue: VariableName=[Phenology].Stage
        Constant MinimumNConc: FixedValue=0.006
        PhaseBasedSwitch NitrogenDemandSwitch: Start=Emergence; End=StartGrainFilling
        BiomassRemoval BiomassRemovalDefaults: same as Replacements.Soybean.Leaf.BiomassRemovalDefaults
        Constant InitialWtFunction: FixedValue=0; Units=g/m^2
        PhaseLookup SenescenceRate
          PhaseLookupValue PostCanopyPhase: Start=EndCanopyDevelopment; End=Maturity
            MinimumFunction Rate
              DivideFunction Fraction
                VariableReference TT: VariableName=[Phenology].ThermalTime
                SubtractFunction TTRemaining
                  ExpressionFunction PostCanopyTT
                    Expression=[Phenology].EarlyPodDevelopment.Target+[Phenology].EarlyGrainFilling.Target+[Phenology].MidGrainFilling.Target+[Phenology].LateGrainFilling.Target
                  ExpressionFunction PostCanopyTTComplete
                    Expression=[Phenology].MidGrainFilling.ProgressThroughPhase+[Phenology].LateGrainFilling.ProgressThroughPhase
              Constant One: FixedValue=1
        Constant DetachmentRateFunction: FixedValue=0; Units=/d
        Constant MaintenanceRespirationFunction: FixedValue=0; Units=0-1
        Constant DMConversionEfficiency: FixedValue=1; Units=0-1
        Constant DMReallocationFactor: FixedValue=0
        VariableReference CriticalNConc: VariableName=[Stem].MinimumNConc
        Constant RemobilisationCost: FixedValue=0
        Constant CarbonConcentration: FixedValue=0.4
        BiomassDemand DMDemands
          MultiplyFunction Structural
            PhaseLookup Fraction
              PhaseLookupValue StemGrowthPhase: Start=Emergence; End=StartPodDevelopment
                Constant Fraction: FixedValue=0.75
              PhaseLookupValue PodAndGrainGrowth: Start=StartPodDevelopment; End=EndGrainFill
                Constant Fraction: FixedValue=0
            VariableReference DMDemand: VariableName=[Stem].PotentialGrowth
          Constant Metabolic: FixedValue=0
          MultiplyFunction Storage
            VariableReference DMDemand: VariableName=[Stem].PotentialGrowth
            SubtractFunction StorageFraction
              Constant One: FixedValue=1
              VariableReference StructuralFraction: VariableName=[Stem].DMDemands.Structural.Fraction
        BiomassDemand NDemands
          MultiplyFunction Structural
            VariableReference MinNconc: VariableName=[Stem].minimumNconc
            VariableReference PotentialDMAllocation: VariableName=[Stem].potentialDMAllocation.Structural
          MultiplyFunction Metabolic
            SubtractFunction MetabolicNconc
              VariableReference CritNconc: VariableName=[Stem].criticalNConc
              VariableReference MinNconc: VariableName=[Stem].minimumNconc
            VariableReference PotentialDMAllocation: VariableName=[Stem].potentialDMAllocation.Structural
          StorageNDemandFunction Storage
            VariableReference NitrogenDemandSwitch: VariableName=[Stem].nitrogenDemandSwitch
            VariableReference MaxNconc: VariableName=[Stem].maximumNconc
        PartitionFractionDemandFunction PotentialGrowth
          PhaseLookup PartitionFraction
            PhaseLookupValue StemGrowthPhase: Start=Emergence; End=EndPodDevelopment
              Constant StemFraction: FixedValue=0.4
            PhaseLookupValue GrainFilling: Start=EndPodDevelopment; End=EndGrainFill
              Constant StemFraction: FixedValue=0
        RetranslocateNonStructural RetranslocateNitrogen
      CompositeBiomass AboveGround: DMDOfStructural=0.6
        Propertys=[[Leaf].Live, [Leaf].Dead, [Stem].Live, [Stem].Dead, [Grain].Live, [Grain].Dead, [Shell].Live, [Shell].Dead]
      CompositeBiomass BelowGround: Propertys=[[Root].Live, [Root].Dead, [Nodule].Live, [Nodule].Dead]; DMDOfStructural=0.6
      CompositeBiomass AboveGroundLive: Propertys=[[Leaf].Live, [Stem].Live, [Grain].Live, [Shell].Live]; DMDOfStructural=0.6
      CompositeBiomass Total: DMDOfStructural=0.6
        Propertys=[[Leaf].Live, [Leaf].Dead, [Stem].Live, [Stem].Dead, [Grain].Live, [Grain].Dead, [Shell].Live, [Shell].Dead, [Root].Live, [Root].Dead, [Nodule].Live, [Nodule].Dead]
      CompositeBiomass TotalLive: DMDOfStructural=0.6
        Propertys=[[Leaf].Live, [Stem].Live, [Grain].Live, [Shell].Live, [Root].Live, [Nodule].Live]
      CompositeBiomass TotalDead: DMDOfStructural=0.6
        Propertys=[[Leaf].Dead, [Stem].Dead, [Grain].Dead, [Shell].Dead, [Root].Dead, [Nodule].Dead]
      CompositeBiomass Pod: Propertys=[[Shell].Live, [Shell].Dead, [Grain].Live, [Grain].Dead]; DMDOfStructural=0.6
      CultivarFolder Australia
        Cultivar Buchanan
          Command:
            [Phenology].Vegetative.Target.FixedValue = 480
            [Phenology].EarlyFlowering.Target.FixedValue = 100
            [Phenology].EarlyGrainFilling.Target.FractionofGrainfilling.FixedValue = 0.015
            [Phenology].LateGrainFilling.Target.EntireGrainfillPeriod.FixedValue = 467
            [Phenology].VegetativePhotoperiodModifier.XYPairs.X = 12.39, 15.61
            [Phenology].ReproductivePhotoperiodModifier.XYPairs.X = 12.39, 15.61
            [Phenology].MidGrainFilling.Target.FractionofMidToLateGrainfilling.FixedValue=0.33
            [Grain].MaximumNConc.FixedValue = 0.067
            [Stem].PotentialGrowth.PartitionFraction.StemGrowthPhase.StemFraction.FixedValue = 0.5
            [Leaf].AreaLargestLeaf.FixedValue=0.009
        Cultivar Djakal
          Command:
            [Phenology].Vegetative.Target.FixedValue = 380
            [Phenology].EarlyFlowering.Target.FixedValue = 100
            [Phenology].EarlyGrainFilling.Target.FractionofGrainfilling.FixedValue = 0.05
            [Phenology].LateGrainFilling.Target.EntireGrainfillPeriod.FixedValue = 405
            [Phenology].VegetativePhotoperiodModifier.XYPairs.X = 13.75, 17
            [Phenology].ReproductivePhotoperiodModifier.XYPairs.X = 11.9, 15.5
            [Leaf].AreaLargestLeaf.FixedValue=0.009
        Cultivar Davis
          Command:
            [Phenology].Vegetative.Target.FixedValue = 480
            [Phenology].EarlyFlowering.Target.FixedValue = 100
            [Phenology].EarlyGrainFilling.Target.FractionofGrainfilling.FixedValue = 0.015
            [Phenology].LateGrainFilling.Target.EntireGrainfillPeriod.FixedValue = 467
            [Phenology].VegetativePhotoperiodModifier.XYPairs.X = 12.39, 15.61
            [Phenology].ReproductivePhotoperiodModifier.XYPairs.X = 12.39, 15.61
            [Phenology].MidGrainFilling.Target.FractionofMidToLateGrainfilling.FixedValue=0.33
            [Grain].MaximumNConc.FixedValue = 0.067
            [Stem].PotentialGrowth.PartitionFraction.StemGrowthPhase.StemFraction.FixedValue = 0.5
            [Leaf].AreaLargestLeaf.FixedValue=0.012
        Cultivar Hooper_MG40
          Command:
            [Phenology].Vegetative.Target.FixedValue = 380
            [Phenology].EarlyFlowering.Target.FixedValue = 80
            [Phenology].EarlyGrainFilling.Target.FractionofGrainfilling.FixedValue = 0.05
            [Phenology].LateGrainFilling.Target.EntireGrainfillPeriod.FixedValue = 440
            [Phenology].VegetativePhotoperiodModifier.XYPairs.X = 13.26, 16.67
            [Phenology].ReproductivePhotoperiodModifier.XYPairs.X = 13.26, 16.67
            [Leaf].AreaLargestLeaf.FixedValue=0.009
        Cultivar Stephens_MG40
          Command:
            [Phenology].Vegetative.Target.FixedValue = 360
            [Phenology].EarlyFlowering.Target.FixedValue = 80
            [Phenology].EarlyGrainFilling.Target.FractionofGrainfilling.FixedValue = 0.05
            [Phenology].LateGrainFilling.Target.EntireGrainfillPeriod.FixedValue = 440
            [Phenology].VegetativePhotoperiodModifier.XYPairs.X = 13.26, 16.67
            [Phenology].ReproductivePhotoperiodModifier.XYPairs.X = 13.26, 16.67
            [Leaf].AreaLargestLeaf.FixedValue=0.009
        Cultivar FiskebyV
          Command:
            [Phenology].Vegetative.Target.FixedValue = 285
            [Phenology].EarlyFlowering.Target.FixedValue = 80
            [Phenology].EarlyGrainFilling.Target.FractionofGrainfilling.FixedValue = 0.05
            [Phenology].LateGrainFilling.Target.EntireGrainfillPeriod.FixedValue = 405
            [Phenology].VegetativePhotoperiodModifier.XYPairs.X = 13.75, 18
            [Phenology].ReproductivePhotoperiodModifier.XYPairs.X = 13.75, 18
          Memo
            Early-maturing, photoperiod-insensitive cultivar developed in Sweden for high latitude environments
        Cultivar F148_7
          Command:
            [Phenology].Vegetative.Target.FixedValue = 314
            [Phenology].EarlyFlowering.Target.FixedValue = 80
            [Phenology].EarlyGrainFilling.Target.FractionofGrainfilling.FixedValue = 0.05
            [Phenology].LateGrainFilling.Target.EntireGrainfillPeriod.FixedValue = 485
            [Phenology].VegetativePhotoperiodModifier.XYPairs.X = 13.75, 17
            [Phenology].ReproductivePhotoperiodModifier.XYPairs.X = 12, 18
            [Leaf].AreaLargestLeaf.FixedValue=0.009
          Memo
            Indeterminate breeding selection from the national soybean breeding program combining phytophthora resistance, earliness,
            culinary quality, and yield
        Cultivar Bowyer
          Command:
            [Phenology].Vegetative.Target.FixedValue = 377
            [Phenology].EarlyFlowering.Target.FixedValue = 80
            [Phenology].EarlyGrainFilling.Target.FractionofGrainfilling.FixedValue = 0.05
            [Phenology].LateGrainFilling.Target.EntireGrainfillPeriod.FixedValue = 405
            [Phenology].VegetativePhotoperiodModifier.XYPairs.X = 13.75, 15.5
            [Phenology].ReproductivePhotoperiodModifier.XYPairs.X = 11.9, 15.5
          Memo
            Brown hilum cultivar, adapted to southern New South Wales, released by K McWhirter in 1982
        Cultivar Bunya
          Command:
            [Phenology].Vegetative.Target.FixedValue = 550
            [Phenology].EarlyFlowering.Target.FixedValue = 80
            [Phenology].EarlyGrainFilling.Target.FractionofGrainfilling.FixedValue = 0.05
            [Phenology].LateGrainFilling.Target.EntireGrainfillPeriod.FixedValue = 405
            [Phenology].VegetativePhotoperiodModifier.XYPairs.X = 13.75, 18
            [Phenology].ReproductivePhotoperiodModifier.XYPairs.X = 10.9, 15.5
            [Leaf].AreaLargestLeaf.FixedValue=0.009
          Memo
            Culinary cultivar released in 2006 by CSIRO with broad adaptation from northern New South Wales to northern Queensland
        Cultivar Cowrie
          Command:
            [Phenology].Vegetative.Target.FixedValue = 390
            [Phenology].EarlyFlowering.Target.FixedValue = 80
            [Phenology].EarlyGrainFilling.Target.FractionofGrainfilling.FixedValue = 0.05
            [Phenology].LateGrainFilling.Target.EntireGrainfillPeriod.FixedValue = 425
            [Phenology].VegetativePhotoperiodModifier.XYPairs.X = 12.75, 16
            [Phenology].ReproductivePhotoperiodModifier.XYPairs.X = 12.75, 16
            [Leaf].AreaLargestLeaf.FixedValue=0.009
          Memo
            Light hilum cultivar released by theNewSouth Wales Department of Agriculture for the coastal Northern Rivers District inNewSouth Wales
        Cultivar Soya791
          Command:
            [Phenology].Vegetative.Target.FixedValue = 430
            [Phenology].EarlyFlowering.Target.FixedValue = 80
            [Phenology].EarlyGrainFilling.Target.FractionofGrainfilling.FixedValue = 0.05
            [Phenology].LateGrainFilling.Target.EntireGrainfillPeriod.FixedValue = 425
            [Phenology].VegetativePhotoperiodModifier.XYPairs.X = 12.75, 15.3
            [Phenology].ReproductivePhotoperiodModifier.XYPairs.X = 12.75, 15.3
            [Leaf].AreaLargestLeaf.FixedValue=0.009
        Cultivar Manark
          Command:
            [Phenology].Vegetative.Target.FixedValue = 440
            [Phenology].EarlyFlowering.Target.FixedValue = 80
            [Phenology].EarlyGrainFilling.Target.FractionofGrainfilling.FixedValue = 0.05
            [Phenology].LateGrainFilling.Target.EntireGrainfillPeriod.FixedValue = 425
            [Phenology].VegetativePhotoperiodModifier.XYPairs.X = 12.75, 15
            [Phenology].ReproductivePhotoperiodModifier.XYPairs.X = 12.75, 15
            [Leaf].AreaLargestLeaf.FixedValue=0.009
        Cultivar Warrigal
          Command:
            [Phenology].Vegetative.Target.FixedValue = 490
            [Phenology].EarlyFlowering.Target.FixedValue = 80
            [Phenology].EarlyGrainFilling.Target.FractionofGrainfilling.FixedValue = 0.05
            [Phenology].LateGrainFilling.Target.EntireGrainfillPeriod.FixedValue = 425
            [Phenology].VegetativePhotoperiodModifier.XYPairs.X = 12.75, 15
            [Phenology].ReproductivePhotoperiodModifier.XYPairs.X = 12.75, 15
            [Leaf].AreaLargestLeaf.FixedValue=0.009
        Cultivar Leichhardt
          Command:
            [Phenology].Vegetative.Target.FixedValue = 806
            [Phenology].EarlyFlowering.Target.FixedValue = 80
            [Phenology].EarlyGrainFilling.Target.FractionofGrainfilling.FixedValue = 0.05
            [Phenology].LateGrainFilling.Target.EntireGrainfillPeriod.FixedValue = 425
            [Phenology].VegetativePhotoperiodModifier.XYPairs.X = 12.75, 14.7
            [Phenology].ReproductivePhotoperiodModifier.XYPairs.X = 12.75, 14.7
            [Leaf].AreaLargestLeaf.FixedValue=0.009
        Cultivar Djakal1
          Command:
            [Phenology].Vegetative.Target.FixedValue = 332
            [Phenology].EarlyFlowering.Target.FixedValue = 80
            [Phenology].EarlyGrainFilling.Target.FractionofGrainfilling.FixedValue = 0.05
            [Phenology].LateGrainFilling.Target.EntireGrainfillPeriod.FixedValue = 440
            [Phenology].VegetativePhotoperiodModifier.XYPairs.X = 13.26, 16.67
            [Phenology].ReproductivePhotoperiodModifier.XYPairs.X = 13.26, 16.67
            [Leaf].AreaLargestLeaf.FixedValue=0.009
      CultivarFolder USA
        Cultivar Trial_MG00
          Command:
            [Phenology].Vegetative.Target.FixedValue = 268
            [Phenology].EarlyFlowering.Target.FixedValue = 76
            [Phenology].EarlyGrainFilling.Target.FractionofGrainfilling.FixedValue = 0.05
            [Phenology].LateGrainFilling.Target.EntireGrainfillPeriod.FixedValue = 432
            [Phenology].VegetativePhotoperiodModifier.XYPairs.X = 14.43, 21.19
            [Phenology].ReproductivePhotoperiodModifier.XYPairs.X = 14.43, 21.19
        Cultivar Lambert_MG0
          Command:
            [Phenology].Vegetative.Target.FixedValue = 294
            [Phenology].EarlyFlowering.Target.FixedValue = 81
            [Phenology].EarlyGrainFilling.Target.FractionofGrainfilling.FixedValue = 0.05
            [Phenology].LateGrainFilling.Target.EntireGrainfillPeriod.FixedValue = 442
            [Phenology].VegetativePhotoperiodModifier.XYPairs.X = 14.29, 20.14
            [Phenology].ReproductivePhotoperiodModifier.XYPairs.X = 14.29, 20.14
        Cultivar IA1006_MG10
          Command:
            [Phenology].Vegetative.Target.FixedValue = 336
            [Phenology].EarlyFlowering.Target.FixedValue = 118
            [Phenology].EarlyGrainFilling.Target.FractionofGrainfilling.FixedValue = 0.05
            [Phenology].LateGrainFilling.Target.EntireGrainfillPeriod.FixedValue = 518
            [Phenology].VegetativePhotoperiodModifier.XYPairs.X = 14.37, 19.30
            [Phenology].ReproductivePhotoperiodModifier.XYPairs.X = 14.37, 19.30
        Cultivar IA2008_MG20
          Command:
            [Phenology].Vegetative.Target.FixedValue = 329
            [Phenology].EarlyFlowering.Target.FixedValue = 150
            [Phenology].EarlyGrainFilling.Target.FractionofGrainfilling.FixedValue = 0.05
            [Phenology].LateGrainFilling.Target.EntireGrainfillPeriod.FixedValue = 580
            [Phenology].VegetativePhotoperiodModifier.XYPairs.X = 13.92, 17.93
            [Phenology].ReproductivePhotoperiodModifier.XYPairs.X = 13.92, 17.93
        Cultivar PioneerP22T61_MG22
          Command:
            [Phenology].Vegetative.Target.FixedValue = 328
            [Phenology].EarlyFlowering.Target.FixedValue = 106
            [Phenology].EarlyGrainFilling.Target.FractionofGrainfilling.FixedValue = 0.3
            [Phenology].LateGrainFilling.Target.EntireGrainfillPeriod.FixedValue = 499
            [Phenology].VegetativePhotoperiodModifier.XYPairs.X = 13.59, 17.6
            [Phenology].ReproductivePhotoperiodModifier.XYPairs.X = 13.59, 17.6
        Cultivar PioneerP22T69R_MG22
          Command:
            [Phenology].Vegetative.Target.FixedValue = 328
            [Phenology].EarlyFlowering.Target.FixedValue = 106
            [Phenology].EarlyGrainFilling.Target.FractionofGrainfilling.FixedValue = 0.35
            [Phenology].LateGrainFilling.Target.EntireGrainfillPeriod.FixedValue = 580
            [Phenology].VegetativePhotoperiodModifier.XYPairs.X = 13.59, 17.6
            [Phenology].ReproductivePhotoperiodModifier.XYPairs.X = 13.59, 17.6
        Cultivar Pioneer92MGI_MG26
          Command:
            [Phenology].Vegetative.Target.FixedValue = 271
            [Phenology].EarlyFlowering.Target.FixedValue = 120
            [Phenology].EarlyGrainFilling.Target.FractionofGrainfilling.FixedValue = 0.125
            [Phenology].LateGrainFilling.Target.EntireGrainfillPeriod.FixedValue = 529
            [Phenology].VegetativePhotoperiodModifier.XYPairs.X = 13.77, 17.57
            [Phenology].ReproductivePhotoperiodModifier.XYPairs.X = 13.77, 17.57
        Cultivar PioneerP92Y75_MG27
          Command:
            [Phenology].Vegetative.Target.FixedValue = 328
            [Phenology].EarlyFlowering.Target.FixedValue = 106
            [Phenology].EarlyGrainFilling.Target.FractionofGrainfilling.FixedValue = 0.14
            [Phenology].LateGrainFilling.Target.EntireGrainfillPeriod.FixedValue = 499
            [Phenology].VegetativePhotoperiodModifier.XYPairs.X = 13.59, 17.6
            [Phenology].ReproductivePhotoperiodModifier.XYPairs.X = 13.59, 17.6
        Cultivar Macon_MG30
          Command:
            [Phenology].Vegetative.Target.FixedValue = 367
            [Phenology].EarlyFlowering.Target.FixedValue = 163
            [Phenology].EarlyGrainFilling.Target.FractionofGrainfilling.FixedValue = 0.175
            [Phenology].LateGrainFilling.Target.EntireGrainfillPeriod.FixedValue = 607
            [Phenology].VegetativePhotoperiodModifier.XYPairs.X = 14.05, 17.56
            [Phenology].ReproductivePhotoperiodModifier.XYPairs.X = 14.05, 17.56
        Cultivar PioneerP93M11_MG31
          Command:
            [Phenology].Vegetative.Target.FixedValue = 250
            [Phenology].EarlyFlowering.Target.FixedValue = 110
            [Phenology].EarlyGrainFilling.Target.FractionofGrainfilling.FixedValue = 0.30
            [Phenology].LateGrainFilling.Target.EntireGrainfillPeriod.FixedValue = 457
            [Phenology].VegetativePhotoperiodModifier.XYPairs.X = 13.4, 16.0
            [Phenology].ReproductivePhotoperiodModifier.XYPairs.X = 13.4, 16.0
            [Grain].MaximumNConc.FixedValue = 0.065
            [Shell].PotentialHarvestIndex.FixedValue = 0.5
            [Leaf].AreaLargestLeaf.FixedValue=0.013
        Cultivar Becks321NRR_MG32
          Command:
            [Phenology].Vegetative.Target.FixedValue = 272
            [Phenology].EarlyFlowering.Target.FixedValue = 117
            [Phenology].EarlyGrainFilling.Target.FractionofGrainfilling.FixedValue = 0.20
            [Phenology].LateGrainFilling.Target.EntireGrainfillPeriod.FixedValue = 522
            [Phenology].VegetativePhotoperiodModifier.XYPairs.X = 13.45, 18.0
            [Phenology].ReproductivePhotoperiodModifier.XYPairs.X = 13.45, 18.0
        Cultivar PioneerP932T16R_MG32
          Command:
            [Phenology].Vegetative.Target.FixedValue = 328
            [Phenology].EarlyFlowering.Target.FixedValue = 106
            [Phenology].EarlyGrainFilling.Target.FractionofGrainfilling.FixedValue = 0.40
            [Phenology].LateGrainFilling.Target.EntireGrainfillPeriod.FixedValue = 499
            [Phenology].VegetativePhotoperiodModifier.XYPairs.X = 13.59, 17.6
            [Phenology].ReproductivePhotoperiodModifier.XYPairs.X = 13.59, 17.6
        Cultivar Becks367NRR_MG37
          Command:
            [Phenology].Vegetative.Target.FixedValue = 267
            [Phenology].EarlyFlowering.Target.FixedValue = 112
            [Phenology].EarlyGrainFilling.Target.FractionofGrainfilling.FixedValue = 0.26
            [Phenology].LateGrainFilling.Target.EntireGrainfillPeriod.FixedValue = 506
            [Phenology].VegetativePhotoperiodModifier.XYPairs.X = 13.27, 17.2
            [Phenology].ReproductivePhotoperiodModifier.XYPairs.X = 13.27, 17.2
        Cultivar AsgrowAG4403_MG40
          Command:
            [Phenology].Vegetative.Target.FixedValue = 292
            [Phenology].EarlyFlowering.Target.FixedValue = 123
            [Phenology].EarlyGrainFilling.Target.FractionofGrainfilling.FixedValue = 0.30
            [Phenology].LateGrainFilling.Target.EntireGrainfillPeriod.FixedValue = 535
            [Phenology].VegetativePhotoperiodModifier.XYPairs.X = 13.09, 16.49
            [Phenology].ReproductivePhotoperiodModifier.XYPairs.X = 13.09, 16.49
        Cultivar HornbeckHBK4891_MG40: same as Replacements.Soybean.USA.AsgrowAG4403_MG40
        Cultivar Pioneer94B01_MG40
          Command:
            [Phenology].Vegetative.Target.FixedValue = 322
            [Phenology].EarlyFlowering.Target.FixedValue = 143
            [Phenology].EarlyGrainFilling.Target.FractionofGrainfilling.FixedValue = 0.30
            [Phenology].LateGrainFilling.Target.EntireGrainfillPeriod.FixedValue = 567
            [Phenology].VegetativePhotoperiodModifier.XYPairs.X = 13.05, 16.46
            [Phenology].ReproductivePhotoperiodModifier.XYPairs.X = 13.05, 16.46
        Cultivar PioneerP9504_MG50
          Command:
            [Phenology].Vegetative.Target.FixedValue = 404
            [Phenology].EarlyFlowering.Target.FixedValue = 112
            [Phenology].EarlyGrainFilling.Target.FractionofGrainfilling.FixedValue = 0.30
            [Phenology].LateGrainFilling.Target.EntireGrainfillPeriod.FixedValue = 505
            [Phenology].VegetativePhotoperiodModifier.XYPairs.X = 12.83, 16.13
            [Phenology].ReproductivePhotoperiodModifier.XYPairs.X = 12.83, 16.13
        Cultivar AsgrowAG5701_MG50
          Command:
            [Phenology].Vegetative.Target.FixedValue = 404
            [Phenology].EarlyFlowering.Target.FixedValue = 131
            [Phenology].EarlyGrainFilling.Target.FractionofGrainfilling.FixedValue = 0.30
            [Phenology].LateGrainFilling.Target.EntireGrainfillPeriod.FixedValue = 549
            [Phenology].VegetativePhotoperiodModifier.XYPairs.X = 12.83, 16.13
            [Phenology].ReproductivePhotoperiodModifier.XYPairs.X = 12.83, 16.13
        Cultivar Hutcheson_MG50
          Command:
            [Phenology].Vegetative.Target.FixedValue = 438
            [Phenology].EarlyFlowering.Target.FixedValue = 112
            [Phenology].EarlyGrainFilling.Target.FractionofGrainfilling.FixedValue = 0.30
            [Phenology].LateGrainFilling.Target.EntireGrainfillPeriod.FixedValue = 505
            [Phenology].VegetativePhotoperiodModifier.XYPairs.X = 12.58, 15.88
            [Phenology].ReproductivePhotoperiodModifier.XYPairs.X = 12.58, 15.88
        Cultivar NK622_MG60
          Command:
            [Phenology].Vegetative.Target.FixedValue = 436
            [Phenology].EarlyFlowering.Target.FixedValue = 93
            [Phenology].EarlyGrainFilling.Target.FractionofGrainfilling.FixedValue = 0.30
            [Phenology].LateGrainFilling.Target.EntireGrainfillPeriod.FixedValue = 467
            [Phenology].VegetativePhotoperiodModifier.XYPairs.X = 12.39, 15.61
            [Phenology].ReproductivePhotoperiodModifier.XYPairs.X = 12.39, 15.61
      CultivarFolder Generic
        Cultivar Generic_MG000
          Command:
            [Phenology].Vegetative.Target.FixedValue = 310
            [Phenology].EarlyFlowering.Target.FixedValue = 100
            [Phenology].EarlyGrainFilling.Target.FractionofGrainfilling.FixedValue = 0.475
            [Phenology].LateGrainFilling.Target.EntireGrainfillPeriod.FixedValue = 590
            [Phenology].VegetativePhotoperiodModifier.XYPairs.X = 14.6, 22.35
            [Phenology].ReproductivePhotoperiodModifier.XYPairs.X = 14.6, 22.35
        Cultivar Generic_MG00
          Command:
            [Phenology].Vegetative.Target.FixedValue = 320
            [Phenology].EarlyFlowering.Target.FixedValue = 100
            [Phenology].EarlyGrainFilling.Target.FractionofGrainfilling.FixedValue = 0.467
            [Phenology].LateGrainFilling.Target.EntireGrainfillPeriod.FixedValue = 600
            [Phenology].VegetativePhotoperiodModifier.XYPairs.X = 14.35, 21.11
            [Phenology].ReproductivePhotoperiodModifier.XYPairs.X = 14.35, 21.11
        Cultivar Generic_MG0
          Command:
            [Phenology].Vegetative.Target.FixedValue = 336
            [Phenology].EarlyFlowering.Target.FixedValue = 120
            [Phenology].EarlyGrainFilling.Target.FractionofGrainfilling.FixedValue = 0.422
            [Phenology].LateGrainFilling.Target.EntireGrainfillPeriod.FixedValue = 616
            [Phenology].VegetativePhotoperiodModifier.XYPairs.X = 14.1, 19.95
            [Phenology].ReproductivePhotoperiodModifier.XYPairs.X = 14.1, 19.95
        Cultivar Generic_MG1
          Command:
            [Phenology].Vegetative.Target.FixedValue = 340
            [Phenology].EarlyFlowering.Target.FixedValue = 120
            [Phenology].EarlyGrainFilling.Target.FractionofGrainfilling.FixedValue = 0.411
            [Phenology].LateGrainFilling.Target.EntireGrainfillPeriod.FixedValue = 632
            [Phenology].VegetativePhotoperiodModifier.XYPairs.X = 13.84, 18.77
            [Phenology].ReproductivePhotoperiodModifier.XYPairs.X = 13.84, 18.77
        Cultivar Generic_MG2
          Command:
            [Phenology].Vegetative.Target.FixedValue = 348
            [Phenology].EarlyFlowering.Target.FixedValue = 120
            [Phenology].EarlyGrainFilling.Target.FractionofGrainfilling.FixedValue = 0.386
            [Phenology].LateGrainFilling.Target.EntireGrainfillPeriod.FixedValue = 648
            [Phenology].VegetativePhotoperiodModifier.XYPairs.X = 13.59, 17.61
            [Phenology].ReproductivePhotoperiodModifier.XYPairs.X = 13.59, 17.61
        Cultivar Generic_MG3
          Command:
            [Phenology].Vegetative.Target.FixedValue = 380
            [Phenology].EarlyFlowering.Target.FixedValue = 120
            [Phenology].EarlyGrainFilling.Target.FractionofGrainfilling.FixedValue = 0.361
            [Phenology].LateGrainFilling.Target.EntireGrainfillPeriod.FixedValue = 664
            [Phenology].VegetativePhotoperiodModifier.XYPairs.X = 13.4, 16.91
            [Phenology].ReproductivePhotoperiodModifier.XYPairs.X = 13.4, 16.91
        Cultivar Generic_MG4
          Command:
            [Phenology].Vegetative.Target.FixedValue = 388
            [Phenology].EarlyFlowering.Target.FixedValue = 140
            [Phenology].EarlyGrainFilling.Target.FractionofGrainfilling.FixedValue = 0.324
            [Phenology].LateGrainFilling.Target.EntireGrainfillPeriod.FixedValue = 664
            [Phenology].VegetativePhotoperiodModifier.XYPairs.X = 13.1, 16.49
            [Phenology].ReproductivePhotoperiodModifier.XYPairs.X = 13.1, 16.49
        Cultivar Generic_MG5
          Command:
            [Phenology].Vegetative.Target.FixedValue = 396
            [Phenology].EarlyFlowering.Target.FixedValue = 160
            [Phenology].EarlyGrainFilling.Target.FractionofGrainfilling.FixedValue = 0.072
            [Phenology].LateGrainFilling.Target.EntireGrainfillPeriod.FixedValue = 696
            [Phenology].VegetativePhotoperiodModifier.XYPairs.X = 12.83, 16.13
            [Phenology].ReproductivePhotoperiodModifier.XYPairs.X = 12.83, 16.13
        Cultivar Generic_MG6
          Command:
            [Phenology].Vegetative.Target.FixedValue = 404
            [Phenology].EarlyFlowering.Target.FixedValue = 180
            [Phenology].EarlyGrainFilling.Target.FractionofGrainfilling.FixedValue = 0.056
            [Phenology].LateGrainFilling.Target.EntireGrainfillPeriod.FixedValue = 712
            [Phenology].VegetativePhotoperiodModifier.XYPairs.X = 12.58, 15.8
            [Phenology].ReproductivePhotoperiodModifier.XYPairs.X = 12.58, 15.8
        Cultivar Generic_MG7
          Command:
            [Phenology].Vegetative.Target.FixedValue = 416
            [Phenology].EarlyFlowering.Target.FixedValue = 200
            [Phenology].EarlyGrainFilling.Target.FractionofGrainfilling.FixedValue = 0.055
            [Phenology].LateGrainFilling.Target.EntireGrainfillPeriod.FixedValue = 728
            [Phenology].VegetativePhotoperiodModifier.XYPairs.X = 12.33, 15.46
            [Phenology].ReproductivePhotoperiodModifier.XYPairs.X = 12.33, 15.46
        Cultivar Generic_MG8
          Command:
            [Phenology].Vegetative.Target.FixedValue = 430
            [Phenology].EarlyFlowering.Target.FixedValue = 200
            [Phenology].EarlyGrainFilling.Target.FractionofGrainfilling.FixedValue = 0.054
            [Phenology].LateGrainFilling.Target.EntireGrainfillPeriod.FixedValue = 744
            [Phenology].VegetativePhotoperiodModifier.XYPairs.X = 12.07, 15.1
            [Phenology].ReproductivePhotoperiodModifier.XYPairs.X = 12.07, 15.1
        Cultivar Generic_MG9
          Command:
            [Phenology].Vegetative.Target.FixedValue = 460
            [Phenology].EarlyFlowering.Target.FixedValue = 200
            [Phenology].EarlyGrainFilling.Target.FractionofGrainfilling.FixedValue = 0.053
            [Phenology].LateGrainFilling.Target.EntireGrainfillPeriod.FixedValue = 748
            [Phenology].VegetativePhotoperiodModifier.XYPairs.X = 11.88, 14.82
            [Phenology].ReproductivePhotoperiodModifier.XYPairs.X = 11.88, 14.82
        Cultivar Generic_MG10
          Command:
            [Phenology].Vegetative.Target.FixedValue = 470
            [Phenology].EarlyFlowering.Target.FixedValue = 200
            [Phenology].EarlyGrainFilling.Target.FractionofGrainfilling.FixedValue = 0.053
            [Phenology].LateGrainFilling.Target.EntireGrainfillPeriod.FixedValue = 748
            [Phenology].VegetativePhotoperiodModifier.XYPairs.X = 11.78, 14.65
            [Phenology].ReproductivePhotoperiodModifier.XYPairs.X = 11.78, 14.65
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