Simulations: Version=205
  DataStore
  Memo HowThisWorks
    This example has simulations on how the SimpleGrazing model works and can be tailored to user's needs. The model is an upgrade to the CutRotation manager and allows different options to trigger the start of grazing.

    The *Urine and Dung* component of the model will always be active in any of the settings that rule a grazing event. First the user has the option of setting up one value, which is the same for the whole period, or values that vary according to the month of the year. Then the depth at wich urine is added can be set. After that, the proportion of N going to dung  can be set by the user. This can be done by providing a single value for the whole period or 12 monthly values, to vary the proportion according to the month of the year. Finally, the C:N ratio of the biomass for dung can be set. Here, if a value of 0 is used, the model will use DM digestibility to calculate the C:N ratio.

    **SimpleRotation**

    >This setting is an example of how a simple grazing based on a interval of fixed days happens. The residual mass after grazing can be set by the user in order to end a grazing event. The minimum DM amount available for a grazing event to happen can also be set up at the *Minimum grazeable dry matter to trigger grazing*. In this setting, there is the option to set up an *Optional no-grazing window*. This allows the user to stop any grazing event from happening between the *Start of the no-grazing window* and *End of the no-grazing window*, independently of any other rule set up to trigger the grazing event. If values are not provided, the model just ignores it.

    **TargetMass**

    >This setting allows the user to set up a DM production target to trigger grazing at the *Monthly target mass of pasture to trigger grazing event*. Here 12 values are needed, one for each month of the year, and they can vary as the user wishes. The residual mass to stop the grazing event can be set at the *Monthly mass of pasture post grazing*. Monthly values can also vary as the user wishes. The user can also set up the *Optional no-grazing* component for this setting.

    **TimingControlledElsewhere**

    >This setting allows the user to set up the grazing rules somewhere else in APSIM, as in an *Operations* component for example. The rules for N and C return cal still be set up at the *SimpleGrazing* user interface. The *Operations* component used in the example presented here is called *Grazing* and there are different methods to trigger the grazing event. When *Graze* is used, the DM amount provided by the user will be the amount to be removed at each grazing event. In this example, the first date shows that 3000 kgDM/ha will be removed on the date specified. The other available method is *GrazeToResidual*, where the amount provided by the user will be what is left after grazing. In the example, the second date shows that on the date specified, the pasture will be grazed down to a residual mass of 2000 kgDM/ha. This is the only setting where the *Optional no-grazing window* will not be available.

    **FlexibleGrazingCover**

    >In this setting, the user can trigger a grazing event via an expression. This example triggers grazing when the canopy (green and dead material) intercepts 95% of the total incoming radiation. The intelisense will work in this component to make it easier for the user to set up the expression needed. This method also supports more elaborate expressions, which can be needed when the simulation deals with mixed species. The simulation *Ryegrass_WhiteClover* is an example of how to trigger grazing when the combination of above ground weight of ryegrass and the standing biomass of white clover are above 3000 kgDM/ha. Note that here we use the 'standing biomass' for white clover because the value used will not consider the stolon mass. If we wanted to account for the stolon mass, 'above ground' would be the output used.

    **Ryegrass_WhiteClover**
    >This is just an example of how SimpleGrazing works with mixed pastures.

    **OptionalRulesForRotation**
    >The user has the option of setting up rules to make sure that grazing events occur despite of not reaching the biomass triggers for grazing (residual or pre grazing). This option is available for the **TargetMass** and **FlexibleGrazing** settings. The *Monthly maximum roation length* is the maximum number of days that the simulation can go without having a grazing event. For example, if we use a maximum rotation length of 50 days it means that, if the pre grazing biomass set up by the user is not reached within 50 days of the last grazing, a grazing event will happen at 50 days.
    >The *Monthly minimum rotation length* is the minimum number of days when a grazing event will not happen, indepently of the target conditions. For example, if a value of 5 days is used as the minimum rotation length, this means that another grazing event cannot happen within 5 days of the last grazing, independently of the biomass targets being met.
  Simulation SimpleCow
    Clock: Start=2000-07-01; End=2017-06-30
    Weather: FileName=%root%/Examples/WeatherFiles/NZ_Lincoln.met
    MicroClimate: a_interception=0; b_interception=1; c_interception=0; d_interception=0; SoilHeatFluxFraction=0.4; MinimumHeightDiffForNewLayer=0; NightInterceptionFraction=0.5; ReferenceHeight=2
    SoilArbitrator
    Forages
      Parameters:
        Name                          LiveDigestibility  DeadDigestibility  LiveFractionConsumable  DeadFractionConsumable  LiveMinimumBiomass  DeadMinimumBiomass
        SurfaceOrganicMatter.Residue  0.7                0.3                0                       0                       0                   0
        AGPRyegrass.Leaf              FromModel          FromModel          1                       1                       25                  0
        AGPRyegrass.Stem              FromModel          FromModel          1                       1                       10                  0
        AGPRyegrass.Stolon            FromModel          FromModel          1                       1                       0                   0
        AGPWhiteClover.Leaf           FromModel          FromModel          1                       1                       15                  0
        AGPWhiteClover.Stem           FromModel          FromModel          1                       1                       5                   0
        AGPWhiteClover.Stolon         FromModel          FromModel          1                       1                       5                   0
    Summary
    Zone Field: Area=1; Slope=0; AspectAngle=0; Altitude=50
      SimpleGrazing: GrazingRotationType=1; SimpleGrazingFrequencyString=21; SimpleMinGrazable=0; SimpleGrazingResidual=1500; FlexibleGrazePostDM=0; MaximumRotationLengthArray=[50, 50, 50, 50, 60, 60, 90, 70, 50, 50, 50, 50]; MinimumRotationLengthArray=[21, 21, 21, 21, 21, 21, 21, 21, 21, 21, 21, 21]; NoGrazingStartString=13-may; NoGrazingEndString=25-jul; IsCutAndCarry=false; FractionClippingsReturned=0; FractionIntakeNToAnimal=[0]; DungNConc=2.6; FractionOfDungUrineOffPaddock=[0]; DepthUrineIsAdded=250; ShowAdvancedExcretaOptions=false; SendDungElsewhere=0; SendUrineElsewhere=0; UsePatching=false; PseudoPatches=true; ZoneCount=25; UrineReturnPattern=2; PseudoRandomSeed=666; MaxEffectiveNConcentration=3.5; FractionPopulationDecline=0; TramplingOn=false; MaximumPropLitterMovedToSoil=0.1; PastureConsumedAtMaximumRateOfLitterRemoval=1200
        PreGrazeDMArray=[2700, 2700, 2700, 2700, 2700, 2700, 2700, 2700, 2700, 2700, 2700, 2700]
        PostGrazeDMArray=[1500, 1500, 1500, 1500, 1250, 1250, 1250, 1250, 1500, 1500, 1500, 1500]
      SimpleCow: StockingRate=3.5; Num1HaPaddocks=25; DaysPerGrazeWhenMilking=1; DaysPerGrazeWhenDry=3; SilageNConc=3; SilageMEConc=12; CowBodyWeight=450; CalfBirthWeightPercent=7; MilkSolidsAsPercentOfCowBodyWeight=92; CowDateCalving=1-aug; DaysFromCalvingToInCalf=63; LactationDuration=280; CowWalkingDist=4; CowNumUrinations=11
      Manager FertiliseFixedDates
        EachYear = True
        Dates = 5-jan, 5-feb, 5-mar, 5-apr, 5-aug, 5-sep, 5-oct, 5-nov, 5-dec
        UseCritNThreshold = False
        CritNThreshold = 50
        CritNDepth = 75
        Depth = 50
        Amount = 15
        FertiliserType = UreaN
```csharp
using APSIM.Core;
using System;
using Models.Core;
using Models.Soils.Nutrients;
using Models.Soils;
using Models.PMF;
using APSIM.Shared.Utilities;
using System.Linq;
using Models.Interfaces;

namespace Models
{
    [Serializable]
    public class Script : Model, IStructureDependency
    {
        [Link] private Clock clock;
        [Link] private Fertiliser fertiliser;
        [Link] private ISummary summary;
        [Link] private Soil soil;
        private Nutrient nutrient;
        private Nutrient soilN;
        [Link]
        private IPhysical soilPhysical;
        [Link]
        private Nutrient Nutrient;
        [Link(Path="[SurfaceOrganicMatter].SurfaceResidue.Decomposition")]
        private OrganicFlow ResidueDecomposition;
        public IStructure Structure { private get; set; }
        
        


        [Separator("Fertiliser will be applied on the date(s) below")]
        [Description("Apply fertiliser on the same day(s) each year? If no, then must include the year of application below")]
        public bool EachYear { get; set; }

        [Description("Dates for one or more fertiliser applications (dd-mmm or dd-mmm-yyyy) as a list with a comma between dates")]
        public string[] Dates { get; set; }

        [Separator("Test for the mineral N in the soil and don't apply the fertiliser if greater than X kgN/ha is stored in the soil above a depth of Y mm")]
        [Description("Use a critical soil mineral N to prevent application above a threshold?")]
        public bool UseCritNThreshold { get; set; }

        [Description("Don't add fertiliser if N in the soil to the depth below exceeds (kg/ha)")]
        public double CritNThreshold { get; set; }

        [Description("Depth to which the amount of N in the soil should be calculated (mm)")]
        public double CritNDepth { get; set; }

        [Separator("Fertiliser application details")]
        [Description("Depth at which to apply the fertiliser (mm)")]
        public double Depth { get; set; }

        [Description("Amount of fertiliser to apply (kg N /ha) per application")]
        public double Amount { get; set; }

        [Description("Fertiliser type - select from the list")]
        [Display(Type = DisplayType.FertiliserType)]public string FertiliserType { get; set; }


        [EventSubscribe("StartOfSimulation")]
        private void FindSoilNOrNutrient(object sender, EventArgs e)
        {
            nutrient =  Structure.Find<Nutrient>() as Nutrient;
            soilN =  Structure.Find<Nutrient>() as Nutrient;

            if (nutrient == null && soilN == null)
                throw new Exception(string.Format("Error in script {0}: Unable to find nutrient or soilN.", Name));
        }

        [EventSubscribe("DoManagement")]
        private void OnDoManagement(object sender, EventArgs e)
        {
            if (OnApplicationDate())
            {
                if (NContentBelowThreshold())
                    fertiliser.Apply(Amount, FertiliserType, Depth);
                else
                    summary.WriteMessage(this, "Skipping fertiliser application due to soil mineral N content being above critical threshold.", MessageType.Diagnostic);
            }
        }

        /// <summary>Checks if today's date is one of the specified fertiliser application dates.</summary>
        private bool OnApplicationDate()
        {
            if (EachYear)
                return Dates.Any(d => DateUtilities.DatesEqual(d, clock.Today));
            
            DateTime[] dates = Dates.Select(d => DateTime.ParseExact(d, "d-MMM-yyyy", null)).ToArray();
            return dates.Any(d => SameDate(d, clock.Today));
        }

        /// <summary>Checks if N content in soil is below critical threshold.</summary>
        private bool NContentBelowThreshold()
        {
            if (!UseCritNThreshold)
                return true;
            
            double[] weights = GetLayerWeights();
            double cumSoilN = 0;

            for (int i = 0; i < soilPhysical.Thickness.Length; i++)
            {
                if (nutrient != null)
                    cumSoilN += weights[i] * nutrient.MineralN[i];
                else if (soilN != null)
                    cumSoilN += weights[i] * soilN.MineralN[i];
            }

            return cumSoilN <= CritNThreshold;
        }

        private double[] GetLayerWeights()
        {
            double[] weights = new double[soilPhysical.Thickness.Length];
            double cumDepth = 0;

            for (int i = 0; i < soilPhysical.Thickness.Length; i++)
            {
                cumDepth += soilPhysical.Thickness[i];
                if (cumDepth < CritNDepth)
                    weights[i] = 1;
                else if (cumDepth - soilPhysical.Thickness[i] <= CritNDepth)
                    weights[i] = (CritNDepth - (cumDepth - soilPhysical.Thickness[i])) / soilPhysical.Thickness[i];
                else
                    weights[i] = 0;
            }

            return weights;
        }

        private bool SameDate(DateTime d1, DateTime d2)
        {
            return d1.Year == d2.Year && d1.DayOfYear == d2.DayOfYear;
        }
    }
}
```
      Manager AutomaticIrrigation
        allowIrrigation = True
        seasonStart = 1-sep
        seasonEnd = 30-apr
        seasonsAllocation = 10000
        triggerDeficit = 75
        targetDeficit = 95
        returndays = 3
        maximumAmount = 30
        depthPAWC = 300
```csharp
using Newtonsoft.Json;
using APSIM.Shared.Utilities;
using System.Xml.Serialization;
using Models.Soils;
using Models.PMF;
using Models.Core;
using System;
using System.Linq;
using Models.Interfaces;


        
namespace Models
{
    [Serializable] 
    [System.Xml.Serialization.XmlInclude(typeof(Model))]
    public class Script : Model
    {
        [Link] private ISummary summary;
        [Link] private Irrigation Irrigation;
        [Link] private Clock Clock;
        [Link] private Soil Soil;
        [Link(IsOptional = true)] private IPlant existingCrop;
        private DateTime StartDate;
        private DateTime EndDate;
        private double TopDUL;
        private double TopLL;
        private int nLayers;
        [Link]
        private IPhysical soilPhysical;
        [Link]
        private ISoilWater waterBalance;
        //Communication to other modules
       
        //User inputs from properties tab
        [Description("Turn irrigation on?")]
        public bool allowIrrigation { get; set; }
        [Description("Start of irrigation season (dd-MMM)")]
        public string seasonStart { get; set; }
        [Description("End of irrigation season (dd-MMM)")]
        public string seasonEnd { get; set; }
        [Description("Season allocation (mm)")]
        public double seasonsAllocation { get; set; }
        [Description("Deficit to trigger irrigation (% PAWC)")]
        public double triggerDeficit { get; set; }
        [Description("Deficit to stop irrigaton (% PAWC)")]
        public double targetDeficit { get; set; }
        [Description("Minimum days for irrigation to return")]
        public double returndays { get; set; }
        [Description("Maximum irrigation application (mm/day)")]
        public double maximumAmount { get; set; }
        [Description("Depth to calculate PAWC (mm)")]
        public double depthPAWC { get; set; }

        //Class members
        [JsonIgnore] public double TopSWdeficit { get; set; }
        [JsonIgnore] public double TopSWC { get; set; }
        [JsonIgnore] public double DaysSinceIrrigation { get; set; }
        [JsonIgnore] public double AmountToApply { get; set; }
        [JsonIgnore] public double SeasonAppliedAmount { get; set; }
        
        private bool IrrigationIsAllowed { get; set; }
        private bool SeasonIsOpen { get; set; }
        private bool CropIsActive { get; set; }
        private bool IrrigatorIsAvailable { get; set; }
        private bool SoilIsDry { get; set; }

    
        //Calculate static soil variables
        [EventSubscribe("StartOfSimulation")]
        private void OnStartOfSimulation(object sender, EventArgs e)
        {   
            //Set the season dates
            StartDate = DateTime.Parse(seasonStart + "-" + Clock.Today.Year.ToString());
            EndDate = DateTime.Parse(seasonEnd + "-" + Clock.Today.Year.ToString());
            
            //Can we irrigate at all?
            IrrigationIsAllowed = false; 
            if (allowIrrigation)
                IrrigationIsAllowed = true; 

            //Calculate soil water variables
            double depthFromSurface = 0.0;
            double fracLayer = 0.0;
            nLayers = soilPhysical.Thickness.Length;
            for (int layer = 0; layer < nLayers; layer++)
            {
                fracLayer = Math.Min(1.0, (depthPAWC - depthFromSurface) / soilPhysical.Thickness[layer]);
                TopLL += soilPhysical.LL15mm[layer] * fracLayer;
                TopDUL += soilPhysical.DULmm[layer] * fracLayer;
                depthFromSurface += soilPhysical.Thickness[layer];
                if (depthFromSurface >= depthPAWC)
                    layer = nLayers;
            }
        }
             
        //Determine daily requirement for irrigation
        [EventSubscribe("StartOfDay")]
        private void OnStartOfDay(object sender, EventArgs e)
        {
            //Can we irrigate today?          
            SeasonIsOpen = isBetween(Clock.Today, StartDate, EndDate);
            if (!SeasonIsOpen)
                SeasonAppliedAmount = 0;

            //Is there a crop in the ground that needs irrigation?
            CropIsActive = false;
            if ((existingCrop != null) && (existingCrop.IsAlive))
                CropIsActive = true;
            //if ((existingCrop.Phenology.Stage >= 3.0) && (existingCrop.Phenology.Stage < 6.0))
          
            //Is the irrigator available?
            IrrigatorIsAvailable = false;
            DaysSinceIrrigation += 1;
            if (DaysSinceIrrigation >= returndays)
                IrrigatorIsAvailable = true;
          
            //Is the soil dry enough to require irrigation?
            SoilIsDry = false;
            double depthFromSurface = 0.0;
            double fracLayer = 0.0;
            TopSWC = 0.0;
            for (int layer = 0; layer < nLayers; layer++)
            //for (int layer = 0; depthFromSurface < depthPAWC + soilPhysical.Thickness[layer]; layer++)
            {
                fracLayer = Math.Min(1.0, (depthPAWC - depthFromSurface) / soilPhysical.Thickness[layer]);
                TopSWC += waterBalance.SWmm[layer] * fracLayer;
                depthFromSurface += soilPhysical.Thickness[layer];
                if (depthFromSurface >= depthPAWC)
                    layer = nLayers;
            }
            
            TopSWdeficit = TopSWC - TopDUL;
            if (Math.Max(0.0, -TopSWdeficit) >= (TopDUL - TopLL) * (100 - triggerDeficit) / 100)
                SoilIsDry = true;
                
            //Are all the conditions ratifying irrigation
            if (IrrigationIsAllowed && SeasonIsOpen && CropIsActive && IrrigatorIsAvailable && SoilIsDry)
            {
                //Lets bloody well irrigate then!!!!
                AmountToApply = TopDUL * targetDeficit / 100 - TopSWC;
                AmountToApply = Math.Max(0.0, Math.Min(AmountToApply, seasonsAllocation - SeasonAppliedAmount));
                Irrigation.Apply(AmountToApply);
                DaysSinceIrrigation = 0;
                SeasonAppliedAmount += AmountToApply;
            }
        }
        
        ///Checks whether theDate is between iniDate and endDate (non-year specific)
        private bool isBetween(DateTime theDay, DateTime iniDate, DateTime endDate)
        {
            bool result = false;
            if (iniDate.DayOfYear < endDate.DayOfYear)
            {
                // period is within one year, ex: summer in the northern hemisphere
                if ((theDay.DayOfYear >= iniDate.DayOfYear) && (theDay.DayOfYear <= endDate.DayOfYear))
                    result = true;
            }
            else
            {
                // period goes over the end of the year, ex: summer in the southern hemisphere
                if ((theDay.DayOfYear >= iniDate.DayOfYear) || (theDay.DayOfYear <= endDate.DayOfYear))
                    result = true;
            }
            
            return result;
        }
    }
}
```
      Irrigation
      Fertiliser
      SurfaceOrganicMatter: InitialResidueName=Sward; InitialResidueType=grass; InitialResidueMass=1000; InitialStandingFraction=0; InitialCPR=0; InitialCNR=15
      Soil: SoilType=NZ_Sedimentary; LocalName=Lismore; Site=Winchmore; NearestTown=Ashburton; Region=Canterbury; Country=New Zealand; Latitude=-48.48; Longitude=0
        Chemical: PHUnits=Water
          Thickness  PH  CEC
          150        6   13.966
          150        6   8.24825
          200        6   6.6176
          150        6   5.1934
          250        6   4.3688
          300        6   3.90025
          300        6   3.78775
          CEC source: Calculated
        Physical
          Thickness  ParticleSizeSand  ParticleSizeSilt  ParticleSizeClay  Rocks     BD    AirDry  LL15   DUL    SAT   KS
          150        28                52                20                0         1.3   0.05    0.15   0.36   0.45  5000
          150        29.75             55.25             15                0         1.35  0.12    0.14   0.34   0.43  2500
          200        30.8              57.2              12                0.568263  1     0.055   0.055  0.19   0.25  3000
          150        32.2              59.8              8                 0.798387  0.53  0.015   0.015  0.065  0.15  10000
          250        32.9              61.1              6                 0.866051  0.31  0.01    0.01   0.04   0.11  17500
          300        33.25             61.75             5                 0.866621  0.3   0.01    0.01   0.03   0.11  20000
          300        33.25             61.75             5                 0.866621  0.3   0.01    0.01   0.03   0.11  20000
          Rocks, ParticleSizeSand, ParticleSizeSilt source: Calculated
          SoilCrop AGPRyegrassSoil: LL=[0.15, 0.14, 0.06, 0.02, 0.01, 0.01, 0.01]; KL=[0.1, 0.1, 0.08, 0.04, 0.01, 0, 0]; XF=[1, 1, 1, 1, 1, 0, 0]
          SoilCrop AGPWhiteCloverSoil: LL=[0.15, 0.14, 0.06, 0.02, 0.01, 0.01, 0.01]; KL=[0.1, 0.08, 0.01, 0, 0, 0, 0]; XF=[1, 1, 1, 1, 1, 0, 0]
        WaterBalance SoilWater: SummerDate=1-Nov; SummerU=6; SummerCona=3.5; WinterDate=1-apr; WinterU=2; WinterCona=2; DiffusConst=88; DiffusSlope=35; Salb=0.13; CN2Bare=73; CNRed=20; CNCov=0.8; DischargeWidth=0; CatchmentArea=0; PSIDul=-100
          Thickness  SWCON  KLAT
          150        0.5    0
          150        0.52   0
          200        0.55   0
          150        0.6    0
          250        0.65   0
          300        0.65   0
          300        0.65   0
        Organic: FOMCNRatio=40; CarbonUnits=Total
          Thickness  Carbon  SoilCNRatio  FBiom  FInert  FOM
          150        3       12           0.04   0.5     331.337
          150        1       12           0.02   0.7     245.461
          200        0.6     12           0.02   0.83    164.537
          150        0.4     12           0.01   0.9     121.892
          250        0.25    12           0.01   0.95    73.9313
          300        0.15    12           0      0.99    40.5743
          300        0.1     12           0      0.99    22.2677
        Water: Thickness=[150, 150, 200, 150, 250, 300, 300]; InitialValues=[0.3495, 0.33, 0.18325, 0.0625, 0.0385, 0.029, 0.029]; FilledFromTop=false
        Nutrient
        Solute NO3: Thickness=[150, 150, 200, 150, 250, 300, 300]; InitialValues=[5, 2.5, 1, 0.75, 0.5, 0.5, 0.5]; InitialValuesUnits=ppm; WaterTableConcentration=0; D0=0; DepthConstant=0; MaxDepthSoluteAccessible=0; RunoffEffectivenessAtMovingSolute=0; MaxEffectiveRunoff=0
        Solute NH4: Thickness=[150, 150, 200, 150, 250, 300, 300]; InitialValues=[0.1, 0.1, 0.1, 0.1, 0.1, 0.1, 0.1]; InitialValuesUnits=ppm; WaterTableConcentration=0; D0=0; DepthConstant=0; MaxDepthSoluteAccessible=0; RunoffEffectivenessAtMovingSolute=0; MaxEffectiveRunoff=0
        Solute Urea: Thickness=[150, 150, 200, 150, 250, 300, 300]; InitialValues=[0, 0, 0, 0, 0, 0, 0]; InitialValuesUnits=kg/ha; WaterTableConcentration=0; D0=0; DepthConstant=0; MaxDepthSoluteAccessible=0; RunoffEffectivenessAtMovingSolute=0; MaxEffectiveRunoff=0
        SoilTemperature Temperature
      PastureSpecies AGPRyegrass: doyGermination=275; daysEmergenceToAnthesis=120; daysAnthesisToMaturity=85; degreesDayForAnthesis=1100; degreesDayForMaturity=900; daysAnnualsFactor=45; CanopyType=PastureSpecies; InitialShootDM=1500; InitialRootDM=450; InitialRootDepth=750; initialDMFractionsGrasses=[0.15, 0.25, 0.25, 0.05, 0.05, 0.1, 0.1, 0.05, 0, 0, 0]; initialDMFractionsForbs=[0.2, 0.2, 0.15, 0.05, 0.1, 0.15, 0.1, 0.05, 0, 0, 0]; PhotosyntheticEfficiency=0.01; PhotosynthesisCurveFactor=0.8; FractionPAR=0.5; ReferenceCO2=380; CO2EffectScaleFactor=700; CO2EffectOffsetFactor=600; CO2EffectMinimum=0.7; CO2EffectExponent=2; ReproSeasonDurationCoeff=2; ReproSeasonShouldersLengthFactor=1; ReproSeasonOnsetDurationFactor=0.6; RelativeTurnoverEmerging=2; DetachmentDroughtCoefficient=3; DetachmentDroughtEffectMin=0.1; TurnoverStockFactor=0.01; TurnoverDefoliationEffectMin=0.025; MinimumGreenLeafProp=0.8; MinimumGreenRootProp=0.5
        initialDMFractionsLegumes=[0.16, 0.23, 0.22, 0.05, 0.03, 0.05, 0.05, 0.01, 0.04, 0.08, 0.08]
        LinearInterpolationFunction FVPDFunction
      PastureSpecies AGPWhiteClover: doyGermination=275; daysEmergenceToAnthesis=120; daysAnthesisToMaturity=85; degreesDayForAnthesis=1100; degreesDayForMaturity=900; daysAnnualsFactor=45; CanopyType=PastureSpecies; InitialShootDM=500; InitialRootDM=150; InitialRootDepth=350; initialDMFractionsGrasses=[0.15, 0.25, 0.25, 0.05, 0.05, 0.1, 0.1, 0.05, 0, 0, 0]; initialDMFractionsForbs=[0.2, 0.2, 0.15, 0.05, 0.1, 0.15, 0.1, 0.05, 0, 0, 0]; PhotosyntheticEfficiency=0.01; PhotosynthesisCurveFactor=0.8; FractionPAR=0.5; ReferenceCO2=380; CO2EffectScaleFactor=700; CO2EffectOffsetFactor=600; CO2EffectMinimum=0.7; CO2EffectExponent=2; ReproSeasonDurationCoeff=2; ReproSeasonShouldersLengthFactor=1; ReproSeasonOnsetDurationFactor=0.6; RelativeTurnoverEmerging=2; DetachmentDroughtCoefficient=3; DetachmentDroughtEffectMin=0.1; TurnoverStockFactor=0.01; TurnoverDefoliationEffectMin=0.025; MinimumGreenLeafProp=0.8; MinimumGreenRootProp=0.5
        initialDMFractionsLegumes=[0.16, 0.23, 0.22, 0.05, 0.03, 0.05, 0.05, 0.01, 0.04, 0.08, 0.08]
        LinearInterpolationFunction FVPDFunction
      Report Pasture: EventNames=[Clock].EndOfDay
        VariableNames:
          [Clock].Today as Date
          [SimpleCow].StockingDensity as SD
          [AGPRyegrass].AboveGroundWt + [AGPWhiteClover].AboveGroundWt as PastureBiomass
          Sum of ([AGPRyegrass].HarvestedWt + [AGPWhiteClover].HarvestedWt) from 1-Jul to [Clock].Today as cumHarvestedWt   //the amount harvested (kg DM /ha)
          Sum of [SimpleGrazing].GrazedDM from 1-Jul to [Clock].Today as cumDMHarvested
          Sum of ([SimpleGrazing].GrazedDM - [SimpleCow].SilageMade) from 1-Jul to [Clock].Today as cumDMGrazed
          Sum of [SimpleCow].HerdDMIntake from 1-Jul to [Clock].Today as cumDMIntake
          Sum of ([SimpleCow].HerdDMIntake - [SimpleCow].SilageFed) from 1-Jul to [Clock].Today as cumPastureIntake
          Sum of ([SimpleCow].HerdDMIntake - [SimpleCow].SilageFed + [SimpleCow].SilageMade) from 1-Jul to [Clock].Today as cumPastureIntakeSilageMade
          Sum of [SimpleCow].SilageFed from 1-Jul to [Clock].Today as cumSilageFed
          Sum of [SimpleCow].SilageMade from 1-Jul to [Clock].Today as cumSilageMade
          Sum of ([AGPRyegrass].HarvestedWt + [AGPWhiteClover].HarvestedWt - [SimpleCow].HerdDMIntake - [SimpleCow].SilageMade + [SimpleCow].SilageFed) from 1-Jul to [Clock].Today as cumPastureBalance
          Sum of ([AGPRyegrass].NetGrowthWt + [AGPWhiteClover].NetGrowthWt) from 1-Jul to [Clock].Today as cumPastureGrown
          Sum of [SimpleGrazing].GrazedN from 1-Jul to [Clock].Today as cumNHarvested
          Sum of [SimpleCow].HerdUrineNReturned from 1-Jul to [Clock].Today as cumUrineNReturned
          Sum of ([SimpleCow].HerdDungNReturned + [SimpleCow].HerdUrineNReturned) from 1-Jul to [Clock].Today as cumUrineDungNReturned
          Sum of ([Fertiliser].NitrogenApplied + [SimpleCow].HerdDungNReturned + [SimpleCow].HerdUrineNReturned) from 1-Jul to [Clock].Today as cumUrineDungFertN
          Sum of [ISoilWater].LeachNO3 from 1-Jul to [Clock].Today as Leaching
          sum([NO3].kgha + [NH4].kgha + [Urea].kgha) as MineralN
      Report Cow
        VariableNames:
          [Clock].Today as Date
          [SimpleCow].CowState as CowState
          [SimpleCow].WeeksBeforeCalving as WeeksBeforeCalving
          [SimpleCow].CowMSPerDay as CowMSPerDay
          [SimpleCow].CowMEDemand as MEDemand_PerCow
          [SimpleCow].CowDMIntake as CowDMIntake
          [SimpleCow].CowPastureIntake as CowPastureIntake
          [SimpleCow].CowSilageIntake as CowSilageIntake
          [SimpleCow].CowNIntake as CowNIntake
          [SimpleCow].HerdDMIntake as HerdDMIntake
          [SimpleCow].HerdMEDemand as MEDemand_PerHa
          [SimpleCow].HerdNIntake as HerdNIntake
          [SimpleCow].HerdNToPregnancy as HerdNToPregnancy
          [SimpleCow].HerdNToMilk + [SimpleCow].HerdNToPregnancy as plusHerdNToMilk
          [SimpleCow].HerdNToMilk + [SimpleCow].HerdNToPregnancy as plusHerdNToMilk
          [SimpleCow].HerdNToMilk + [SimpleCow].HerdNToPregnancy + [SimpleCow].HerdDungNReturned as plusHerdDungNReturned
          [SimpleCow].HerdNToMilk + [SimpleCow].HerdNToPregnancy + [SimpleCow].HerdDungNReturned + [SimpleCow].HerdUrineNReturned as plusHerdUrineNReturned
        EventNames:
          SimpleGrazing.GrazedToday == true
          //[Clock].EndOfDay
  Experiment TestPatches
    Factors
      Permutation
        Factor Num
          CompositeFactor WithPatches001
            Specifications:
              [SimpleGrazing].UsePatching = true
              [SimpleGrazing].ZoneCount = 1
          CompositeFactor WithPatches005
            Specifications:
              [SimpleGrazing].UsePatching = true
              [SimpleGrazing].ZoneCount = 5
          CompositeFactor WithPatches010 (disabled)
            Specifications:
              [SimpleGrazing].UsePatching = true
              [SimpleGrazing].ZoneCount = 10
          CompositeFactor WithPatches025 (disabled)
            Specifications:
              [SimpleGrazing].UsePatching = true
              [SimpleGrazing].ZoneCount = 25
          CompositeFactor WithPatches100 (disabled)
            Specifications:
              [SimpleGrazing].UsePatching = true
              [SimpleGrazing].ZoneCount = 100
          CompositeFactor WithPatches250 (disabled)
            Specifications:
              [SimpleGrazing].UsePatching = true
              [SimpleGrazing].ZoneCount = 250
        Factor Type
          CompositeFactor Pseudo: Specifications=[SimpleGrazing].PseudoPatches = true
          CompositeFactor Explicit: Specifications=[SimpleGrazing].PseudoPatches = false
        Factor System
          CompositeFactor A
            Specifications:
              [Weather].FileName = VCS_Ruakura.met
              [Soil]
              [CentrePivot].Script.allowIrrigation = false
              [Fertilisation].Script.Amount = 0
            Soil HE: SoilType=NZ_sedementary; Region=Plains; State=Canterbury; Country=New Zealand; Latitude=0; Longitude=0
              DataSource=Generic profile descriptions provided by Trevor Webb and data for functional horizions based on SWAMP project results
              Comments=Bulk density values were measured on the fine earth fraction so values entered into apsim soil are adjusted down to account for stone content (assuming stones are inert from all soil process so their mass and volume is removed from model paramaters).  SAT, DUL, LL15 and Air dry have been adjusted down to account for stone content.  OC has not been adjusted so the model will get the correct carbon and N amounts using the adjusted BD.
              Physical
                Thickness  ParticleSizeSand  ParticleSizeSilt  ParticleSizeClay  Rocks  BD     AirDry  LL15   DUL    SAT    KS
                200        14.5              65.5              20                0      1.31   0.077   0.153  0.373  0.456  4832.039
                150        18                58                24                0      1.524  0.201   0.201  0.332  0.394  389.229
                200        13                48                39                0      1.42   0.298   0.298  0.426  0.442  21.6
                350        1                 55                44                0      1.424  0.308   0.308  0.446  0.456  19.051
                150        1                 55                44                0      1.424  0.308   0.308  0.446  0.456  19.051
                150        15                66                19                0      1.601  0.162   0.162  0.325  0.376  97.995
                300        15                66                19                0      1.601  0.162   0.162  0.325  0.376  97.995
                Rocks source: Calculated
                SoilCrop AGPRyegrassSoil: LL=[0.154, 0.201, 0.299, 0.308, 0.308, 0.162, 0.162]; KL=[0.1, 0.1, 0.1, 0.05, 0.05, 0.05, 0.05]; XF=[1, 0.8, 0.8, 0.3, 0, 0, 0]
                SoilCrop AGPWhiteCloverSoil: LL=[0.154, 0.201, 0.299, 0.308, 0.308, 0.162, 0.162]; KL=[0.1, 0.1, 0.1, 0.05, 0.05, 0.05, 0.05]; XF=[1, 0.8, 0.8, 0.3, 0, 0, 0]
              Organic: FOMCNRatio=40; CarbonUnits=Total
                Thickness  Carbon  SoilCNRatio  FBiom  FInert  FOM
                200        4.502   11           0.048  0.382   347.67
                150        1.91    11           0.027  0.634   257.56
                200        0.772   11           0.019  0.784   172.648
                350        0.422   11           0.015  0.924   85.734
                150        0.422   11           0.015  0.924   63.514
                150        0.402   11           0.015  0.971   47.052
                300        0.4     11           0.015  0.985   25.823
              Chemical: Thickness=[200, 150, 200, 350, 150, 150, 300]; PH=[6, 6, 6, 6, 6, 6, 6]; PHUnits=Water
              WaterBalance SoilWater: SummerDate=1-Oct; SummerU=9; SummerCona=4.4; WinterDate=1-Apr; WinterU=6; WinterCona=3; DiffusConst=88; DiffusSlope=35; Salb=0.13; CN2Bare=73; CNRed=20; CNCov=0.8; PSIDul=-100; Thickness=[200, 150, 200, 350, 150, 150, 300]; SWCON=[0.496, 0.366, 0.374, 0.076, 0.076, 0.306, 0.306]
              Water: Thickness=[200, 150, 200, 350, 150, 150, 300]; InitialValues=[0.373, 0.332, 0.426, 0.446, 0.446, 0.325, 0.325]; FilledFromTop=true
              SolutePatch NO3: InitialValuesUnits=kg/ha; WaterTableConcentration=0; D0=0; DepthConstant=0; MaxDepthSoluteAccessible=0; RunoffEffectivenessAtMovingSolute=0; MaxEffectiveRunoff=0
                Thickness  InitialValues  Exco  FIP
                200        18             0     1
                150        5              0     1
                200        4              0     1
                350        2              0     1
                150        1              0     1
                150        1              0     1
                300        1              0     1
              SolutePatch NH4: InitialValuesUnits=kg/ha; WaterTableConcentration=0; D0=0; DepthConstant=0; MaxDepthSoluteAccessible=0; RunoffEffectivenessAtMovingSolute=0; MaxEffectiveRunoff=0
                Thickness  InitialValues  Exco  FIP
                200        0              1     1
                150        0              1     1
                200        0              1     1
                350        0              1     1
                150        0              1     1
                150        0              1     1
                300        0              1     1
              SolutePatch Urea: InitialValuesUnits=kg/ha; WaterTableConcentration=0; D0=0; DepthConstant=0; MaxDepthSoluteAccessible=0; RunoffEffectivenessAtMovingSolute=0; MaxEffectiveRunoff=0
                Thickness  InitialValues  Exco  FIP
                200        0              0     1
                150        0              0     1
                200        0              0     1
                350        0              0     1
                150        0              0     1
                150        0              0     1
                300        0              0     1
              SoilTemperature Temperature
              NutrientPatchManager: NPartitionApproach=0; AutoAmalgamationApproach=0; basePatchApproach=0; AllowPatchAmalgamationByAge=false; PatchAgeForForcedMerge=0; LayerForNPartition=-99
          CompositeFactor B
            Specifications:
              [Weather].FileName = VCS_Ruakura.met
              [Soil]
              [CentrePivot].Script.allowIrrigation = false
              [Fertilisation].Script.Amount = 150
            Soil HE: SoilType=NZ_sedementary; Region=Plains; State=Canterbury; Country=New Zealand; Latitude=0; Longitude=0
              DataSource=Generic profile descriptions provided by Trevor Webb and data for functional horizions based on SWAMP project results
              Comments=Bulk density values were measured on the fine earth fraction so values entered into apsim soil are adjusted down to account for stone content (assuming stones are inert from all soil process so their mass and volume is removed from model paramaters).  SAT, DUL, LL15 and Air dry have been adjusted down to account for stone content.  OC has not been adjusted so the model will get the correct carbon and N amounts using the adjusted BD.
              Physical: same as TestPatches.Factors.Permutation.System.A.HE.Physical
              Organic: same as TestPatches.Factors.Permutation.System.A.HE.Organic
              Chemical: PHUnits=Water
                Thickness  PH  CEC
                200        6   16.441
                150        6   11.9115
                200        6   13.021
                350        6   12.7645
                150        6   12.7645
                150        6   6.9825
                300        6   6.978
                CEC source: Calculated
              WaterBalance SoilWater: same as TestPatches.Factors.Permutation.System.A.HE.SoilWater
              Water: Thickness=[200, 150, 200, 350, 150, 150, 300]; InitialValues=[0.373, 0.332, 0.426, 0.446, 0.446, 0.325, 0.325]; FilledFromTop=true
              SolutePatch NO3: same as TestPatches.Factors.Permutation.System.A.HE.NO3
              SolutePatch NH4: same as TestPatches.Factors.Permutation.System.A.HE.NH4
              SolutePatch Urea: same as TestPatches.Factors.Permutation.System.A.HE.Urea
              SoilTemperature Temperature
              NutrientPatchManager: NPartitionApproach=0; AutoAmalgamationApproach=0; basePatchApproach=0; AllowPatchAmalgamationByAge=false; PatchAgeForForcedMerge=0; LayerForNPartition=-99
          CompositeFactor C
            Specifications:
              [Weather].FileName = VCS_Lincoln.met
              [Soil]
              [CentrePivot].Script.allowIrrigation = true
              [Fertilisation].Script.Amount = 0
            Soil VL: SoilType=NZ_Sedimentary; LocalName=Lismore; Site=Winchmore; NearestTown=Ashburton; Region=Canterbury; Country=New Zealand; Latitude=-48.48; Longitude=0
              Chemical: Thickness=[150, 150, 200, 150, 250, 300, 300]; PH=[6, 6, 6, 6, 6, 6, 6]; PHUnits=Water
              Physical
                Thickness  ParticleSizeSand  ParticleSizeSilt  ParticleSizeClay  Rocks  BD    AirDry  LL15   DUL   SAT   KS
                150        15                65                20                0      1.3   0.05    0.15   0.25  0.45  5000
                150        20                65                15                0      1.35  0.12    0.14   0.22  0.43  2500
                200        25                63                12                0.568  1     0.055   0.055  0.15  0.25  3000
                150        35                57                8                 0.798  0.53  0.015   0.015  0.05  0.15  10000
                250        40                54                6                 0.866  0.31  0.01    0.01   0.03  0.11  17500
                300        40                55                5                 0.867  0.3   0.01    0.01   0.03  0.11  20000
                300        40                55                5                 0.867  0.3   0.01    0.01   0.03  0.11  20000
                Rocks source: Calculated
                SoilCrop AGPRyegrassSoil: LL=[0.15, 0.14, 0.06, 0.02, 0.01, 0.01, 0.01]; KL=[0.1, 0.1, 0.08, 0.04, 0.01, 0, 0]; XF=[1, 1, 1, 1, 1, 0, 0]
                SoilCrop AGPWhiteCloverSoil: LL=[0.15, 0.14, 0.06, 0.02, 0.01, 0.01, 0.01]; KL=[0.1, 0.1, 0.08, 0.04, 0.01, 0, 0]; XF=[1, 1, 1, 1, 1, 0, 0]
                SoilCrop Slurp1Soil: LL=[0.15, 0.14, 0.06, 0.02, 0.01, 0.01, 0.01]; KL=[0.1, 0.1, 0.08, 0.04, 0.01, 0, 0]; XF=[1, 1, 1, 1, 1, 0, 0]
                SoilCrop Slurp2Soil: LL=[0.15, 0.14, 0.06, 0.02, 0.01, 0.01, 0.01]; KL=[0.1, 0.1, 0.08, 0.04, 0.01, 0, 0]; XF=[1, 1, 1, 1, 1, 0, 0]
                SoilCrop Rye1Soil: LL=[0.15, 0.14, 0.06, 0.02, 0.01, 0.01, 0.01]; KL=[0.1, 0.1, 0.08, 0.04, 0.01, 0, 0]; XF=[1, 1, 1, 1, 1, 0, 0]
                SoilCrop Rye2Soil: LL=[0.15, 0.14, 0.06, 0.02, 0.01, 0.01, 0.01]; KL=[0.1, 0.1, 0.08, 0.04, 0.01, 0, 0]; XF=[1, 1, 1, 1, 1, 0, 0]
              WaterBalance SoilWater: same as SimpleCow.Field.Soil.SoilWater
              Organic: FOMCNRatio=40; CarbonUnits=Total
                Thickness  Carbon  SoilCNRatio  FBiom  FInert  FOM
                150        3       12           0.04   0.5     331.337
                150        1       12           0.02   0.7     245.461
                200        0.6     12           0.02   0.83    164.537
                150        0.4     12           0.01   0.9     121.892
                250        0.25    12           0.01   0.95    73.931
                300        0.15    12           0      0.99    40.574
                300        0.1     12           0      0.99    22.268
              Water: Thickness=[150, 150, 200, 150, 250, 300, 300]; InitialValues=[0.245, 0.216, 0.145, 0.048, 0.029, 0.029, 0.029]; FilledFromTop=false
              SolutePatch NO3: same as TestPatches.Factors.Permutation.System.A.HE.NO3
              SolutePatch NH4: same as TestPatches.Factors.Permutation.System.A.HE.NH4
              SolutePatch Urea: same as TestPatches.Factors.Permutation.System.A.HE.Urea
              SoilTemperature Temperature
              NutrientPatchManager: NPartitionApproach=0; AutoAmalgamationApproach=0; basePatchApproach=0; AllowPatchAmalgamationByAge=false; PatchAgeForForcedMerge=0; LayerForNPartition=-99
          CompositeFactor D
            Specifications:
              [Weather].FileName = VCS_Lincoln.met
              [Soil]
              [CentrePivot].Script.allowIrrigation = true
              [Fertilisation].Script.Amount = 250
            Soil VL: SoilType=NZ_Sedimentary; LocalName=Lismore; Site=Winchmore; NearestTown=Ashburton; Region=Canterbury; Country=New Zealand; Latitude=-48.48; Longitude=0
              Chemical: Thickness=[150, 150, 200, 150, 250, 300, 300]; PH=[6, 6, 6, 6, 6, 6, 6]; PHUnits=Water
              Physical
                Thickness  ParticleSizeSand  ParticleSizeSilt  ParticleSizeClay  Rocks     BD    AirDry  LL15   DUL   SAT   KS
                150        15                65                20                0         1.3   0.05    0.15   0.25  0.45  5000
                150        20                65                15                0         1.35  0.12    0.14   0.22  0.43  2500
                200        25                63                12                0.568263  1     0.055   0.055  0.15  0.25  3000
                150        35                57                8                 0.798387  0.53  0.015   0.015  0.05  0.15  10000
                250        40                54                6                 0.866051  0.31  0.01    0.01   0.03  0.11  17500
                300        40                55                5                 0.866621  0.3   0.01    0.01   0.03  0.11  20000
                300        40                55                5                 0.866621  0.3   0.01    0.01   0.03  0.11  20000
                Rocks source: Calculated
                SoilCrop AGPRyegrassSoil: LL=[0.15, 0.14, 0.06, 0.02, 0.01, 0.01, 0.01]; KL=[0.1, 0.1, 0.08, 0.04, 0.01, 0, 0]; XF=[1, 1, 1, 1, 1, 0, 0]
                SoilCrop AGPWhiteCloverSoil: LL=[0.15, 0.14, 0.06, 0.02, 0.01, 0.01, 0.01]; KL=[0.1, 0.1, 0.08, 0.04, 0.01, 0, 0]; XF=[1, 1, 1, 1, 1, 0, 0]
                SoilCrop Slurp1Soil: LL=[0.15, 0.14, 0.06, 0.02, 0.01, 0.01, 0.01]; KL=[0.1, 0.1, 0.08, 0.04, 0.01, 0, 0]; XF=[1, 1, 1, 1, 1, 0, 0]
                SoilCrop Slurp2Soil: LL=[0.15, 0.14, 0.06, 0.02, 0.01, 0.01, 0.01]; KL=[0.1, 0.1, 0.08, 0.04, 0.01, 0, 0]; XF=[1, 1, 1, 1, 1, 0, 0]
                SoilCrop Rye1Soil: LL=[0.15, 0.14, 0.06, 0.02, 0.01, 0.01, 0.01]; KL=[0.1, 0.1, 0.08, 0.04, 0.01, 0, 0]; XF=[1, 1, 1, 1, 1, 0, 0]
                SoilCrop Rye2Soil: LL=[0.15, 0.14, 0.06, 0.02, 0.01, 0.01, 0.01]; KL=[0.1, 0.1, 0.08, 0.04, 0.01, 0, 0]; XF=[1, 1, 1, 1, 1, 0, 0]
              WaterBalance SoilWater: same as SimpleCow.Field.Soil.SoilWater
              Organic: same as TestPatches.Factors.Permutation.System.C.VL.Organic
              Water: Thickness=[150, 150, 200, 150, 250, 300, 300]; InitialValues=[0.245, 0.216, 0.145, 0.048, 0.029, 0.029, 0.029]; FilledFromTop=false
              SolutePatch NO3: same as TestPatches.Factors.Permutation.System.A.HE.NO3
              SolutePatch NH4: same as TestPatches.Factors.Permutation.System.A.HE.NH4
              SolutePatch Urea: same as TestPatches.Factors.Permutation.System.A.HE.Urea
              SoilTemperature Temperature
              NutrientPatchManager: NPartitionApproach=0; AutoAmalgamationApproach=0; basePatchApproach=0; AllowPatchAmalgamationByAge=false; PatchAgeForForcedMerge=0; LayerForNPartition=-99
          CompositeFactor E
            Specifications:
              [Weather].FileName = VCS_Lincoln.met
              [Soil]
              [CentrePivot].Script.allowIrrigation = true
              [Fertilisation].Script.Amount = 400
            Soil VL: same as TestPatches.Factors.Permutation.System.D.VL
          CompositeFactor F
            Specifications:
              [Weather].FileName = VCS_Lincoln.met
              [Soil]
              [CentrePivot].Script.allowIrrigation = false
              [Fertilisation].Script.Amount = 0
            Soil VL: same as TestPatches.Factors.Permutation.System.D.VL
    Simulation TestPatches
      Clock: Start=1972-01-01; End=2021-12-31
      Weather: FileName=%root%/Examples/WeatherFiles/NZ_Lincoln.met
      MicroClimate: a_interception=0; b_interception=1; c_interception=0; d_interception=0; SoilHeatFluxFraction=0.4; MinimumHeightDiffForNewLayer=0; NightInterceptionFraction=0.5; ReferenceHeight=2
      SoilArbitrator
      Forages: same as SimpleCow.Forages
      SimpleCow: same as SimpleCow.Field.SimpleCow
      SimpleGrazing: GrazingRotationType=1; SimpleGrazingFrequencyString=21; SimpleMinGrazable=0; SimpleGrazingResidual=1500; FlexibleGrazePostDM=0; MaximumRotationLengthArray=[50, 50, 50, 50, 60, 60, 90, 70, 50, 50, 50, 50]; MinimumRotationLengthArray=[21, 21, 21, 21, 21, 21, 21, 21, 21, 21, 21, 21]; NoGrazingStartString=13-may; NoGrazingEndString=25-jul; IsCutAndCarry=false; FractionClippingsReturned=0; FractionIntakeNToAnimal=[0]; DungNConc=2.6; FractionOfDungUrineOffPaddock=[0]; DepthUrineIsAdded=250; ShowAdvancedExcretaOptions=false; SendDungElsewhere=0; SendUrineElsewhere=0; UsePatching=true; PseudoPatches=false; ZoneCount=1; UrineReturnPattern=2; PseudoRandomSeed=666; MaxEffectiveNConcentration=3.5; FractionPopulationDecline=0; TramplingOn=false; MaximumPropLitterMovedToSoil=0.1; PastureConsumedAtMaximumRateOfLitterRemoval=1200
        PreGrazeDMArray=[2700, 2700, 2700, 2700, 2700, 2700, 2700, 2700, 2700, 2700, 2700, 2700]
        PostGrazeDMArray=[1500, 1500, 1500, 1500, 1250, 1250, 1250, 1250, 1500, 1500, 1500, 1500]
      Report PasturePatches: EventNames=[Clock].EndOfYear
        VariableNames:
          [Clock].Today as Date
          Sum of ([AGPRyegrass].HarvestedWt + [AGPWhiteClover].HarvestedWt) from 1-Jan to [Clock].Today as cumHarvestedWt   //the amount harvested (kg DM /ha)
          Sum of [SimpleGrazing].GrazedN from 1-Jan to [Clock].Today as cumNHarvested
          Sum of [SimpleCow].HerdUrineNReturned from 1-Jan to [Clock].Today as cumUrineNReturned
          Sum of [ISoilWater].LeachNO3 from 1-Jan to [Clock].Today as Leaching
          sum([Soil].NO3.kgha + [Soil].NH4.kgha + [Soil].Urea.kgha) as MineralN
      Summary
      Zone Field: Area=1; Slope=0; AspectAngle=0; Altitude=50
        Manager FertiliseFixedDates (disabled)
          EachYear = True
          Dates = 5-jan, 5-feb, 5-mar, 5-apr, 5-aug, 5-sep, 5-oct, 5-nov, 5-dec
          UseCritNThreshold = False
          CritNThreshold = 50
          CritNDepth = 75
          Depth = 50
          Amount = 15
          FertiliserType = UreaN
          script: same as in SimpleCow.Field.FertiliseFixedDates
        Manager Fertilisation
          FertiliserType = UreaN
          FertiliserDates = 15-jan, 15-feb, 15-mar, 15-apr, 15-aug, 15-sep, 15-oct, 15-nov, 15-dec
          Amount = 190
          AmountType = False
```csharp
using Models.Soils;
using System;
using System.Linq;
using Models.Core;
using Models.PMF;
using APSIM.Shared.Utilities;
namespace Models
{
    [Serializable]
    public class Script : Model
    {
        [Link] Clock Clock;
        [Link] Fertiliser Fertiliser;
        
        [Separator("A component to apply fertiliser on one or more dates on every year of the simulation")]

        [Description("Type of fertiliser to apply? ")] 
        [Display(Type = DisplayType.FertiliserType)]public string FertiliserType { get; set; }

        [Description("Enter the fertilisation dates as dd-mmm with comma separation (any year information entered will be ignored): ")] 
        public string[] FertiliserDates { get; set; } 

        [Description("Amount of fertiliser to be applied (kg /ha)")] 
        public double Amount { get; set; }

        [Description("Is the above amount to be applied each time? (yes/ticked)? Or is it the total annual amount across all dates (no/unticked)")] 
        public bool AmountType { get; set; }
        
        [EventSubscribe("DoManagement")]
        private void OnDoManagement(object sender, EventArgs e)
        {
            foreach (string ddMMM in FertiliserDates)
            {
                if (DateUtilities.DatesEqual(ddMMM, Clock.Today))
                {
                    if (AmountType)
                        Fertiliser.Apply(amount: Amount, type: FertiliserType);
                    else
                        Fertiliser.Apply(amount: Amount / FertiliserDates.Length, type: FertiliserType);
                }
            }
        }
    }
}
```
        Manager CentrePivot
          allowIrrigation = True
          IrrigStart = 1-sep
          IrrigEnd = 30-apr
          SoilDepth = 500
          CritPAWForShallow = 60
          CritRainToPause = 30
          DaysToPauseOnCritRain = 3
          IrrigReturnShallow = 2
          IrrigAmtShallow = 10
          PercPAWIrrigDeficitShallow = 0
          IrrigEffShallow = 100
          IrrigReturnDeep = 4
          IrrigAmtDeep = 20
          IrrigDeficitDeep = 25
          IrrigEffDeep = 100
```csharp
using Models.Soils;
using System;
using System.Linq;
using System.Diagnostics;
using Models.Core;
using Models.Interfaces;
using APSIM.Shared.Utilities;

namespace Models
{
    [Serializable]
    public class Script : Model
    {
        [Link] Clock clock;
        [Link] IWeather weather;
        [Link] Irrigation irrigation;
        [Link] ISummary summary;
        [Link] Physical physical;
        [Link] Water water;

        [Description("Allow this mananger to control irrigation?")]
        public bool allowIrrigation { get; set; } = true;

        [Separator("All soils")]

        [Description("Start of irrigation season (dd-mmm)")] 
        public string IrrigStart { get; set; }

        [Description("End of irrigation season (dd-mmm)")] 
        public string IrrigEnd { get; set; }

        [Description("Enter the depth to which water deficit is computed (mm)")] 
        public double SoilDepth { get; set; }
        
        [Description("PAW below which soil is considered 'shallow' (mm)")] 
        public double CritPAWForShallow { get; set; }

        [Description("Amount of rainfall over the last 3 days to cause pause to irrigator (mm)")] 
        public double CritRainToPause { get; set; }

        [Description("Number of days to pause irrigator after critical delay (days)")] 
        public double DaysToPauseOnCritRain { get; set; }
        
        [Separator("Shallow soils")]
        
        [Description("Irrigation return period for shallow soils (days)")] 
        public double IrrigReturnShallow { get; set; }

        [Description("Effective irrigation amount for shallow soils (mm)")] 
        public double IrrigAmtShallow { get; set; }

        [Description("Percentage of PAW at which to irrigate shallow soils (%)")] 
        public double PercPAWIrrigDeficitShallow { get; set; }

        [Description("Irrigation efficiency for shallow soils (%)")] 
        public double IrrigEffShallow { get; set; }

        [Separator("Deep soils")]
        
        [Description("Irrigation return period for deep soils (days)")] 
        public double IrrigReturnDeep { get; set; }

        [Description("Effective irrigation amount for deep soils (mm)")] 
        public double IrrigAmtDeep { get; set; }

        [Description("Percentage of PAW at which to irrigate deep soils (%)")] 
        public double IrrigDeficitDeep { get; set; }

        [Description("Irrigation efficiency for deep soils (%)")] 
        public double IrrigEffDeep { get; set; }


        // Output variables
        [Units("mm")]
        public double TodayDeficit {get; set; }
         
        [Units("mm")]
        public double TodayDeficit_nve {get; set; }
         
        [Units("")]
        public double IrrigDay {get; set; }
         
        [Units("")]
        public double SoilPAW {get; set; }
         
        [Units("")]
        public double IrrigDeficit {get; set; }
        
        [Units("")]
        public double IrrigReturn {get; set; }
        
        [Units("")]
        public double IrrigAmt {get; set; }
        
        [Units("")]
        public double IrrigEff {get; set; }
        
        [Units("mm")]
        public double Rain3 {get; set; }
        
        [Units("mm")]
        public double[] Rain_3 {get; set; } = new double[3];
        
        [Units("")]
        public double Days2Pause {get; set; }

         // private variables
        private double irrigDeficitShallow {get; set; }

        
        [EventSubscribe("StartOfSimulation")]
        private void OnStartOfSimulation(object sender, EventArgs e)
        {
            if (allowIrrigation)
            {
            
                IrrigDay = 5000;  // so will reset to 1 on first day

                Rain3 = 0.0;
                Rain_3[0] = 0.0; Rain_3[1] = 0.0; Rain_3[2] = 0.0;

                SoilPAW = 0.0;
                double mySoilDepth = 0;
                for (int z = 0; z <= physical.Thickness.Length - 1; z++)
                {
                    mySoilDepth = mySoilDepth + physical.Thickness[z];
                    if (mySoilDepth <= SoilDepth)
                        SoilPAW = SoilPAW + physical.DULmm[z] - physical.LL15mm[z];
                }
                if (SoilPAW <= CritPAWForShallow)
                {
                    IrrigDeficit = PercPAWIrrigDeficitShallow / (double)100 * SoilPAW;
                    IrrigReturn = IrrigReturnShallow;
                    IrrigAmt = IrrigAmtShallow;
                    IrrigEff = IrrigEffShallow;
                    summary.WriteMessage(this, "Soil is considered to be shallow " + CritPAWForShallow + " " + SoilPAW, MessageType.Information);
                }
                else
                {
                    IrrigDeficit = IrrigDeficitDeep;
                    IrrigReturn = IrrigReturnDeep;
                    IrrigAmt = IrrigAmtDeep;
                    IrrigEff = IrrigEffDeep;
                    summary.WriteMessage(this, "Soil is considered to be deep", MessageType.Information);
                }

                summary.WriteMessage(this, $"Irrigation critical deficit (mm): {IrrigDeficit}", MessageType.Information);
                summary.WriteMessage(this, $"        Irrigation return (days): {IrrigReturn}", MessageType.Information);
                summary.WriteMessage(this, $"   Irrigation pumped amount (mm): {IrrigAmt}", MessageType.Information);
                summary.WriteMessage(this, $"       Irrigation efficiency (%): {IrrigEff}", MessageType.Information);
            }
        }
        
        
        [EventSubscribe("DoManagement")]
        private void OnDoManagement(object sender, EventArgs e)
        {
            if (allowIrrigation)
            {
                Rain_3[2] = Rain_3[1];
                Rain_3[1] = Rain_3[0];
                Rain_3[0] = weather.Rain;
                Rain3 = Rain_3[0] + Rain_3[1] + Rain_3[2];
                if (Rain3 >= CritRainToPause)
                    Days2Pause = DaysToPauseOnCritRain;
                else
                    Days2Pause = Days2Pause - 1;

                TodayDeficit = 0.0;
                SoilPAW = 0.0;
                double mySoilDepth = 0;

                for (int z = 0; z <= physical.Thickness.Length - 1; z++)
                {
                    mySoilDepth = mySoilDepth + physical.Thickness[z];
                    if (mySoilDepth <= SoilDepth)
                    {
                        SoilPAW = SoilPAW + physical.DULmm[z] - physical.LL15mm[z];
                        TodayDeficit = TodayDeficit + physical.DULmm[z] - Math.Min(physical.DULmm[z], water.MM[z]);
                    }
                }
                TodayDeficit_nve = -1 * TodayDeficit;

                if (DateUtilities.WithinDates(IrrigStart, clock.Today, IrrigEnd))
                {
                    if (SoilPAW <= CritPAWForShallow)
                    {
                        IrrigDeficit = PercPAWIrrigDeficitShallow / 100 * SoilPAW;
                        IrrigReturn = IrrigReturnShallow;
                        IrrigAmt = IrrigAmtShallow;
                        IrrigEff = IrrigEffShallow;
                    }
                    else
                    {
                        IrrigDeficit = IrrigDeficitDeep;
                        IrrigReturn = IrrigReturnDeep;
                        IrrigAmt = IrrigAmtDeep;
                        IrrigEff = IrrigEffDeep;
                    }

                    if (Days2Pause < 0.5)
                    {
                        IrrigDay = IrrigDay + 1;
                        if (IrrigDay > IrrigReturn)
                            IrrigDay = 1;// and day = 1 is when the irrigation happens

                        if (TodayDeficit >= IrrigDeficit)
                        {
                            if (IrrigDay == 1)
                                irrigation.Apply(amount: IrrigAmt / (IrrigEff / 100.0));
                        }
                    }
                }
            }
        }    
    }
}
```
        Irrigation
        Fertiliser
        PastureSpecies AGPRyegrass: doyGermination=275; daysEmergenceToAnthesis=120; daysAnthesisToMaturity=85; degreesDayForAnthesis=1100; degreesDayForMaturity=900; daysAnnualsFactor=45; CanopyType=PastureSpecies; InitialShootDM=3000; InitialRootDM=450; InitialRootDepth=750; initialDMFractionsGrasses=[0.15, 0.25, 0.25, 0.05, 0.05, 0.1, 0.1, 0.05, 0, 0, 0]; initialDMFractionsForbs=[0.2, 0.2, 0.15, 0.05, 0.1, 0.15, 0.1, 0.05, 0, 0, 0]; PhotosyntheticEfficiency=0.01; PhotosynthesisCurveFactor=0.8; FractionPAR=0.5; ReferenceCO2=380; CO2EffectScaleFactor=700; CO2EffectOffsetFactor=600; CO2EffectMinimum=0.7; CO2EffectExponent=2; ReproSeasonDurationCoeff=2; ReproSeasonShouldersLengthFactor=1; ReproSeasonOnsetDurationFactor=0.6; RelativeTurnoverEmerging=2; DetachmentDroughtCoefficient=3; DetachmentDroughtEffectMin=0.1; TurnoverStockFactor=0.01; TurnoverDefoliationEffectMin=0.025; MinimumGreenLeafProp=0.8; MinimumGreenRootProp=0.5
          initialDMFractionsLegumes=[0.16, 0.23, 0.22, 0.05, 0.03, 0.05, 0.05, 0.01, 0.04, 0.08, 0.08]
          LinearInterpolationFunction FVPDFunction
        PastureSpecies AGPWhiteClover: doyGermination=275; daysEmergenceToAnthesis=120; daysAnthesisToMaturity=85; degreesDayForAnthesis=1100; degreesDayForMaturity=900; daysAnnualsFactor=45; CanopyType=PastureSpecies; InitialShootDM=1000; InitialRootDM=150; InitialRootDepth=350; initialDMFractionsGrasses=[0.15, 0.25, 0.25, 0.05, 0.05, 0.1, 0.1, 0.05, 0, 0, 0]; initialDMFractionsForbs=[0.2, 0.2, 0.15, 0.05, 0.1, 0.15, 0.1, 0.05, 0, 0, 0]; PhotosyntheticEfficiency=0.01; PhotosynthesisCurveFactor=0.8; FractionPAR=0.5; ReferenceCO2=380; CO2EffectScaleFactor=700; CO2EffectOffsetFactor=600; CO2EffectMinimum=0.7; CO2EffectExponent=2; ReproSeasonDurationCoeff=2; ReproSeasonShouldersLengthFactor=1; ReproSeasonOnsetDurationFactor=0.6; RelativeTurnoverEmerging=2; DetachmentDroughtCoefficient=3; DetachmentDroughtEffectMin=0.1; TurnoverStockFactor=0.01; TurnoverDefoliationEffectMin=0.025; MinimumGreenLeafProp=0.8; MinimumGreenRootProp=0.5
          initialDMFractionsLegumes=[0.16, 0.23, 0.22, 0.05, 0.03, 0.05, 0.05, 0.01, 0.04, 0.08, 0.08]
          LinearInterpolationFunction FVPDFunction
        SurfaceOrganicMatter: InitialResidueName=Sward; InitialResidueType=grass; InitialResidueMass=1000; InitialStandingFraction=0; InitialCPR=0; InitialCNR=15
        Soil: same as TestPatches.Factors.Permutation.System.B.HE
        Report Paddock (disabled): EventNames=[Clock].EndOfDay
          VariableNames:
            [Clock].Today as Date
            Sum of [ISoilWater].LeachNO3 from 1-Jul to [Clock].Today as Leaching
            sum([Soil].NO3.kgha + [Soil].NH4.kgha + [Soil].Urea.kgha) as MineralN
            [AGPRyegrass].HarvestedWt + [AGPWhiteClover].HarvestedWt from 1-Jul to [Clock].Today as cumHarvestedWt   //the amount harvested (kg DM /ha)
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