Simulations: Version=184
  Folder Replacements
    NFlow Denitrification: SourceName=NO3
      Memo
        Denitrification is simulated using the approaches initially used in CERES Maize ([jones_ceres-maize:_1986]) as implemented in APSIM SoilN ([probert_apsims_1998]).  These were based upon the work of [Rolston1984].  Denitrification rate is calculated using this approach to account for the effect of soil carbon, temperature and water on the fraction of nitrate lost on a daily basis.
      Constant NLoss: FixedValue=1
      ExpressionFunction Rate
        Expression=[Potential] * [CERESDenitrificationTemperatureFactor] * [CERESDenitrificationWaterFactor]
        BoundFunction CERESDenitrificationTemperatureFactor
          Constant Lower: FixedValue=0
          Constant Upper: FixedValue=1
          ExpressionFunction TemperatureFactor: Expression=0.1 * exp(0.046 * [Temperature].Value)
        BoundFunction CERESDenitrificationWaterFactor
          Constant Lower: FixedValue=0
          Constant Upper: FixedValue=1
          ExpressionFunction WaterFactor
            Expression=(([SoilWater].SW) - (0.916*[Physical].SAT)) / ([Physical].SAT - (0.916*[Physical].SAT))
        Constant DenitrificationRateModifier: FixedValue=0.0006
        LessThanFunction ActiveC
          Constant IsInertActive: FixedValue=1
          Constant Comparision: FixedValue=0.5
          ExpressionFunction InertNotActive
            Expression=[Humic].C + [FOMCarbohydrate].C + [FOMCellulose].C + [FOMLignin].C
          ExpressionFunction InertActive
            Expression=[Humic].C + [Inert].C + [FOMCarbohydrate].C + [FOMCellulose].C + [FOMLignin].C
        ExpressionFunction ActiveCppm: Expression=[ActiveC] / ([Physical].BD * [Physical].Thickness / 100)
        ExpressionFunction CarbonModifier: Expression=0.0031 * [ActiveCppm] + 24.5
        ExpressionFunction Potential: Expression=[DenitrificationRateModifier] * [CarbonModifier]
      DayCentN2OFractionModel N2OFraction: N2ODiffusionCoefficient=10
        Memo
          The emission of N2O during denitrification is calculated from an N2:N2O ratio using the approach from the DayCent model ([PARTON1998]) as previously tested in APSIM ([THORBURN2010]).
  Experiment
    Factors
      Permutation
        Factor treatment: Specification=[Operations]
          Operations T1_2007
            2007-06-05  [Wheat].Sow(Bolac,175,25,195);
            2007-12-12  [Wheat].Harvest();
            2007-12-12  [Wheat].EndCrop();
          Operations T2_2007
            2007-06-05  [Wheat].Sow(Bolac,175,25,195);
            2007-06-05  [Fertiliser].Apply(Amount:50,Type:UreaN,Depth:150);
            2007-12-12  [Wheat].Harvest();
            2007-12-12  [Wheat].EndCrop();
          Operations T3_2007
            2007-06-05  [Wheat].Sow(Bolac,175,25,195);
            2007-06-05  [Fertiliser].Apply(Amount:50,Type:UreaN,Depth:150);
            2007-09-06  [Irrigation].Apply(25);
            2007-09-07  [Irrigation].Apply(25);
            2007-12-12  [Wheat].Harvest();
            2007-12-12  [Wheat].EndCrop();
    Simulation
      Clock: Start=2007-02-08; End=2008-02-07
      Summary
      Weather: FileName=Horsham_Exp.met; Latitude=-36.45; Tav=14.79; Amp=13.66
      SoilArbitrator
      MicroClimate: a_interception=0; b_interception=1; c_interception=0; d_interception=0; SoilHeatFluxFraction=0.4; MinimumHeightDiffForNewLayer=0; NightInterceptionFraction=0.5; ReferenceHeight=2
      Zone Field: Area=1; Slope=0; AspectAngle=0; Altitude=50
        Report: EventNames=[Clock].EndOfDay
          VariableNames:
            [Clock].Today as date
            [Clock].Today
            sum of [Weather].Rain from [Wheat].Sowing to [Wheat].Harvesting as WheatInCropRain
            [Soil].SoilWater.SW
            [Soil].Water.Physical.LL15
            [Soil].Water.Physical.DUL
            [Soil].Water.Physical.SAT
            [ISoilWater].Runoff
            [ISoilWater].Eos
            [ISoilWater].Drainage
            [ISoilWater].Eo
            [ISoilWater].Es
            [Soil].Physical.BD
            [NO3].kgha
            [NH4].kgha
            [NO3].ppm
            [NH4].ppm
            [ISoilWater].LeachNO3
            [Nutrient].MineralisedN
            [Soil].Nutrient.Denitrification.N2Oatm
            [Soil].Nutrient.Denitrification.Natm
            [Soil].Nutrient.Nitrification.N2Oatm
            sum([Soil].Nutrient.Denitrification.Natm) as denitn_kg_ha
            sum([Soil].Nutrient.Denitrification.N2Oatm) as denitn2o_kg_ha
            sum([Soil].Nutrient.Nitrification.N2Oatm) as nitrifiedn2o_kg_ha
            denitn2o_kg_ha + nitrifiedn2o_kg_ha as total_n2o
            total_n2o *1000 as total_n2o_g_ha
            sum of total_n2o_g_ha from [Wheat].Sowing to [Wheat].Harvesting as season_n2o_g_ha
            [Soil].Nutrient.Microbial.C as biom_c
            [Soil].Nutrient.FOM.C as fom_c
            [Soil].Nutrient.Humic.C as hum_c
            [Soil].Nutrient.Microbial.C as biom_c() as total_biom
            [Soil].Nutrient.FOM.C as fom_c() as total_fom
            [Soil].Nutrient.Humic.C as hum_c() as total_hum
            [Wheat].Grain.Wt*10 as WheatYieldkgha
            [Wheat].AboveGround.Wt*10 as WheatAboveGroundWtKgha
            [Wheat].AboveGround.N*10 as WheatAboveGroundNKgha
            [Wheat].Leaf.LAI
            [Wheat].Grain.N * 10 as WheatAbovegroundNKgha
        Fertiliser
        SurfaceOrganicMatter: InitialResidueName=soybean; InitialResidueType=soybean; InitialResidueMass=1000; InitialStandingFraction=0; InitialCPR=0; InitialCNR=40
        Plant Wheat
        Operations
        Plant Soybean
        Irrigation
        Report HarvestReport: EventNames=[Wheat].Harvesting
          VariableNames:
            [Clock].Today
            [Wheat].Grain.Wt*10 as WheatYieldKgha
            [Wheat].AboveGround.Wt*10 as WheatAboveGroundWtKgha
            [Wheat].AboveGround.N*10 as WheatAboveGroundNKgha
            [Wheat].Grain.N
        Soil: ASCOrder=Vertosol; ASCSubOrder=Black; SoilType=Clay; Site=Norwin; NearestTown=Norwin; Region=Darling Downs and Granite Belt; State=Queensland; Country=Australia; NaturalVegetation=Qld. Bluegrass, possible Qld. Blue gum; ApsoilNumber=900; Latitude=-27.581836; Longitude=151.320206; LocationAccuracy=+/- 20m; YearOfSampling=0
          DataSource=CSIRO Sustainable Ecosystems, Toowoomba; Characteriesd as part of the GRDC funded project"Doing it better, doing it smarter, managing soil water in Australian agriculture' 2011
          Comments=Clay - OC, CLL for all crops estimated-based on Bongeen Mywybilla Soil No1
          Physical
            Thickness  ParticleSizeSand  ParticleSizeSilt  ParticleSizeClay  Rocks  BD     AirDry  LL15  DUL   SAT   KS
            100        44.232            10.32             45.448            0      1.12   0.1     0.2   0.42  0.46  800
            100        43.233            11.211            45.556            0      1.23   0.18    0.23  0.4   0.47  500
            200        36.985            10.451            51.384            0      1.26   0.23    0.27  0.42  0.48  300
            200        36.985            10.451            51.384            0      1.32   0.31    0.31  0.43  0.48  200
            200        36.985            10.451            51.384            0      1.34   0.33    0.33  0.45  0.48  200
            200        36.985            10.451            51.384            0      1.378  0.36    0.36  0.45  0.48  20
            200        36.985            10.451            51.384            0      1.37   0.36    0.36  0.45  0.48  20
            200        36.985            10.451            51.384            0      1.37   0.36    0.36  0.45  0.48  20
            200        36.985            10.451            51.384            0      1.37   0.36    0.36  0.45  0.48  20
            200        36.985            10.451            51.384            0      1.37   0.36    0.36  0.45  0.48  20
            SoilCrop WheatSoil: LL=[0.2, 0.23, 0.27, 0.31, 0.33, 0.36, 0.36, 0.36, 0.36, 0.36]; KL=[0.1, 0.1, 0.06, 0.06, 0.04, 0.04, 0.02, 0.02, 0.02, 0.02]; XF=[1, 1, 1, 1, 1, 1, 1, 1, 1, 1]
            SoilCrop SoybeanSoil
              LL=[0.2, 0.23, 0.27, 0.31, 0.33, 0.36, 0.36, 0.36, 0.36, 0.36]
              KL=[0.06, 0.06, 0.04, 0.02, 0.02, 0.02, 0.02, 0.02, 0.02, 0.02]
              XF=[1, 1, 1, 1, 1, 1, 1, 1, 1, 1]
          WaterBalance SoilWater: SummerDate=1-Nov; SummerU=6; SummerCona=5; WinterDate=1-Apr; WinterU=4; WinterCona=2.5; DiffusConst=40; DiffusSlope=16; Salb=0.12; CN2Bare=73; CNRed=20; CNCov=0.8; PSIDul=-100; Thickness=[100, 100, 100, 300, 300, 300, 300]; SWCON=[0.4, 0.4, 0.4, 0.4, 0.4, 0.4, 0.4]
          Organic: FOMCNRatio=40; CarbonUnits=Total
            Thickness  Carbon  SoilCNRatio  FBiom  FInert  FOM
            100        1.223   12           0.04   0.126   347.1
            100        0.927   12           0.04   0.137   270.3
            200        0.647   12           0.02   0.248   164
            200        0.612   12           0.015  0.5     99.5
            200        0.306   12           0.015  0.95    60.3
            200        0.245   12           0.01   0.95    36.6
            200        0.183   12           0.01   1       22.2
            200        0.122   12           0.01   1       22.2
            200        0.122   12           0.01   1       22.2
            200        0.122   12           0.01   1       22.2
          Chemical: PHUnits=Water
            Thickness  PH   EC     ESP
            100        7.9  0.225  4.2
            100        8    0.306  4.9
            200        8.1  0.293  6.3
            200        8.4  0.418  8.5
            200        8.5  0.532  10.9
            200        8.6  0.625  12.7
            200        8.7  0.694  14.3
            200        8.7  0.694  14.3
            200        8.7  0.694  14.3
            200        8.7  0.694  14.3
          Water: Thickness=[100, 100, 200, 200, 200, 200, 200, 200, 200, 200]; InitialValues=[0.3, 0.3, 0.3, 0.32, 0.35, 0.39, 0.39, 0.39, 0.4, 0.4]; InitialPAWmm=63; RelativeTo=LL15; FilledFromTop=false
          Nutrient
          Solute NO3: Thickness=[100, 100, 200, 200, 200, 200, 200, 200, 200, 200]; InitialValuesUnits=ppm; WaterTableConcentration=0; D0=0; DepthConstant=0; MaxDepthSoluteAccessible=0; RunoffEffectivenessAtMovingSolute=0; MaxEffectiveRunoff=0
            InitialValues=[18.86, 10.793, 4.147, 2.243, 2.147, 2.23, 2.158, 2.158, 2.158, 2.158]
          Solute NH4: Thickness=[100, 100, 200, 200, 200, 200, 200, 200, 200, 200]; InitialValuesUnits=ppm; WaterTableConcentration=0; D0=0; DepthConstant=0; MaxDepthSoluteAccessible=0; RunoffEffectivenessAtMovingSolute=0; MaxEffectiveRunoff=0
            InitialValues=[2.64, 1.753, 1.359, 1.252, 0.895, 1.157, 1.155, 1.155, 1.155, 1.155]
          Solute Urea: Thickness=[100, 100, 200, 200, 200, 200, 200, 200, 200, 200]; InitialValues=[0, 0, 0, 0, 0, 0, 0]; InitialValuesUnits=kg/ha; WaterTableConcentration=0; D0=0; DepthConstant=0; MaxDepthSoluteAccessible=0; RunoffEffectivenessAtMovingSolute=0; MaxEffectiveRunoff=0
          SoilTemperature Temperature: Thickness=[100, 100, 200, 200, 200, 200, 200, 200, 200, 200]
        Report Season
          VariableNames=sum of total_n2o_g_ha from [Wheat].Sowing to [Wheat].Harvesting as season_n2o_g_ha
          EventNames:
            [Wheat].Harvesting
  DataStore
    ExcelInput: FileNames=[for_apsim\observed_horsham.xlsx]; SheetNames=[plant, mineral_n, n2o, soil_water]
  Memo
    Fababean was in the original, but isn't in nextgen
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