Simulations: Version=191
  Folder Replacements
    NFlow Denitrification: SourceName=NO3
      Memo
        Denitrification is simulated using the approaches initially used in CERES Maize ([jones_ceres-maize:_1986]) as implemented in APSIM SoilN ([probert_apsims_1998]).  These were based upon the work of [Rolston1984].  Denitrification rate is calculated using this approach to account for the effect of soil carbon, temperature and water on the fraction of nitrate lost on a daily basis.
      Constant NLoss: FixedValue=1
      ExpressionFunction Rate
        Expression=[Potential] * [CERESDenitrificationTemperatureFactor] * [CERESDenitrificationWaterFactor]
        BoundFunction CERESDenitrificationTemperatureFactor
          Constant Lower: FixedValue=0
          Constant Upper: FixedValue=1
          ExpressionFunction TemperatureFactor: Expression=0.1 * exp(0.046 * [Temperature].Value)
        BoundFunction CERESDenitrificationWaterFactor
          Constant Lower: FixedValue=0
          Constant Upper: FixedValue=1
          ExpressionFunction WaterFactor
            Expression=(([SoilWater].SW) - (0.826*[Physical].SAT)) / ([Physical].SAT - (0.826*[Physical].SAT))
        Constant DenitrificationRateModifier: FixedValue=0.0006
        LessThanFunction ActiveC
          Constant IsInertActive: FixedValue=1
          Constant Comparision: FixedValue=0.5
          ExpressionFunction InertNotActive
            Expression=[Humic].C + [FOMCarbohydrate].C + [FOMCellulose].C + [FOMLignin].C
          ExpressionFunction InertActive
            Expression=[Humic].C + [Inert].C + [FOMCarbohydrate].C + [FOMCellulose].C + [FOMLignin].C
        ExpressionFunction ActiveCppm: Expression=[ActiveC] / ([Physical].BD * [Physical].Thickness / 100)
        ExpressionFunction CarbonModifier: Expression=0.0031 * [ActiveCppm] + 24.5
        ExpressionFunction Potential: Expression=[DenitrificationRateModifier] * [CarbonModifier]
      DayCentN2OFractionModel N2OFraction: N2ODiffusionCoefficient=25.1
        Memo
          The emission of N2O during denitrification is calculated from an N2:N2O ratio using the approach from the DayCent model ([PARTON1998]) as previously tested in APSIM ([THORBURN2010]).
      Constant Reduction: FixedValue=1
  Experiment
    Factors
      Permutation
        Factor treatment: Specification=[Operations]
          Operations l1
            2011-06-23  [SurfaceOrganicMatter].Incorporate(0.5,200);
            2011-06-23  [SurfaceOrganicMatter].Incorporate(0.5,200);
            2011-06-29  [Irrigation].Apply(30);
            2011-07-06  [Wheat].Sow(Hartog,125,50,150);
            2011-08-11  [Irrigation].Apply(40);
            2011-09-15  [Irrigation].Apply(21);
            2011-09-27  [Irrigation].Apply(30);
            2011-10-05  [Irrigation].Apply(45);
            2011-11-29  [Wheat].Harvest();
            2011-11-29  [Wheat].EndCrop();
            2011-12-01  [SurfaceOrganicMatter].Incorporate(0.5,200);
            2011-12-01  [SurfaceOrganicMatter].Incorporate(0.5,200);
            2011-12-15  [Maize].Sow(Pioneer_3153,5,50,930);
            2011-12-21  [Fertiliser].Apply(amount: 40,type: NH4N,depth: 30);
            2012-01-05  [Irrigation].Apply(26);
            2012-01-23  [Irrigation].Apply(40);
            2012-06-20  [Maize].Harvest();
            2012-06-20  [Maize].EndCrop();
          Operations l2
            2011-06-23  [SurfaceOrganicMatter].Incorporate(0.5,200);
            2011-06-23  [SurfaceOrganicMatter].Incorporate(0.5,200);
            2011-06-29  [Irrigation].Apply(30);
            2011-07-06  [Wheat].Sow(Hartog,125,50,150);
            2011-07-06  [Fertiliser].Apply(amount: 20,type: NH4N,depth: 30);
            2011-08-11  [Irrigation].Apply(40);
            2011-09-15  [Irrigation].Apply(21);
            2011-09-27  [Irrigation].Apply(30);
            2011-10-05  [Irrigation].Apply(45);
            2011-11-29  [Wheat].Harvest();
            2011-11-29  [Wheat].EndCrop();
            2011-12-01  [SurfaceOrganicMatter].Incorporate(0.5,200);
            2011-12-01  [SurfaceOrganicMatter].Incorporate(0.5,200);
            2011-12-15  [Maize].Sow(Pioneer_3153,5,50,930);
            2011-12-21  [Fertiliser].Apply(amount: 40,type: NH4N,depth: 30);
            2012-01-05  [Irrigation].Apply(26);
            2012-01-19  [Fertiliser].Apply(amount: 60,type: UreaN,depth: 30);
            2012-01-23  [Irrigation].Apply(40);
            2012-06-20  [Maize].Harvest();
            2012-06-20  [Maize].EndCrop();
          Operations l3
            2011-06-23  [SurfaceOrganicMatter].Incorporate(0.5,200);
            2011-06-23  [SurfaceOrganicMatter].Incorporate(0.5,200);
            2011-06-29  [Irrigation].Apply(30);
            2011-07-06  [Wheat].Sow(Hartog,125,50,150);
            2011-07-06  [Fertiliser].Apply(amount: 20,type: NH4N,depth: 30);
            2011-08-11  [Irrigation].Apply(40);
            2011-09-15  [Irrigation].Apply(21);
            2011-09-27  [Irrigation].Apply(30);
            2011-10-05  [Irrigation].Apply(45);
            2011-11-29  [Wheat].Harvest();
            2011-11-29  [Wheat].EndCrop();
            2011-12-01  [SurfaceOrganicMatter].Incorporate(0.5,200);
            2011-12-01  [SurfaceOrganicMatter].Incorporate(0.5,200);
            2011-12-15  [Maize].Sow(Pioneer_3153,5,50,930);
            2011-12-21  [Fertiliser].Apply(amount: 40,type: NH4N,depth: 30);
            2012-01-05  [Irrigation].Apply(26);
            2012-01-19  [Fertiliser].Apply(amount: 120,type: UreaN,depth: 30);
            2012-01-23  [Irrigation].Apply(40);
            2012-06-20  [Maize].Harvest();
            2012-06-20  [Maize].EndCrop();
    Simulation
      Clock: Start=2011-06-23; End=2012-06-20
      Summary
      Weather: FileName=Kingaroy_and_meas.met; Latitude=-26.5544; Tav=18.23; Amp=13.12
      SoilArbitrator
      MicroClimate: a_interception=0; b_interception=1; c_interception=0; d_interception=0; SoilHeatFluxFraction=0.4; MinimumHeightDiffForNewLayer=0; NightInterceptionFraction=0.5; ReferenceHeight=2
      Zone Field: Area=1; Slope=0; AspectAngle=0; Altitude=50
        Report: EventNames=[Clock].EndOfDay
          VariableNames:
            [Clock].Today as date
            [Clock].Today
            sum of [Weather].Rain from [Wheat].Sowing to [Wheat].Harvesting as WheatInCropRain
            sum of [Weather].Rain from [Maize].Sowing to [Maize].Harvesting as MaizeInCropRain
            [Fertiliser].NitrogenApplied
            [Soil].SoilWater.SW
            [Soil].Water.Physical.LL15
            [Soil].Water.Physical.DUL
            [Soil].Water.Physical.SAT
            [ISoilWater].Runoff
            [ISoilWater].Eos
            [ISoilWater].Drainage
            [ISoilWater].Eo
            [ISoilWater].Es
            [Soil].Physical.BD
            [NO3].kgha
            [NH4].kgha
            [ISoilWater].LeachNO3
            [Nutrient].MineralisedN
            [Soil].Nutrient.Denitrification.N2Oatm
            [Soil].Nutrient.Denitrification.Natm
            [Soil].Nutrient.Nitrification.N2Oatm
            sum([Soil].Nutrient.Denitrification.Natm) as denitn_kg_ha
            sum([Soil].Nutrient.Denitrification.N2Oatm) as denitn2o_kg_ha
            sum([Soil].Nutrient.Nitrification.N2Oatm) as nitrifiedn2o_kg_ha
            denitn2o_kg_ha + nitrifiedn2o_kg_ha as total_n2o
            total_n2o *1000 as total_n2o_g_ha
            sum of total_n2o_g_ha from [Wheat].Sowing to [Wheat].Harvesting as season_n2o_g_ha
            [Soil].Nutrient.Microbial.C as biom_c
            [Soil].Nutrient.FOM.C as fom_c
            [Soil].Nutrient.Humic.C as hum_c
            [Soil].Nutrient.Microbial.C as biom_c() as total_biom
            [Soil].Nutrient.FOM.C as fom_c() as total_fom
            [Soil].Nutrient.Humic.C as hum_c() as total_hum
            [Soil].Temperature.AverageSoilTemperature as soil_temp
            [Wheat].Grain.Wt*10 as WheatYieldkgha
            [Wheat].AboveGround.Wt
            [Wheat].AboveGround.N
            [Wheat].Leaf.LAI
            [Wheat].Grain.N
            [Maize].Grain.Wt*10 as MaizeYieldkgha
            [Maize].AboveGround.Wt
            [Maize].AboveGround.N
            [Maize].Leaf.LAI
            [Maize].Grain.N
        Fertiliser
        SurfaceOrganicMatter: InitialResidueName=mungbean; InitialResidueType=mungbean; InitialResidueMass=1320; InitialStandingFraction=0; InitialCPR=0; InitialCNR=26.4
        Plant Wheat
        Operations
        Irrigation
        Plant Maize
        Soil: ASCOrder=Vertosol; ASCSubOrder=Black; SoilType=Clay; Site=Norwin; NearestTown=Norwin; Region=Darling Downs and Granite Belt; State=Queensland; Country=Australia; NaturalVegetation=Qld. Bluegrass, possible Qld. Blue gum; ApsoilNumber=900; Latitude=-27.581836; Longitude=151.320206; LocationAccuracy=+/- 20m; YearOfSampling=0
          DataSource=CSIRO Sustainable Ecosystems, Toowoomba; Characteriesd as part of the GRDC funded project"Doing it better, doing it smarter, managing soil water in Australian agriculture' 2011
          Comments=Clay - OC, CLL for all crops estimated-based on Bongeen Mywybilla Soil No1
          Physical
            Thickness  ParticleSizeSand  ParticleSizeSilt  ParticleSizeClay  Rocks  BD    AirDry  LL15  DUL   SAT   KS
            100        33                17                50                0      1.23  0.05    0.23  0.37  0.51  800
            100        31                14                55                0      1.23  0.2     0.25  0.37  0.51  500
            200        30                10                60                0      1.27  0.25    0.25  0.37  0.49  300
            200        26                11                63                0      1.3   0.27    0.27  0.38  0.49  200
            200        23                12                65                0      1.32  0.28    0.28  0.38  0.49  200
            300        23                12                65                0      1.39  0.31    0.31  0.39  0.47  20
            300        23                12                65                0      1.4   0.32    0.32  0.39  0.47  20
            SoilCrop WheatSoil: LL=[0.23, 0.25, 0.25, 0.27, 0.28, 0.31, 0.32]; KL=[0.1, 0.07, 0.07, 0.04, 0.04, 0.02, 0.02]; XF=[1, 1, 1, 1, 1, 1, 0]
            SoilCrop MaizeSoil: LL=[0.23, 0.25, 0.25, 0.27, 0.28, 0.31, 0.32]; KL=[0.04, 0.05, 0.04, 0.04, 0.02, 0.01, 0.01]; XF=[1, 1, 1, 1, 1, 1, 1]
          WaterBalance SoilWater: SummerDate=1-Nov; SummerU=6; SummerCona=3.5; WinterDate=1-Apr; WinterU=4; WinterCona=2.5; DiffusConst=40; DiffusSlope=16; Salb=0.12; CN2Bare=73; CNRed=20; CNCov=0.8; PSIDul=-100; Thickness=[100, 100, 200, 200, 200, 300, 300]; SWCON=[0.4, 0.4, 0.4, 0.4, 0.4, 0.4, 0.4]
          Organic: FOMCNRatio=40; CarbonUnits=Total
            Thickness  Carbon  SoilCNRatio  FBiom  FInert  FOM
            100        1.47    12           0.04   0.4     347.1
            100        1.41    12           0.03   0.5     270.3
            200        1.08    12           0.02   0.6     164
            200        0.735   12           0.02   0.7     99.5
            200        0.368   12           0.02   0.95    60.3
            300        0.221   12           0.01   0.95    36.6
            300        0.147   12           0.01   0.95    22.2
          Chemical: Thickness=[100, 100, 200, 200, 200, 300, 300]; PH=[5.5, 5.57, 5.66, 5.66, 5.66, 5.66, 5.66, -, -, -]; PHUnits=Water
          Water: Thickness=[100, 100, 200, 200, 200, 300, 300]; InitialValues=[0.37, 0.37, 0.37, 0.38, 0.38, 0.39, 0.344333]; InitialPAWmm=123.3; RelativeTo=LL15; FilledFromTop=true
          Nutrient
          Solute NO3: Thickness=[100, 100, 200, 200, 200, 300, 300]; InitialValues=[20, 15, 8, 4, 4, 4, 4]; InitialValuesUnits=ppm; WaterTableConcentration=0; D0=0; DepthConstant=0; MaxDepthSoluteAccessible=0; RunoffEffectivenessAtMovingSolute=0; MaxEffectiveRunoff=0
          Solute NH4: Thickness=[100, 100, 200, 200, 200, 300, 300]; InitialValues=[15, 10, 6, 2, 2, 2, 2]; InitialValuesUnits=ppm; WaterTableConcentration=0; D0=0; DepthConstant=0; MaxDepthSoluteAccessible=0; RunoffEffectivenessAtMovingSolute=0; MaxEffectiveRunoff=0
          Solute Urea: Thickness=[100, 100, 200, 200, 200, 300, 300]; InitialValues=[0, 0, 0, 0, 0, 0, 0, -, -, -]; InitialValuesUnits=kg/ha; WaterTableConcentration=0; D0=0; DepthConstant=0; MaxDepthSoluteAccessible=0; RunoffEffectivenessAtMovingSolute=0; MaxEffectiveRunoff=0
          SoilTemperature Temperature: Thickness=[100, 100, 200, 200, 200, 300, 300]
        Report Season
          VariableNames=sum of total_n2o_g_ha from [Wheat].Sowing to [Wheat].Harvesting as season_n2o_g_ha
          EventNames:
            [Wheat].Harvesting
  DataStore
    ExcelInput: FileNames=[for_apsim\kingaroy_observed.xlsx]; SheetNames=[plant, n2o, soil_water, mineral_n]
    PredictedObserved: PredictedTableName=Report; ObservedTableName=n2o; FieldNameUsedForMatch=treatment; FieldName2UsedForMatch=date; AllColumns=false
  Memo
    Fababean was in the original, but isn't in nextgen
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