Simulations: Version=191
  Folder Replacements
    NFlow Denitrification: SourceName=NO3
      Memo
        Denitrification is simulated using the approaches initially used in CERES Maize ([jones_ceres-maize:_1986]) as implemented in APSIM SoilN ([probert_apsims_1998]).  These were based upon the work of [Rolston1984].  Denitrification rate is calculated using this approach to account for the effect of soil carbon, temperature and water on the fraction of nitrate lost on a daily basis.
      Constant NLoss: FixedValue=1
      ExpressionFunction Rate
        Expression=[Potential] * [CERESDenitrificationTemperatureFactor] * [CERESDenitrificationWaterFactor]
        BoundFunction CERESDenitrificationTemperatureFactor
          Constant Lower: FixedValue=0
          Constant Upper: FixedValue=1
          ExpressionFunction TemperatureFactor: Expression=0.1 * exp(0.046 * [Temperature].Value)
        BoundFunction CERESDenitrificationWaterFactor
          Constant Lower: FixedValue=0
          Constant Upper: FixedValue=1
          ExpressionFunction WaterFactor
            Expression=(([SoilWater].SW) - (0.826*[Physical].SAT)) / ([Physical].SAT - (0.826*[Physical].SAT))
        Constant DenitrificationRateModifier: FixedValue=0.0006
        LessThanFunction ActiveC
          Constant IsInertActive: FixedValue=1
          Constant Comparision: FixedValue=0.5
          ExpressionFunction InertNotActive
            Expression=[Humic].C + [FOMCarbohydrate].C + [FOMCellulose].C + [FOMLignin].C
          ExpressionFunction InertActive
            Expression=[Humic].C + [Inert].C + [FOMCarbohydrate].C + [FOMCellulose].C + [FOMLignin].C
        ExpressionFunction ActiveCppm: Expression=[ActiveC] / ([Physical].BD * [Physical].Thickness / 100)
        ExpressionFunction CarbonModifier: Expression=0.0031 * [ActiveCppm] + 24.5
        ExpressionFunction Potential: Expression=[DenitrificationRateModifier] * [CarbonModifier]
      DayCentN2OFractionModel N2OFraction: N2ODiffusionCoefficient=10
        Memo
          The emission of N2O during denitrification is calculated from an N2:N2O ratio using the approach from the DayCent model ([PARTON1998]) as previously tested in APSIM ([THORBURN2010]).
      Constant Reduction: FixedValue=1
  Experiment
    Factors
      Permutation
        Factor treatment: Specification=[Operations]
          Operations t0
            2012-11-27  [Sorghum].Sow(Buster, 7, 30, 750);
            2012-12-10  [Irrigation].Apply(40);
            2013-05-04  [Sorghum].Harvest();
            2013-05-04  [Sorghum].EndCrop();
          Operations t1
            2012-11-27  [Sorghum].Sow(Buster, 7, 30, 750);
            2012-11-27  [Fertiliser].Apply(amount: 87,type: UreaN,depth: 75);
            2012-11-27  [Fertiliser].Apply(amount: 86,type: UreaN,depth: 175);
            2012-12-10  [Irrigation].Apply(40);
            2013-05-04  [Sorghum].Harvest();
            2013-05-04  [Sorghum].EndCrop();
    Simulation
      Clock: Start=2012-10-24; End=2013-05-04
      Summary
      Weather: FileName=Oakey with Kingsthorpe rain.met; Latitude=-27.4034; Tav=18.21; Amp=14.05
      SoilArbitrator
      MicroClimate: a_interception=0; b_interception=1; c_interception=0; d_interception=0; SoilHeatFluxFraction=0.4; MinimumHeightDiffForNewLayer=0; NightInterceptionFraction=0.5; ReferenceHeight=2
      Zone Field: Area=1; Slope=0; AspectAngle=0; Altitude=50
        Report: EventNames=[Clock].EndOfDay
          VariableNames:
            [Clock].Today as date
            [Clock].Today
            sum of [Weather].Rain from [Sorghum].Sowing to [Sorghum].Harvesting as SorghumInCropRain
            [Soil].SoilWater.SW
            [Soil].Water.Physical.LL15
            [Soil].Water.Physical.DUL
            [Soil].Water.Physical.SAT
            [ISoilWater].Runoff
            [ISoilWater].Eos
            [ISoilWater].Drainage
            [ISoilWater].Eo
            [ISoilWater].Es
            [Soil].Physical.BD
            [NO3].kgha
            [NH4].kgha
            [ISoilWater].LeachNO3
            [Nutrient].MineralisedN
            [Soil].Nutrient.Denitrification.N2Oatm
            [Soil].Nutrient.Denitrification.Natm
            [Soil].Nutrient.Nitrification.N2Oatm
            sum([Soil].Nutrient.Denitrification.Natm) as denitn_kg_ha
            sum([Soil].Nutrient.Denitrification.N2Oatm) as denitn2o_kg_ha
            sum([Soil].Nutrient.Nitrification.N2Oatm) as nitrifiedn2o_kg_ha
            denitn2o_kg_ha + nitrifiedn2o_kg_ha as total_n2o
            total_n2o *1000 as total_n2o_g_ha
            sum of total_n2o_g_ha from [Sorghum].Sowing to [Sorghum].Harvesting as season_n2o_g_ha
            [Soil].Nutrient.Microbial.C as biom_c
            [Soil].Nutrient.FOM.C as fom_c
            [Soil].Nutrient.Humic.C as hum_c
            [Soil].Nutrient.Microbial.C as biom_c() as total_biom
            [Soil].Nutrient.FOM.C as fom_c() as total_fom
            [Soil].Nutrient.Humic.C as hum_c() as total_hum
            [Sorghum].Grain.Wt
            [Sorghum].AboveGround.Wt
            [Sorghum].AboveGround.N
            [Sorghum].Grain.Wt*10 as SorghumYieldkgha
            [Sorghum].AboveGround.Wt*10 as SorghumAboveGroundWtKgha
            [Sorghum].AboveGround.N*10 as SorghumAboveGroundNKgha
            [Sorghum].Leaf.LAI
            [Sorghum].Grain.N
        Fertiliser
        SurfaceOrganicMatter: InitialResidueName=oats; InitialResidueType=oats; InitialResidueMass=1000; InitialStandingFraction=0; InitialCPR=0; InitialCNR=73
        Operations
        Irrigation
        Plant Sorghum
        Soil: ASCOrder=Vertosol; ASCSubOrder=Black; SoilType=Clay; Site=Norwin; NearestTown=Norwin; Region=Darling Downs and Granite Belt; State=Queensland; Country=Australia; NaturalVegetation=Qld. Bluegrass, possible Qld. Blue gum; ApsoilNumber=900; Latitude=-27.581836; Longitude=151.320206; LocationAccuracy=+/- 20m; YearOfSampling=0
          DataSource=CSIRO Sustainable Ecosystems, Toowoomba; Characteriesd as part of the GRDC funded project"Doing it better, doing it smarter, managing soil water in Australian agriculture' 2011
          Comments=Clay - OC, CLL for all crops estimated-based on Bongeen Mywybilla Soil No1
          Physical
            Thickness  ParticleSizeSand  ParticleSizeSilt  ParticleSizeClay  Rocks  BD     AirDry  LL15   DUL    SAT    KS
            100        7                 17                76                0      0.895  0.07    0.334  0.53   0.643  800
            100        7                 17                76                0      1.082  0.2     0.324  0.53   0.582  500
            200        7                 17                76                0      1.07   0.21    0.343  0.52   0.582  300
            200        6                 18                76                0      1.061  0.2     0.362  0.512  0.582  200
            200        9                 19                72                0      1.086  0.15    0.362  0.5    0.57   200
            200        9                 19                72                0      1.106  0.13    0.362  0.5    0.567  20
            200        10                17                73                0      1.127  0.13    0.346  0.49   0.562  20
            300        10                17                73                0      1.127  0.13    0.336  0.486  0.516  20
            SoilCrop SorghumSoil: LL=[0.334, 0.324, 0.343, 0.362, 0.362, 0.362, 0.346, 0.336]; KL=[0.08, 0.08, 0.07, 0.06, 0.04, 0.02, 0.01, 0.01]; XF=[1, 1, 1, 1, 1, 1, 1, 1]
          WaterBalance SoilWater: SummerDate=1-Nov; SummerU=6; SummerCona=3.5; WinterDate=1-Apr; WinterU=4; WinterCona=2.5; DiffusConst=40; DiffusSlope=16; Salb=0.12; CN2Bare=73; CNRed=20; CNCov=0.8; PSIDul=-100; Thickness=[100, 100, 200, 200, 200, 200, 200, 300]; SWCON=[0.8, 0.8, 0.6, 0.3, 0.3, 0.3, 0.3, 0.3]
          Organic: FOMCNRatio=40; CarbonUnits=Total
            Thickness  Carbon  SoilCNRatio  FBiom  FInert  FOM
            100        1.61    12           0.04   0.4     347.1
            100        0.8     12           0.03   0.5     270.3
            200        0.55    12           0.02   0.6     164
            200        0.35    12           0.02   0.8     99.5
            200        0.15    12           0.02   0.95    60.3
            200        0.1     12           0.02   0.95    36.6
            200        0.1     12           0.01   0.95    22.2
            300        0.1     12           0.01   0.95    22.2
          Chemical: Thickness=[100, 100, 200, 200, 200, 200, 200, 300]; PH=[7.3, 7.2, 7.7, 8.15, 8.4, 8.5, 8.6, 8.6, -, -]; PHUnits=Water
            EC=[0.239, 0.416, 0.347, 0.353, 0.327, 0.339, 0.323, 0.336, -, -]
          Water: Thickness=[100, 100, 200, 200, 200, 200, 200, 300]; InitialValues=[0.3, 0.3, 0.31, 0.35, 0.38, 0.39, 0.41, 0.41]; InitialPAWmm=29.4; RelativeTo=LL15; FilledFromTop=true
          Nutrient
          Solute NO3: Thickness=[100, 100, 200, 200, 200, 200, 200, 300]; InitialValues=[1, 1, 1, 1, 1, 1, 1, 1]; InitialValuesUnits=ppm; WaterTableConcentration=0; D0=0; DepthConstant=0; MaxDepthSoluteAccessible=0; RunoffEffectivenessAtMovingSolute=0; MaxEffectiveRunoff=0
          Solute NH4: Thickness=[100, 100, 200, 200, 200, 200, 200, 300]; InitialValues=[3, 3, 3, 3, 3, 3, 3, 3, -]; InitialValuesUnits=ppm; WaterTableConcentration=0; D0=0; DepthConstant=0; MaxDepthSoluteAccessible=0; RunoffEffectivenessAtMovingSolute=0; MaxEffectiveRunoff=0
          Solute Urea: Thickness=[100, 100, 200, 200, 200, 200, 200, 300]; InitialValues=[0, 0, 0, 0, 0, 0, 0, 0, -, -]; InitialValuesUnits=kg/ha; WaterTableConcentration=0; D0=0; DepthConstant=0; MaxDepthSoluteAccessible=0; RunoffEffectivenessAtMovingSolute=0; MaxEffectiveRunoff=0
          SoilTemperature Temperature: Thickness=[100, 100, 200, 200, 200, 200, 200, 300]
        Report Season
          VariableNames=sum of total_n2o_g_ha from [Sorghum].Sowing to [Sorghum].Harvesting as season_n2o_g_ha
          EventNames:
            [Sorghum].Harvesting
  DataStore
    ExcelInput: FileNames=[for_apsim\kingsthrope_sorghum_observed.xlsx]; SheetNames=[plant, n2o, soil_water]
  Memo
    Fababean was in the original, but isn't in nextgen
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