Simulations: Version=191
  DataStore
  Simulation
    Weather: FileName=Thorburn\TeKowai.met; Latitude=-21.16; Tav=22.41; Amp=10.12
    Clock: Start=1902-01-01; End=2009-02-25
    Summary summaryfile
    MicroClimate: a_interception=0; b_interception=1; c_interception=0; d_interception=0; SoilHeatFluxFraction=0.4; MinimumHeightDiffForNewLayer=0; NightInterceptionFraction=0.5; ReferenceHeight=2
    Zone Field: Area=1; Slope=0; AspectAngle=0; Altitude=50
      Fertiliser
      Sugarcane: maxt_lb=0
      Report: EventNames=[Clock].DoReport
        VariableNames:
          [Clock].Today
          [Sugarcane].crop_status
          [Sugarcane].biomass
          [Sugarcane].cane_wt
          [Sugarcane].sucrose_wt
          [Sugarcane].height
          [Sugarcane].root_depth
          [Sugarcane].node_no_detached
          [Sugarcane].leaves
          [Sugarcane].green_leaves
          [Sugarcane].dead_leaves
          [Sugarcane].lai
          [Sugarcane].tla
          [Sugarcane].plant_n_tot
          [Sugarcane].swdef_photo
          [Sugarcane].swdef_pheno
          [Sugarcane].swdef_expan
          [Sugarcane].swdef_stalk
          [Sugarcane].nfact_photo
          [Sugarcane].nfact_expan
          [Sugarcane].oxdef_photo
          [Sugarcane].ep
      SurfaceOrganicMatter Surface Organic Matter: InitialResidueName=sugar_trash; InitialResidueType=Sugarcane; InitialResidueMass=1000; InitialStandingFraction=1; InitialCPR=0; InitialCNR=80
      Soil: Latitude=0; Longitude=0
        Water: Thickness=[200, 150, 250, 250, 250, 250, 250]; InitialValues=[0.22, 0.22, 0.216, 0.238, 0.28, 0.28, 0.28]; InitialPAWmm=200.5; RelativeTo=LL15; FilledFromTop=true
        Physical
          Thickness  ParticleSizeSand  ParticleSizeSilt  ParticleSizeClay  Rocks     BD    AirDry  LL15  DUL   SAT
          100        5                 65                30                0.145161  1.51  0.02    0.08  0.22  0.38
          150        5                 65                30                0         1.5   0.02    0.09  0.22  0.38
          250        5                 65                30                0         1.49  0.02    0.1   0.22  0.39
          250        5                 65                30                0         1.64  0.02    0.1   0.21  0.33
          250        5                 65                30                0         1.67  0.03    0.14  0.28  0.32
          250        5                 65                30                0         1.65  0.02    0.15  0.28  0.33
          250        5                 65                30                0         1.66  0.02    0.16  0.28  0.33
          Rocks, ParticleSizeSand, ParticleSizeSilt, ParticleSizeClay source: Calculated
          SoilCrop SugarcaneSoil: LL=[0.1, 0.1, 0.1, 0.11, 0.22, 0.22, 0.22]; KL=[0.16, 0.16, 0.16, 0.16, 0.12, 0.08, 0.04]; XF=[1, 1, 1, 1, 1, 1, 1]
        WaterBalance SoilWater: SummerDate=1-Nov; SummerU=4; SummerCona=3; WinterDate=1-Apr; WinterU=4; WinterCona=3; DiffusConst=40; DiffusSlope=16; Salb=0.1; CN2Bare=65; CNRed=20; CNCov=0.8; PSIDul=-100; Thickness=[100, 150, 250, 250, 250, 250, 250]; SWCON=[0.3, 0.3, 0.3, 0.4, 0.4, 0.4, 0.4]
        Organic: FOMCNRatio=70; CarbonUnits=Total
          Thickness  Carbon  SoilCNRatio  FBiom  FInert  FOM
          100        1.1     12.5         0.06   0.3     343.139
          150        1       12.5         0.045  0.45    245.87
          250        0.543   12.5         0.035  0.85    176.174
          250        0.37    12.5         0.015  0.95    106.855
          250        0.267   12.5         0.005  0.95    64.8106
          250        0.268   12.5         0.005  0.99    39.3096
          250        0.218   12.5         0.005  0.99    23.8425
        Chemical: Thickness=[100, 150, 250, 250, 250, 250, 250]; PH=[6, 6, 6, 6, 6, 6, 6]; PHUnits=Water
        Nutrient
        Solute NO3: Thickness=[100, 150, 250, 250, 250, 250, 250]; InitialValues=[3.7, 0.9, 0.9, 0.6, 0.6, 0.6, 0.6]; InitialValuesUnits=ppm; WaterTableConcentration=0; D0=0; DepthConstant=0; MaxDepthSoluteAccessible=0; RunoffEffectivenessAtMovingSolute=0; MaxEffectiveRunoff=0
        Solute NH4: Thickness=[100, 150, 250, 250, 250, 250, 250]; InitialValues=[3.3, 3, 2.5, 1.8, 0.5, 0.5, 0.5]; InitialValuesUnits=ppm; WaterTableConcentration=0; D0=0; DepthConstant=0; MaxDepthSoluteAccessible=0; RunoffEffectivenessAtMovingSolute=0; MaxEffectiveRunoff=0
        Solute Urea: Thickness=[100, 150, 250, 250, 250, 250, 250]; InitialValues=[0, 0, 0, 0, 0, 0, 0]; InitialValuesUnits=kg/ha; WaterTableConcentration=0; D0=0; DepthConstant=0; MaxDepthSoluteAccessible=0; RunoffEffectivenessAtMovingSolute=0; MaxEffectiveRunoff=0
        SoilTemperature: Thickness=[100, 150, 250, 250, 250, 250, 250]
      Irrigation
      Operations
        1902-08-25  [Sugarcane].SowNewPlant(12, 150, q124);
        1902-08-27  [Fertiliser].Apply(amount: 120,type: NO3N,depth: 5);
        1903-11-23  [Sugarcane].HarvestCrop();
        1903-11-25  [Fertiliser].Apply(amount: 160,type: NO3N,depth: 5);
        1904-11-22  [Sugarcane].HarvestCrop();
        1904-11-24  [Fertiliser].Apply(amount: 160,type: NO3N,depth: 5);
        1905-11-23  [Sugarcane].HarvestCrop();
        1905-11-25  [Fertiliser].Apply(amount: 160,type: NO3N,depth: 5);
        1906-08-01  [Sugarcane].HarvestCrop();
        1906-08-01  [Sugarcane].KillCrop();
        1906-08-01  [Sugarcane].EndCrop();
        1906-08-25  [Sugarcane].SowNewPlant(12, 150, q124);
        1906-08-27  [Fertiliser].Apply(amount: 120,type: NO3N,depth: 5);
        1907-11-23  [Sugarcane].HarvestCrop();
        1907-11-25  [Fertiliser].Apply(amount: 160,type: NO3N,depth: 5);
        1908-11-22  [Sugarcane].HarvestCrop();
        1908-11-24  [Fertiliser].Apply(amount: 160,type: NO3N,depth: 5);
        1909-11-23  [Sugarcane].HarvestCrop();
        1909-11-25  [Fertiliser].Apply(amount: 160,type: NO3N,depth: 5);
        1910-08-01  [Sugarcane].HarvestCrop();
        1910-08-01  [Sugarcane].KillCrop();
        1910-08-01  [Sugarcane].EndCrop();
        1910-08-25  [Sugarcane].SowNewPlant(12, 150, q124);
        1910-08-27  [Fertiliser].Apply(amount: 120,type: NO3N,depth: 5);
        1911-11-23  [Sugarcane].HarvestCrop();
        1911-11-25  [Fertiliser].Apply(amount: 160,type: NO3N,depth: 5);
        1912-11-22  [Sugarcane].HarvestCrop();
        1912-11-24  [Fertiliser].Apply(amount: 160,type: NO3N,depth: 5);
        1913-11-23  [Sugarcane].HarvestCrop();
        1913-11-25  [Fertiliser].Apply(amount: 160,type: NO3N,depth: 5);
        1914-08-01  [Sugarcane].HarvestCrop();
        1914-08-01  [Sugarcane].KillCrop();
        1914-08-01  [Sugarcane].EndCrop();
        1914-08-25  [Sugarcane].SowNewPlant(12, 150, q124);
        1914-08-27  [Fertiliser].Apply(amount: 120,type: NO3N,depth: 5);
        1915-11-23  [Sugarcane].HarvestCrop();
        1915-11-25  [Fertiliser].Apply(amount: 160,type: NO3N,depth: 5);
        1916-11-22  [Sugarcane].HarvestCrop();
        1916-11-24  [Fertiliser].Apply(amount: 160,type: NO3N,depth: 5);
        1917-11-23  [Sugarcane].HarvestCrop();
        1917-11-25  [Fertiliser].Apply(amount: 160,type: NO3N,depth: 5);
        1918-08-01  [Sugarcane].HarvestCrop();
        1918-08-01  [Sugarcane].KillCrop();
        1918-08-01  [Sugarcane].EndCrop();
        1918-08-25  [Sugarcane].SowNewPlant(12, 150, q124);
        1918-08-27  [Fertiliser].Apply(amount: 120,type: NO3N,depth: 5);
        1918-09-03  [Irrigation].Apply(30);
        1919-11-23  [Sugarcane].HarvestCrop();
        1919-11-25  [Fertiliser].Apply(amount: 160,type: NO3N,depth: 5);
        1920-11-22  [Sugarcane].HarvestCrop();
        1920-11-24  [Fertiliser].Apply(amount: 160,type: NO3N,depth: 5);
        1921-11-23  [Sugarcane].HarvestCrop();
        1921-11-25  [Fertiliser].Apply(amount: 160,type: NO3N,depth: 5);
        1922-08-01  [Sugarcane].HarvestCrop();
        1922-08-01  [Sugarcane].KillCrop();
        1922-08-01  [Sugarcane].EndCrop();
        1922-08-25  [Sugarcane].SowNewPlant(12, 150, q124);
        1922-08-27  [Fertiliser].Apply(amount: 120,type: NO3N,depth: 5);
        1923-11-23  [Sugarcane].HarvestCrop();
        1923-11-25  [Fertiliser].Apply(amount: 160,type: NO3N,depth: 5);
        1924-11-22  [Sugarcane].HarvestCrop();
        1924-11-24  [Fertiliser].Apply(amount: 160,type: NO3N,depth: 5);
        1925-11-23  [Sugarcane].HarvestCrop();
        1925-11-25  [Fertiliser].Apply(amount: 160,type: NO3N,depth: 5);
        1926-08-01  [Sugarcane].HarvestCrop();
        1926-08-01  [Sugarcane].KillCrop();
        1926-08-01  [Sugarcane].EndCrop();
        1926-08-25  [Sugarcane].SowNewPlant(12, 150, q124);
        1926-08-27  [Fertiliser].Apply(amount: 120,type: NO3N,depth: 5);
        1927-11-23  [Sugarcane].HarvestCrop();
        1927-11-25  [Fertiliser].Apply(amount: 160,type: NO3N,depth: 5);
        1928-11-22  [Sugarcane].HarvestCrop();
        1928-11-24  [Fertiliser].Apply(amount: 160,type: NO3N,depth: 5);
        1929-11-23  [Sugarcane].HarvestCrop();
        1929-11-25  [Fertiliser].Apply(amount: 160,type: NO3N,depth: 5);
        1930-08-01  [Sugarcane].HarvestCrop();
        1930-08-01  [Sugarcane].KillCrop();
        1930-08-01  [Sugarcane].EndCrop();
        1930-08-25  [Sugarcane].SowNewPlant(12, 150, q124);
        1930-08-27  [Fertiliser].Apply(amount: 120,type: NO3N,depth: 5);
        1931-11-23  [Sugarcane].HarvestCrop();
        1931-11-25  [Fertiliser].Apply(amount: 160,type: NO3N,depth: 5);
        1932-11-22  [Sugarcane].HarvestCrop();
        1932-11-24  [Fertiliser].Apply(amount: 160,type: NO3N,depth: 5);
        1933-11-23  [Sugarcane].HarvestCrop();
        1933-11-25  [Fertiliser].Apply(amount: 160,type: NO3N,depth: 5);
        1934-08-01  [Sugarcane].HarvestCrop();
        1934-08-01  [Sugarcane].KillCrop();
        1934-08-01  [Sugarcane].EndCrop();
        1934-08-25  [Sugarcane].SowNewPlant(12, 150, q124);
        1934-08-27  [Fertiliser].Apply(amount: 120,type: NO3N,depth: 5);
        1935-11-23  [Sugarcane].HarvestCrop();
        1935-11-25  [Fertiliser].Apply(amount: 160,type: NO3N,depth: 5);
        1936-11-22  [Sugarcane].HarvestCrop();
        1936-11-24  [Fertiliser].Apply(amount: 160,type: NO3N,depth: 5);
        1937-11-23  [Sugarcane].HarvestCrop();
        1937-11-25  [Fertiliser].Apply(amount: 160,type: NO3N,depth: 5);
        1938-08-01  [Sugarcane].HarvestCrop();
        1938-08-01  [Sugarcane].KillCrop();
        1938-08-01  [Sugarcane].EndCrop();
        1938-08-25  [Sugarcane].SowNewPlant(12, 150, q124);
        1938-08-27  [Fertiliser].Apply(amount: 120,type: NO3N,depth: 5);
        1938-09-03  [Irrigation].Apply(30);
        1939-11-23  [Sugarcane].HarvestCrop();
        1939-11-25  [Fertiliser].Apply(amount: 160,type: NO3N,depth: 5);
        1940-11-22  [Sugarcane].HarvestCrop();
        1940-11-24  [Fertiliser].Apply(amount: 160,type: NO3N,depth: 5);
        1941-11-23  [Sugarcane].HarvestCrop();
        1941-11-25  [Fertiliser].Apply(amount: 160,type: NO3N,depth: 5);
        1942-08-01  [Sugarcane].HarvestCrop();
        1942-08-01  [Sugarcane].KillCrop();
        1942-08-01  [Sugarcane].EndCrop();
        1942-08-25  [Sugarcane].SowNewPlant(12, 150, q124);
        1942-08-27  [Fertiliser].Apply(amount: 120,type: NO3N,depth: 5);
        1943-11-23  [Sugarcane].HarvestCrop();
        1943-11-25  [Fertiliser].Apply(amount: 160,type: NO3N,depth: 5);
        1944-11-22  [Sugarcane].HarvestCrop();
        1944-11-24  [Fertiliser].Apply(amount: 160,type: NO3N,depth: 5);
        1945-11-23  [Sugarcane].HarvestCrop();
        1945-11-25  [Fertiliser].Apply(amount: 160,type: NO3N,depth: 5);
        1946-08-01  [Sugarcane].HarvestCrop();
        1946-08-01  [Sugarcane].KillCrop();
        1946-08-01  [Sugarcane].EndCrop();
        1946-08-25  [Sugarcane].SowNewPlant(12, 150, q124);
        1946-08-27  [Fertiliser].Apply(amount: 120,type: NO3N,depth: 5);
        1946-09-03  [Irrigation].Apply(50);
        1947-11-23  [Sugarcane].HarvestCrop();
        1947-11-25  [Fertiliser].Apply(amount: 160,type: NO3N,depth: 5);
        1948-11-22  [Sugarcane].HarvestCrop();
        1948-11-24  [Fertiliser].Apply(amount: 160,type: NO3N,depth: 5);
        1949-11-23  [Sugarcane].HarvestCrop();
        1949-11-25  [Fertiliser].Apply(amount: 160,type: NO3N,depth: 5);
        1950-08-01  [Sugarcane].HarvestCrop();
        1950-08-01  [Sugarcane].KillCrop();
        1950-08-01  [Sugarcane].EndCrop();
        1950-08-25  [Sugarcane].SowNewPlant(12, 150, q124);
        1950-08-27  [Fertiliser].Apply(amount: 120,type: NO3N,depth: 5);
        1951-11-23  [Sugarcane].HarvestCrop();
        1951-11-25  [Fertiliser].Apply(amount: 160,type: NO3N,depth: 5);
        1952-11-22  [Sugarcane].HarvestCrop();
        1952-11-24  [Fertiliser].Apply(amount: 160,type: NO3N,depth: 5);
        1953-11-23  [Sugarcane].HarvestCrop();
        1953-11-25  [Fertiliser].Apply(amount: 160,type: NO3N,depth: 5);
        1954-08-01  [Sugarcane].HarvestCrop();
        1954-08-01  [Sugarcane].KillCrop();
        1954-08-01  [Sugarcane].EndCrop();
        1954-08-25  [Sugarcane].SowNewPlant(12, 150, q124);
        1954-08-27  [Fertiliser].Apply(amount: 120,type: NO3N,depth: 5);
        1955-11-23  [Sugarcane].HarvestCrop();
        1955-11-25  [Fertiliser].Apply(amount: 160,type: NO3N,depth: 5);
        1956-11-22  [Sugarcane].HarvestCrop();
        1956-11-24  [Fertiliser].Apply(amount: 160,type: NO3N,depth: 5);
        1957-11-23  [Sugarcane].HarvestCrop();
        1957-11-25  [Fertiliser].Apply(amount: 160,type: NO3N,depth: 5);
        1958-08-01  [Sugarcane].HarvestCrop();
        1958-08-01  [Sugarcane].KillCrop();
        1958-08-01  [Sugarcane].EndCrop();
        1958-08-25  [Sugarcane].SowNewPlant(12, 150, q124);
        1958-08-27  [Fertiliser].Apply(amount: 120,type: NO3N,depth: 5);
        1959-11-23  [Sugarcane].HarvestCrop();
        1959-11-25  [Fertiliser].Apply(amount: 160,type: NO3N,depth: 5);
        1960-11-22  [Sugarcane].HarvestCrop();
        1960-11-24  [Fertiliser].Apply(amount: 160,type: NO3N,depth: 5);
        1961-11-23  [Sugarcane].HarvestCrop();
        1961-11-25  [Fertiliser].Apply(amount: 160,type: NO3N,depth: 5);
        1962-08-01  [Sugarcane].HarvestCrop();
        1962-08-01  [Sugarcane].KillCrop();
        1962-08-01  [Sugarcane].EndCrop();
        1962-08-25  [Sugarcane].SowNewPlant(12, 150, q124);
        1962-08-27  [Fertiliser].Apply(amount: 120,type: NO3N,depth: 5);
        1962-09-03  [Irrigation].Apply(30);
        1963-11-23  [Sugarcane].HarvestCrop();
        1963-11-25  [Fertiliser].Apply(amount: 160,type: NO3N,depth: 5);
        1964-11-22  [Sugarcane].HarvestCrop();
        1964-11-24  [Fertiliser].Apply(amount: 160,type: NO3N,depth: 5);
        1965-11-23  [Sugarcane].HarvestCrop();
        1965-11-25  [Fertiliser].Apply(amount: 160,type: NO3N,depth: 5);
        1966-08-01  [Sugarcane].HarvestCrop();
        1966-08-01  [Sugarcane].KillCrop();
        1966-08-01  [Sugarcane].EndCrop();
        1966-08-25  [Sugarcane].SowNewPlant(12, 150, q124);
        1966-08-27  [Fertiliser].Apply(amount: 120,type: NO3N,depth: 5);
        1967-11-23  [Sugarcane].HarvestCrop();
        1967-11-25  [Fertiliser].Apply(amount: 160,type: NO3N,depth: 5);
        1968-11-22  [Sugarcane].HarvestCrop();
        1968-11-24  [Fertiliser].Apply(amount: 160,type: NO3N,depth: 5);
        1969-11-23  [Sugarcane].HarvestCrop();
        1969-11-25  [Fertiliser].Apply(amount: 160,type: NO3N,depth: 5);
        1970-08-01  [Sugarcane].HarvestCrop();
        1970-08-01  [Sugarcane].KillCrop();
        1970-08-01  [Sugarcane].EndCrop();
        1970-08-25  [Sugarcane].SowNewPlant(12, 150, q124);
        1970-08-27  [Fertiliser].Apply(amount: 120,type: NO3N,depth: 5);
        1970-09-03  [Irrigation].Apply(30);
        1971-11-23  [Sugarcane].HarvestCrop();
        1971-11-25  [Fertiliser].Apply(amount: 160,type: NO3N,depth: 5);
        1972-11-22  [Sugarcane].HarvestCrop();
        1972-11-24  [Fertiliser].Apply(amount: 160,type: NO3N,depth: 5);
        1973-11-23  [Sugarcane].HarvestCrop();
        1973-11-25  [Fertiliser].Apply(amount: 160,type: NO3N,depth: 5);
        1974-08-01  [Sugarcane].HarvestCrop();
        1974-08-01  [Sugarcane].KillCrop();
        1974-08-01  [Sugarcane].EndCrop();
        1974-08-25  [Sugarcane].SowNewPlant(12, 150, q124);
        1974-08-27  [Fertiliser].Apply(amount: 120,type: NO3N,depth: 5);
        1975-11-23  [Sugarcane].HarvestCrop();
        1975-11-25  [Fertiliser].Apply(amount: 160,type: NO3N,depth: 5);
        1976-11-22  [Sugarcane].HarvestCrop();
        1976-11-24  [Fertiliser].Apply(amount: 160,type: NO3N,depth: 5);
        1977-11-23  [Sugarcane].HarvestCrop();
        1977-11-25  [Fertiliser].Apply(amount: 160,type: NO3N,depth: 5);
        1978-08-01  [Sugarcane].HarvestCrop();
        1978-08-01  [Sugarcane].KillCrop();
        1978-08-01  [Sugarcane].EndCrop();
        1978-08-25  [Sugarcane].SowNewPlant(12, 150, q124);
        1978-08-27  [Fertiliser].Apply(amount: 120,type: NO3N,depth: 5);
        1979-11-23  [Sugarcane].HarvestCrop();
        1979-11-25  [Fertiliser].Apply(amount: 160,type: NO3N,depth: 5);
        1980-11-22  [Sugarcane].HarvestCrop();
        1980-11-24  [Fertiliser].Apply(amount: 160,type: NO3N,depth: 5);
        1981-11-23  [Sugarcane].HarvestCrop();
        1981-11-25  [Fertiliser].Apply(amount: 160,type: NO3N,depth: 5);
        1982-08-01  [Sugarcane].HarvestCrop();
        1982-08-01  [Sugarcane].KillCrop();
        1982-08-01  [Sugarcane].EndCrop();
        1982-08-25  [Sugarcane].SowNewPlant(12, 150, q124);
        1982-08-27  [Fertiliser].Apply(amount: 120,type: NO3N,depth: 5);
        1982-09-03  [Irrigation].Apply(30);
        1983-11-23  [Sugarcane].HarvestCrop();
        1983-11-25  [Fertiliser].Apply(amount: 160,type: NO3N,depth: 5);
        1984-11-22  [Sugarcane].HarvestCrop();
        1984-11-24  [Fertiliser].Apply(amount: 160,type: NO3N,depth: 5);
        1985-11-23  [Sugarcane].HarvestCrop();
        1985-11-25  [Fertiliser].Apply(amount: 160,type: NO3N,depth: 5);
        1986-08-01  [Sugarcane].HarvestCrop();
        1986-08-01  [Sugarcane].KillCrop();
        1986-08-01  [Sugarcane].EndCrop();
        1986-08-25  [Sugarcane].SowNewPlant(12, 150, q124);
        1986-08-27  [Fertiliser].Apply(amount: 120,type: NO3N,depth: 5);
        1987-11-23  [Sugarcane].HarvestCrop();
        1987-11-25  [Fertiliser].Apply(amount: 160,type: NO3N,depth: 5);
        1988-11-22  [Sugarcane].HarvestCrop();
        1988-11-24  [Fertiliser].Apply(amount: 160,type: NO3N,depth: 5);
        1989-11-23  [Sugarcane].HarvestCrop();
        1989-11-25  [Fertiliser].Apply(amount: 160,type: NO3N,depth: 5);
        1990-08-01  [Sugarcane].HarvestCrop();
        1990-08-01  [Sugarcane].KillCrop();
        1990-08-01  [Sugarcane].EndCrop();
        1990-08-25  [Sugarcane].SowNewPlant(12, 150, q124);
        1990-08-27  [Fertiliser].Apply(amount: 120,type: NO3N,depth: 5);
        1991-11-23  [Sugarcane].HarvestCrop();
        1991-11-25  [Fertiliser].Apply(amount: 160,type: NO3N,depth: 5);
        1992-11-22  [Sugarcane].HarvestCrop();
        1992-11-24  [Fertiliser].Apply(amount: 160,type: NO3N,depth: 5);
        1993-11-23  [Sugarcane].HarvestCrop();
        1993-11-25  [Fertiliser].Apply(amount: 160,type: NO3N,depth: 5);
        1994-08-01  [Sugarcane].HarvestCrop();
        1994-08-01  [Sugarcane].KillCrop();
        1994-08-01  [Sugarcane].EndCrop();
        1994-08-25  [Sugarcane].SowNewPlant(12, 150, q124);
        1994-08-27  [Fertiliser].Apply(amount: 120,type: NO3N,depth: 5);
        1994-09-03  [Irrigation].Apply(30);
        1995-11-23  [Sugarcane].HarvestCrop();
        1995-11-23  [Sugarcane].KillCrop();
        1995-11-23  [Sugarcane].EndCrop();
        1998-08-25  [Sugarcane].SowNewPlant(12, 150, q124);
        1998-11-25  [Fertiliser].Apply(amount: 160,type: NO3N,depth: 5);
        1999-11-23  [Sugarcane].HarvestCrop();
        1999-11-23  [Sugarcane].EndCrop();
        1999-11-23  [Sugarcane].KillCrop();
        2002-08-25  [Sugarcane].SowNewPlant(12,150,q124);
        2002-08-27  [Fertiliser].Apply(amount: 120,type: UreaN,depth: 5);
        2002-09-24  [Irrigation].Apply(30);
        2003-11-23  [Sugarcane].HarvestCrop();
        2003-11-25  [Fertiliser].Apply(amount: 150,type: UreaN,depth: 5);
        2004-11-22  [Sugarcane].HarvestCrop();
        2004-11-24  [Fertiliser].Apply(amount: 150,type: UreaN,depth: 5);
        2005-11-23  [Sugarcane].HarvestCrop();
        2005-11-25  [Fertiliser].Apply(amount: 150,type: UreaN,depth: 5);
        2006-10-20  [Sugarcane].HarvestCrop();
        2006-11-19  [Fertiliser].Apply(amount: 150,type: UreaN,depth: 5);
        2006-11-19  [SurfaceOrganicMatter].Reset();
        2007-10-05  [Sugarcane].HarvestCrop();
        2007-10-19  [Fertiliser].Apply(amount: 150,type: UreaN,depth: 5);
        2007-10-19  [SurfaceOrganicMatter].Reset();
        2008-11-22  [Sugarcane].HarvestCrop();
      Manager Reset on date
        ResetDate = 24-nov-1996
        OffsetDays = 0
        ResetWater = False
        ResetNutrients = True
        ResetSOM = False
```csharp
using Models.Soils.Nutrients;
using APSIM.Shared.Utilities;
using Models.Surface;
using Models.Utilities;
using Models.Soils.Nutrients;
using Models.Soils;
using Models.PMF;
using Models.Core;
using System;
using System.Linq;
using Models.Interfaces;

namespace Models
{
    [Serializable]
    public class Script : Model
    {
        [Link] private Clock Clock;
        [Link] private ISoilWater SoilWater;
        [Link] private Nutrient nutrient;
        [Link] private SurfaceOrganicMatter SOM;
        [Link] private Summary Summary;

        [Description("Date to reset on:")]
        public string ResetDate {get;set;}
        
        [Description("Offset by Days (Negative is Days Before, Positive is Days After):")]
        public int OffsetDays {get;set;}

        [Description("Reset Water?")]
        public bool ResetWater {get;set;}

        [Description("Reset Soil Nutrients?")]
        public bool ResetNutrients {get;set;}

        [Description("Reset Surface Organic Matter?")]
        public bool ResetSOM {get;set;}

        [EventSubscribe("DoManagement")]
        private void OnDoManagement(object sender, EventArgs e)
        {
            DateTime offsetDate = DateUtilities.GetDate(ResetDate, Clock.Today).AddDays(OffsetDays);
            if (offsetDate.Equals(Clock.Today))
            {
                if (ResetWater)
                {
                    Summary.WriteMessage(this, "Reset Water", MessageType.Diagnostic);
                    SoilWater.Reset();
                }
                if (ResetNutrients)
                {
                    Summary.WriteMessage(this, "Reset Nitrogen", MessageType.Diagnostic);
                    nutrient.Reset();
                }
                if (ResetSOM)
                {
                    Summary.WriteMessage(this, "Reset Surface OM", MessageType.Diagnostic);
                    SOM.Reset();
                }
            }
        }
    }
}
```
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