Simulations: Version=191
  Folder Replacements
    NFlow Denitrification: SourceName=NO3
      Memo
        Denitrification is simulated using the approaches initially used in CERES Maize ([jones_ceres-maize:_1986]) as implemented in APSIM SoilN ([probert_apsims_1998]).  These were based upon the work of [Rolston1984].  Denitrification rate is calculated using this approach to account for the effect of soil carbon, temperature and water on the fraction of nitrate lost on a daily basis.
      Constant NLoss: FixedValue=1
      ExpressionFunction Rate
        Expression=[Potential] * [CERESDenitrificationTemperatureFactor] * [CERESDenitrificationWaterFactor]
        BoundFunction CERESDenitrificationTemperatureFactor
          Constant Lower: FixedValue=0
          Constant Upper: FixedValue=1
          ExpressionFunction TemperatureFactor: Expression=0.1 * exp(0.046 * [Temperature].Value)
        BoundFunction CERESDenitrificationWaterFactor
          Constant Lower: FixedValue=0
          Constant Upper: FixedValue=1
          ExpressionFunction WaterFactor
            Expression=(([SoilWater].SW) - (0.975*[Physical].SAT)) / ([Physical].SAT - (0.975*[Physical].SAT))
        Constant DenitrificationRateModifier: FixedValue=0.0006
        LessThanFunction ActiveC
          Constant IsInertActive: FixedValue=1
          Constant Comparision: FixedValue=0.5
          ExpressionFunction InertNotActive
            Expression=[Humic].C + [FOMCarbohydrate].C + [FOMCellulose].C + [FOMLignin].C
          ExpressionFunction InertActive
            Expression=[Humic].C + [Inert].C + [FOMCarbohydrate].C + [FOMCellulose].C + [FOMLignin].C
        ExpressionFunction ActiveCppm: Expression=[ActiveC] / ([Physical].BD * [Physical].Thickness / 100)
        ExpressionFunction CarbonModifier: Expression=0.0031 * [ActiveCppm] + 24.5
        ExpressionFunction Potential: Expression=[DenitrificationRateModifier] * [CarbonModifier]
      DayCentN2OFractionModel N2OFraction: N2ODiffusionCoefficient=25.1
        Memo
          The emission of N2O during denitrification is calculated from an N2:N2O ratio using the approach from the DayCent model ([PARTON1998]) as previously tested in APSIM ([THORBURN2010]).
      Constant Reduction: FixedValue=1
  Experiment
    Factors
      Permutation
        Factor treatment: Specification=[Operations]
          Operations T_N0
            2012-05-27  [SurfaceOrganicMatter].Incorporate(0.5,100);
            2012-05-30  [Wheat].Sow(Lincoln, 183,40,250);
            2012-05-30  [Fertiliser].Apply(amount: 5,type: UreaN,depth: 75);
            2012-08-07  [Fertiliser].Apply(amount: 0,type: UreaN,depth: 75);
            2012-12-06  [Wheat].Harvest();
            2012-12-06  [Wheat].EndCrop();
            2012-05-17  [SurfaceOrganicMatter].Incorporate(0.5,100);
            2013-05-20  [Canola].Sow(cultivar:Hyola42, population:50, depth:50,rowSpacing:250);
            2013-05-20  [Fertiliser].Apply(amount: 5,type: UreaN,depth: 75);
            2013-07-31  [Fertiliser].Apply(amount: 0,type: UreaN,depth: 75);
            2013-11-19  [Canola].Harvest();
            2013-11-19  [Canola].EndCrop();
          Operations T_N25
            2012-05-27  [SurfaceOrganicMatter].Incorporate(0.5,100);
            2012-05-30  [Wheat].Sow(Lincoln, 183,40,250);
            2012-05-30  [Fertiliser].Apply(amount: 5,type: UreaN,depth: 75);
            2012-08-07  [Fertiliser].Apply(amount: 25,type: UreaN,depth: 75);
            2012-12-06  [Wheat].Harvest();
            2012-12-06  [Wheat].EndCrop();
            2012-05-17  [SurfaceOrganicMatter].Incorporate(0.5,100);
            2013-05-20  [Canola].Sow(cultivar:Hyola42, population:50, depth:50,rowSpacing:250);
            2013-05-20  [Fertiliser].Apply(amount: 5,type: UreaN,depth: 75);
            2013-07-31  [Fertiliser].Apply(amount: 25,type: UreaN,depth: 75);
            2013-11-19  [Canola].Harvest();
            2013-11-19  [Canola].EndCrop();
          Operations T_N50
            2012-05-27  [SurfaceOrganicMatter].Incorporate(0.5,100);
            2012-05-30  [Wheat].Sow(Lincoln, 183,40,250);
            2012-05-30  [Fertiliser].Apply(amount: 5,type: UreaN,depth: 75);
            2012-08-07  [Fertiliser].Apply(amount: 50,type: UreaN,depth: 75);
            2012-12-06  [Wheat].Harvest();
            2012-12-06  [Wheat].EndCrop();
            2012-05-17  [SurfaceOrganicMatter].Incorporate(0.5,100);
            2013-05-20  [Canola].Sow(cultivar:Hyola42, population:50, depth:50,rowSpacing:250);
            2013-05-20  [Fertiliser].Apply(amount: 5,type: UreaN,depth: 75);
            2013-07-31  [Fertiliser].Apply(amount: 50,type: UreaN,depth: 75);
            2013-11-19  [Canola].Harvest();
            2013-11-19  [Canola].EndCrop();
          Operations T_N100
            2012-05-27  [SurfaceOrganicMatter].Incorporate(0.5,100);
            2012-05-30  [Wheat].Sow(Lincoln, 183,40,250);
            2012-05-30  [Fertiliser].Apply(amount: 5,type: UreaN,depth: 75);
            2012-08-07  [Fertiliser].Apply(amount: 100,type: UreaN,depth: 75);
            2012-12-06  [Wheat].Harvest();
            2012-12-06  [Wheat].EndCrop();
            2012-05-17  [SurfaceOrganicMatter].Incorporate(0.5,100);
            2013-05-20  [Canola].Sow(cultivar:Hyola42, population:50, depth:50,rowSpacing:250);
            2013-05-20  [Fertiliser].Apply(amount: 5,type: UreaN,depth: 75);
            2013-07-31  [Fertiliser].Apply(amount: 100,type: UreaN,depth: 75);
            2013-11-19  [Canola].Harvest();
            2013-11-19  [Canola].EndCrop();
          Operations NT_N0
            2012-05-30  [Wheat].Sow(Lincoln, 183,40,250);
            2012-05-30  [Fertiliser].Apply(amount: 5,type: UreaN,depth: 75);
            2012-08-07  [Fertiliser].Apply(amount: 0,type: UreaN,depth: 75);
            2012-12-06  [Wheat].Harvest();
            2012-12-06  [Wheat].EndCrop();
            2013-05-20  [Canola].Sow(cultivar:Hyola42, population:50, depth:50,rowSpacing:250);
            2013-05-20  [Fertiliser].Apply(amount: 5,type: UreaN,depth: 75);
            2013-07-31  [Fertiliser].Apply(amount: 0,type: UreaN,depth: 75);
            2013-11-19  [Canola].Harvest();
            2013-11-19  [Canola].EndCrop();
          Operations NT_N25
            2012-05-30  [Wheat].Sow(Lincoln, 183,40,250);
            2012-05-30  [Fertiliser].Apply(amount: 5,type: UreaN,depth: 75);
            2012-08-07  [Fertiliser].Apply(amount: 25,type: UreaN,depth: 75);
            2012-12-06  [Wheat].Harvest();
            2012-12-06  [Wheat].EndCrop();
            2013-05-20  [Canola].Sow(cultivar:Hyola42, population:50, depth:50,rowSpacing:250);
            2013-05-20  [Fertiliser].Apply(amount: 5,type: UreaN,depth: 75);
            2013-07-31  [Fertiliser].Apply(amount: 25,type: UreaN,depth: 75);
            2013-11-19  [Canola].Harvest();
            2013-11-19  [Canola].EndCrop();
          Operations NT_N50
            2012-05-30  [Wheat].Sow(Lincoln, 183,40,250);
            2012-05-30  [Fertiliser].Apply(amount: 5,type: UreaN,depth: 75);
            2012-08-07  [Fertiliser].Apply(amount: 50,type: UreaN,depth: 75);
            2012-12-06  [Wheat].Harvest();
            2012-12-06  [Wheat].EndCrop();
            2013-05-20  [Canola].Sow(cultivar:Hyola42, population:50, depth:50,rowSpacing:250);
            2013-05-20  [Fertiliser].Apply(amount: 5,type: UreaN,depth: 75);
            2013-07-31  [Fertiliser].Apply(amount: 50,type: UreaN,depth: 75);
            2013-11-19  [Canola].Harvest();
            2013-11-19  [Canola].EndCrop();
          Operations NT_N100
            2012-05-30  [Wheat].Sow(Lincoln, 183,40,250);
            2012-05-30  [Fertiliser].Apply(amount: 5,type: UreaN,depth: 75);
            2012-08-07  [Fertiliser].Apply(amount: 100,type: UreaN,depth: 75);
            2012-12-06  [Wheat].Harvest();
            2012-12-06  [Wheat].EndCrop();
            2013-05-20  [Canola].Sow(cultivar:Hyola42, population:50, depth:50,rowSpacing:250);
            2013-05-20  [Fertiliser].Apply(amount: 5,type: UreaN,depth: 75);
            2013-07-31  [Fertiliser].Apply(amount: 100,type: UreaN,depth: 75);
            2013-11-19  [Canola].Harvest();
            2013-11-19  [Canola].EndCrop();
    Simulation
      Clock: Start=2013-04-01; End=2014-04-15
      Summary
      Weather: FileName=Wagga_Amo.met; Latitude=-35.1583; Tav=15.64; Amp=17.22
      SoilArbitrator
      MicroClimate: a_interception=0; b_interception=1; c_interception=0; d_interception=0; SoilHeatFluxFraction=0.4; MinimumHeightDiffForNewLayer=0; NightInterceptionFraction=0.5; ReferenceHeight=2
      Zone Field: Area=1; Slope=0; AspectAngle=0; Altitude=50
        Report: EventNames=[Clock].EndOfDay
          VariableNames:
            [Clock].Today as date
            [Clock].Today
            [SurfaceOrganicMatter].Wt
            sum of [Weather].Rain from [Canola].Sowing to [Canola].Harvesting as CanolaInCropRain
            sum of [Weather].Rain from [Wheat].Sowing to [Wheat].Harvesting as WheatInCropRain
            [Soil].SoilWater.SW
            [Soil].Water.Physical.LL15
            [Soil].Water.Physical.DUL
            [Soil].Water.Physical.SAT
            [Soil].Water.Physical.SAT * 0.945 as swlim
            [ISoilWater].Runoff
            [ISoilWater].Eos
            [ISoilWater].Drainage
            [ISoilWater].Eo
            [ISoilWater].Es
            [Soil].Physical.BD
            [NO3].ppm
            [NH4].ppm
            [Soil].Temperature.Value
            [NO3].kgha
            [NH4].kgha
            [ISoilWater].LeachNO3
            [Nutrient].MineralisedN
            [Soil].Nutrient.Denitrification.N2Oatm
            [Soil].Nutrient.Denitrification.Natm
            [Soil].Nutrient.Nitrification.N2Oatm
            sum([Soil].Nutrient.Denitrification.Natm) as denitn_kg_ha
            sum([Soil].Nutrient.Denitrification.N2Oatm) as denitn2o_kg_ha
            sum([Soil].Nutrient.Nitrification.N2Oatm) as nitrifiedn2o_kg_ha
            denitn2o_kg_ha + nitrifiedn2o_kg_ha as total_n2o
            total_n2o *1000 as total_n2o_g_ha
            [Soil].Nutrient.Microbial.C as biom_c
            [Soil].Nutrient.FOM.C as fom_c
            [Soil].Nutrient.Humic.C as hum_c
            [Soil].Nutrient.Microbial.C as biom_c() as total_biom
            [Soil].Nutrient.FOM.C as fom_c() as total_fom
            [Soil].Nutrient.Humic.C as hum_c() as total_hum
            [Canola].Grain.Wt*10 as CanolaYieldkgha
            [Wheat].Grain.Wt*10 as WheatYieldkgha
            [Wheat].AboveGround.Wt*10 as WheatAboveGroundWtKgha
            [Canola].AboveGround.Wt*10 as CanolaAboveGroundWtKgha
            [Canola].AboveGround.N*10 as CanolaAboveGroundNKgha
            [Wheat].AboveGround.N*10 as WheatAboveGroundNKgha
            [Canola].Leaf.LAI
            [Wheat].Leaf.LAI
            [Wheat].Grain.N
            [Canola].Grain.N
        Fertiliser
        SurfaceOrganicMatter: InitialResidueName=barley_stubble; InitialResidueType=barley; InitialResidueMass=1000; InitialStandingFraction=0; InitialCPR=0; InitialCNR=80
        Plant Wheat
        Operations
        Plant Canola
        Soil: ASCOrder=Kandosol; ASCSubOrder=Red; SoilType=Sand; NearestTown=Wagga Wagga; Region=Riverina; State=NSW; Country=Australia; ApsoilNumber=498-GENERIC; Latitude=-35.029285; Longitude=147.343507; YearOfSampling=0
          Physical
            Thickness  ParticleSizeSand  ParticleSizeSilt  ParticleSizeClay  Rocks  BD    AirDry  LL15   DUL    SAT   KS
            100        28                52                20                0      1.45  0.029   0.118  0.349  0.44  800
            100        28                52                20                0      1.55  0.033   0.158  0.35   0.4   500
            200        28                52                20                0      1.41  0.209   0.209  0.35   0.45  300
            200        28                52                20                0      1.33  0.244   0.244  0.361  0.48  200
            300        28                52                20                0      1.48  0.283   0.283  0.387  0.43  200
            300        28                52                20                0      1.58  0.321   0.321  0.376  0.4   20
            300        28                52                20                0      1.58  0.321   0.321  0.376  0.4   20
            300        28                52                20                0      1.58  0.321   0.321  0.376  0.4   20
            ParticleSizeSand, ParticleSizeSilt source: Calculated
            SoilCrop WheatSoil: LL=[0.118, 0.158, 0.209, 0.244, 0.283, 0.321, 0.321, 0.321]; KL=[0.07, 0.07, 0.07, 0.06, 0.06, 0.04, 0.02, 0.02]; XF=[1, 1, 1, 1, 1, 1, 1, 1]
            SoilCrop CanolaSoil: LL=[0.118, 0.158, 0.209, 0.244, 0.283, 0.321, 0.321, 0.321]; KL=[0.06, 0.06, 0.04, 0.02, 0.02, 0.01, 0.01, 0.01]; XF=[1, 1, 1, 1, 1, 1, 1, 1]
          WaterBalance SoilWater: SummerDate=1-Nov; SummerU=6; SummerCona=3.5; WinterDate=1-Apr; WinterU=2; WinterCona=2; DiffusConst=88; DiffusSlope=13; Salb=0.12; CN2Bare=72; CNRed=20; CNCov=0.8; PSIDul=-100; Thickness=[100, 100, 200, 200, 300, 300, 300, 300]; SWCON=[0.4, 0.4, 0.4, 0.3, 0.3, 0.3, 0.3, 0.3]
          Organic: FOMCNRatio=40; CarbonUnits=Total
            Thickness  Carbon  SoilCNRatio  FBiom  FInert  FOM
            100        1.64    9.6          0.04   0.4     347
            100        0.67    9.6          0.03   0.5     270
            200        0.46    9.6          0.02   0.6     164
            200        0.36    9.6          0.02   0.7     99.5
            300        0.36    9.6          0.02   0.95    60.3
            300        0.25    9.6          0.01   0.95    36.6
            300        0.16    9.6          0.01   0.95    22.2
            300        0.16    9.6          0.01   0.95    22.2
          Chemical: Thickness=[100, 100, 200, 200, 300, 300, 300, 300]; PH=[5.1, 4.9, 5.7, 6.1, 6.2, 6.2, 6.2, 6.2]; PHUnits=Water
          Water: Thickness=[100, 100, 200, 200, 300, 300, 300, 300]; InitialValues=[0.12, 0.158, 0.209, 0.244, 0.283, 0.321, 0.321, 0.321]; InitialPAWmm=0.2; RelativeTo=LL15; FilledFromTop=false
          Nutrient
          Solute NO3: Thickness=[100, 100, 200, 200, 300, 300, 300, 300]; InitialValues=[34.28, 8.44, 2.21, 0.75, 0.42, 0.52, 0.52, 0.52]; InitialValuesUnits=ppm; WaterTableConcentration=0; D0=0; DepthConstant=0; MaxDepthSoluteAccessible=0; RunoffEffectivenessAtMovingSolute=0; MaxEffectiveRunoff=0
          Solute NH4: Thickness=[100, 100, 200, 200, 300, 300, 300, 300]; InitialValues=[1.43, 0.65, 0.57, 0.55, 0.58, 0.57, 0.57, 0.57]; InitialValuesUnits=ppm; WaterTableConcentration=0; D0=0; DepthConstant=0; MaxDepthSoluteAccessible=0; RunoffEffectivenessAtMovingSolute=0; MaxEffectiveRunoff=0
          Solute Urea: Thickness=[100, 100, 200, 200, 300, 300, 300, 300]; InitialValues=[0, 0, 0, 0, 0, 0, 0, 0]; InitialValuesUnits=kg/ha; WaterTableConcentration=0; D0=0; DepthConstant=0; MaxDepthSoluteAccessible=0; RunoffEffectivenessAtMovingSolute=0; MaxEffectiveRunoff=0
          SoilTemperature Temperature: Thickness=[100, 100, 200, 200, 300, 300, 300, 300]
        Report Season
          VariableNames=sum of total_n2o_g_ha from [Canola].Sowing to [Canola].Harvesting as season_n2o_g_ha
          EventNames:
            [Canola].Harvesting
  DataStore
    ExcelInput: FileNames=[for_apsim\Observed_wagga.xlsx]
      SheetNames=[mineral_n, auto_n2o, man_n2o, soil_temperature, soil_water]
    PredictedObserved: PredictedTableName=Report; ObservedTableName=man_n2o; FieldNameUsedForMatch=date; FieldName2UsedForMatch=treatment; AllColumns=false
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