Simulations: Version=197
  DataStore
  Memo
    The initial N set in the original operator code's date is in 2012 (the sim is for 2010-2011). The initial water in the sim has 2 settings that are contradictory: I used the 80% one. The pH in the original requires that the CERES pH factor is changed so adjusted the top pH to be 4.5.
  Folder Validation
    Folder HamiltonAU
      Memo
        ### HP comments
        The initial N set in the original operator code's date is in 2012 (the sim is for 2010-2011). The initial water in the sim has 2 settings that are contradictory: I used the 80% one. The pH in the original requires that the CERES pH factor is changed so adjusted the top pH to be 4.5.

        ### Methods
        During 2010 and 2011, N2O emissions were monitored for
        1 year during wheat and fallow after conversion from long-term
        improved pasture to cropland on adjacent plots (Mielenz et al.
        2016a). Soils had been under long-term pasture, consisting of
        subterranean clover (Trifolium subterraneum L.) and perennial
        ryegrass (Lolium perenne L.). Therefore, the soil was rich in
        stored organic carbon (Table 1). In each case, in the year before
        the start of the experiment, a selective herbicide was used to
        reduce the pasture grasses and encourage a sward dominated by
        subterranean clover. In late summer before cropping, the site
        was completely sprayed out with glyphosate. Winter wheat
        variety ‘Revenue’ was sown in April in each of the two years
        and harvested in January the following year. The effect of tillage
        on N2O emissions was assessed by comparing zero tillage (ZT)
        by direct drilling the seed into sprayed out pasture with CT,
        where cultivation with several passes of discs, tynes and
        harrows preceded sowing (Table 1).
      Experiment MielenzHamilton
        Factors
          Permutation
          Factor Tillage: Specification=[Cultivation]
            Operations Conventional
              2010-03-31  [SurfaceOrganicMatter].Incorporate(0.3, 100);
              2010-04-22  [SurfaceOrganicMatter].Incorporate(0.5, 200);
            Operations ZeroTill
        Simulation
          Clock: Start=2009-10-18; End=2011-01-31
          Summary
          Weather: FileName=HamiltonAU.met
          SoilArbitrator
          MicroClimate: a_interception=0; b_interception=1; c_interception=0; d_interception=0; SoilHeatFluxFraction=0.23; MinimumHeightDiffForNewLayer=0; NightInterceptionFraction=0.5; ReferenceHeight=2
          Zone Field: Area=1; Slope=0; AspectAngle=0; Altitude=50
            Operations PastureWheat
              2009-10-19  [AGPRyegrass].EndCrop()
              2009-10-19  [AGPWhiteClover].EndCrop()
              2009-11-20  [AGPRyegrass].Reset()
              2009-11-20  [AGPWhiteClover].Reset()
              2010-03-12  [AGPRyegrass].EndCrop()
              2010-03-12  [AGPWhiteClover].EndCrop()
              2010-04-22  [Wheat].Sow(cultivar: revenue, population: 154, depth: 50,rowSpacing:150);
              2011-01-12  [Wheat].Harvest();
              2011-01-12  [Wheat].EndCrop();
            Operations Cultivation
            Fertiliser
            Plant Wheat
            PastureSpecies AGPRyegrass: doyGermination=275; daysEmergenceToAnthesis=120; daysAnthesisToMaturity=85; degreesDayForAnthesis=1100; degreesDayForMaturity=900; daysAnnualsFactor=45; CanopyType=PastureSpecies; InitialShootDM=1500; InitialRootDM=250; InitialRootDepth=900; initialDMFractionsGrasses=[0.15, 0.25, 0.25, 0.05, 0.05, 0.1, 0.1, 0.05, 0, 0, 0]; initialDMFractionsForbs=[0.2, 0.2, 0.15, 0.05, 0.1, 0.15, 0.1, 0.05, 0, 0, 0]; PhotosyntheticEfficiency=0.01; PhotosynthesisCurveFactor=0.8; FractionPAR=0.5; ReferenceCO2=380; CO2EffectScaleFactor=700; CO2EffectOffsetFactor=600; CO2EffectMinimum=0.7; CO2EffectExponent=2; ReproSeasonDurationCoeff=2; ReproSeasonShouldersLengthFactor=1; ReproSeasonOnsetDurationFactor=0.6; RelativeTurnoverEmerging=2; DetachmentDroughtCoefficient=3; DetachmentDroughtEffectMin=0.1; TurnoverStockFactor=0.01; TurnoverDefoliationEffectMin=0.025; MinimumGreenLeafProp=0.8; MinimumGreenRootProp=0.5
              initialDMFractionsLegumes=[0.16, 0.23, 0.22, 0.05, 0.03, 0.05, 0.05, 0.01, 0.04, 0.08, 0.08]
              LinearInterpolationFunction FVPDFunction
            PastureSpecies AGPWhiteClover: doyGermination=275; daysEmergenceToAnthesis=120; daysAnthesisToMaturity=85; degreesDayForAnthesis=1100; degreesDayForMaturity=900; daysAnnualsFactor=45; CanopyType=PastureSpecies; InitialShootDM=350; InitialRootDM=50; InitialRootDepth=400; initialDMFractionsGrasses=[0.15, 0.25, 0.25, 0.05, 0.05, 0.1, 0.1, 0.05, 0, 0, 0]; initialDMFractionsForbs=[0.2, 0.2, 0.15, 0.05, 0.1, 0.15, 0.1, 0.05, 0, 0, 0]; PhotosyntheticEfficiency=0.01; PhotosynthesisCurveFactor=0.8; FractionPAR=0.5; ReferenceCO2=380; CO2EffectScaleFactor=700; CO2EffectOffsetFactor=600; CO2EffectMinimum=0.7; CO2EffectExponent=2; ReproSeasonDurationCoeff=2; ReproSeasonShouldersLengthFactor=1; ReproSeasonOnsetDurationFactor=0.6; RelativeTurnoverEmerging=2; DetachmentDroughtCoefficient=3; DetachmentDroughtEffectMin=0.1; TurnoverStockFactor=0.01; TurnoverDefoliationEffectMin=0.025; MinimumGreenLeafProp=0.8; MinimumGreenRootProp=0.5
              initialDMFractionsLegumes=[0.16, 0.23, 0.22, 0.05, 0.03, 0.05, 0.05, 0.01, 0.04, 0.08, 0.08]
              LinearInterpolationFunction FVPDFunction
            SurfaceOrganicMatter: InitialResidueName=grass; InitialResidueType=grass; InitialResidueMass=10000; InitialStandingFraction=0; InitialCPR=0; InitialCNR=20
            Soil: ASCOrder=Vertosol; ASCSubOrder=Black; SoilType=Clay; Site=Norwin; NearestTown=Norwin; Region=Darling Downs and Granite Belt; State=Queensland; Country=Australia; NaturalVegetation=Qld. Bluegrass, possible Qld. Blue gum; ApsoilNumber=900; Latitude=-27.581836; Longitude=151.320206; LocationAccuracy=+/- 20m; YearOfSampling=0
              DataSource=CSIRO Sustainable Ecosystems, Toowoomba; Characteriesd as part of the GRDC funded project"Doing it better, doing it smarter, managing soil water in Australian agriculture' 2011
              Comments=Clay - OC, CLL for all crops estimated-based on Bongeen Mywybilla Soil No1
              Physical
                Thickness  ParticleSizeSand  ParticleSizeSilt  ParticleSizeClay  Rocks  BD     AirDry  LL15   DUL    SAT    KS
                100        39                29                28                0      1.05   0.079   0.238  0.441  0.517  800
                100        27                22                47                0      1.332  0.092   0.277  0.457  0.497  500
                100        27                22                47                0      1.266  0.251   0.251  0.428  0.522  300
                100        10                8                 77                0      1.043  0.309   0.309  0.503  0.606  200
                200        10                8                 77                0      0.898  0.417   0.417  0.609  0.661  20
                200        13                13                70                0      1.109  0.475   0.475  0.541  0.582  20
                200        13                13                70                0      1.026  0.518   0.518  0.571  0.613  20
                200        13                13                70                0      1.026  0.518   0.518  0.571  0.613  20
                300        13                13                70                0      1.026  0.518   0.518  0.571  0.613  20
                SoilCrop WheatSoil
                  LL=[0.238, 0.277, 0.251, 0.309, 0.417, 0.475, 0.518, 0.518, 0.518]
                  KL=[0.1, 0.05, 0.05, 0.04, 0.02, 0.02, 0.01, 0.01, 0.01]
                  XF=[1, 1, 1, 1, 1, 1, 1, 1, 1]
                SoilCrop AGPRyegrassSoil
                  LL=[0.238, 0.277, 0.251, 0.309, 0.417, 0.475, 0.518, 0.518, 0.518]
                  KL=[0.09, 0.09, 0.09, 0.09, 0.09, 0.09, 0.09, 0.09, 0.09]
                  XF=[1, 1, 1, 1, 1, 1, 1, 1, 1]
                SoilCrop AGPWhiteCloverSoil: same as Validation.HamiltonAU.MielenzHamilton.Simulation.Field.Soil.Physical.AGPRyegrassSoil
              WaterBalance SoilWater: SummerDate=1-Nov; SummerU=6; SummerCona=3.5; WinterDate=1-Apr; WinterU=2; WinterCona=2; DiffusConst=40; DiffusSlope=16; Salb=0.13; CN2Bare=85; CNRed=20; CNCov=0.8; PSIDul=-100; Thickness=[100, 100, 100, 300, 300, 300, 300]; SWCON=[0.4, 0.4, 0.4, 0.4, 0.4, 0.4, 0.4]
              Organic: FOMCNRatio=40; CarbonUnits=Total
                Thickness  Carbon  SoilCNRatio  FBiom  FInert  FOM
                100        1.925   14.4         0.04   0.4     347.129
                100        1.35    14.4         0.03   0.5     270.344
                100        1.35    14.4         0.02   0.6     163.972
                300        0.96    14.4         0.02   0.7     99.4541
                300        0.48    14.4         0.02   0.95    60.322
                300        0.29    14.4         0.01   0.95    36.5871
                300        0.19    14.4         0.01   0.95    22.1912
              Chemical: PHUnits=Water
                Thickness  PH   ESP   CEC
                100        4.5  1.71  14.42025
                100        4.5  1.61  17.3955
                100        4.5  1.73  17.3955
                100        4.7  2.09  23.389
                200        5.2  3.11  23.389
                200        6.2  4.48  20.641
                200        7    5.76  20.42725
                200        7    5.76  20.2135
                300        7    5.76  19.9885
                CEC source: Calculated
              Water: Thickness=[100, 100, 100, 100, 200, 200, 200, 200, 300]; InitialValues=[0.22, 0.32, 0.34, 0.4, 0.56, 0.53, 0.54, 0.54, 0.54]; FilledFromTop=true
              Nutrient
              Solute NO3: Thickness=[100, 100, 100, 100, 200, 200, 200, 200, 300]; InitialValues=[118, 17.1, 18.4, 14, 11.7, 7.8, 3.5, 3, 2]; InitialValuesUnits=ppm; WaterTableConcentration=0; D0=0; DepthConstant=0; MaxDepthSoluteAccessible=0; RunoffEffectivenessAtMovingSolute=0; MaxEffectiveRunoff=0
              Solute NH4: Thickness=[100, 100, 100, 100, 200, 200, 200, 200, 300]; InitialValues=[49, 27.1, 18.4, 14, 11.7, 7.8, 3.5, 8, 8]; InitialValuesUnits=ppm; WaterTableConcentration=0; D0=0; DepthConstant=0; MaxDepthSoluteAccessible=0; RunoffEffectivenessAtMovingSolute=0; MaxEffectiveRunoff=0
              Solute Urea: Thickness=[100, 100, 100, 100, 200, 200, 200, 200, 300]; InitialValues=[0, 0, 0, 0, 0, 0, 0, 0, 0]; InitialValuesUnits=kg/ha; WaterTableConcentration=0; D0=0; DepthConstant=0; MaxDepthSoluteAccessible=0; RunoffEffectivenessAtMovingSolute=0; MaxEffectiveRunoff=0
              SoilTemperature Temperature: Thickness=[100, 100, 300]; InitialValues=[20, 20, 20]
            Report Daily: EventNames=Clock.Today >= new DateTime(2010, 2, 1)
              VariableNames:
                [Clock].Today as Date
                sum([Nutrient].N2Oatm[:]) as N2ONGenerated
                Sum of sum([Nutrient].N2Oatm[:]) from 1-feb-2010 to [Clock].Today as cumN2ONGenerated
                [Soil].Temperature.AverageSoilTemperature[1] as ST_60mm                                   // update the layer for SWIM
            Report Season: EventNames=[Clock].EndOfSimulation
            Report DailyN2O1 (disabled): EventNames=[Clock].EndOfDay
              VariableNames:
                [Clock].Today as date
                sum([Nutrient].N2Oatm[:]) * 1000 as N2ONGenerated
                [Clock].Today
                sum of [Weather].Rain from [Wheat].Sowing to [Wheat].Harvesting as WheatInCropRain
                [Soil].SoilWater.SW
                [Soil].Water.Physical.LL15
                [Soil].Water.Physical.DUL
                [Soil].Water.Physical.SAT
                [ISoilWater].Runoff
                [ISoilWater].Eos
                [ISoilWater].Drainage
                [ISoilWater].Eo
                [ISoilWater].Es
                [Soil].Physical.BD
                [NO3].kgha
                [NH4].kgha
                [NO3].ppm
                [NH4].ppm
                [ISoilWater].LeachNO3
                [Nutrient].MineralisedN
                [Soil].Nutrient.Denitrification.N2Oatm
                [Soil].Nutrient.Denitrification.Natm
                [Soil].Nutrient.Nitrification.N2Oatm
                sum([Soil].Nutrient.Denitrification.Natm) as denitn_kg_ha
                sum([Soil].Nutrient.Denitrification.N2Oatm) as denitn2o_kg_ha
                sum([Soil].Nutrient.Nitrification.N2Oatm) as nitrifiedn2o_kg_ha
                denitn2o_kg_ha + nitrifiedn2o_kg_ha as total_n2o
                total_n2o *1000 as total_n2o_g_ha
                [Soil].Nutrient.Microbial.C as biom_c
                [Soil].Nutrient.FOM.C as fom_c
                [Soil].Nutrient.Humic.C as hum_c
                [Soil].Nutrient.Microbial.C as biom_c() as total_biom
                [Soil].Nutrient.FOM.C as fom_c() as total_fom
                [Soil].Nutrient.Humic.C as hum_c() as total_hum
                [Soil].Temperature.AverageSoilSurfaceTemperature as soil_temp
                sum of total_n2o_g_ha from [Wheat].Sowing to [Wheat].Harvesting as season_n2o_g_ha
                [Wheat].Grain.Wt*10 as WheatYieldkgha
                [Wheat].Grain.Wt
                [AGPWhiteClover].AboveGround.Wt*10 as AGPWhiteCloverAboveGroundWtKgha
                [AGPRyegrass].AboveGround.Wt*10 as AGPRyegrassAboveGroundWtKgha
                [Wheat].AboveGround.Wt*10 as WheatAboveGroundWtKgha
                [Wheat].AboveGround.Wt
                [AGPWhiteClover].AboveGround.N*10 as AGPWhiteCloverAboveGroundNKgha
                [AGPRyegrass].AboveGround.N*10 as AGPRyegrassAboveGroundNKgha
                [Wheat].AboveGround.N*10 as WheatAboveGroundNKgha
                [Wheat].AboveGround.N
                [Wheat].Leaf.LAI
                [Wheat].Grain.N*10 as WheatGrainNKgha
                [Wheat].Phenology.CurrentStageName
                [AGPWhiteClover].AboveGround.N*10 as AGPWhiteCloverAboveGroundNKgha
                [AGPRyegrass].AboveGround.N*10 as AGPRyegrassAboveGroundNKgha
                [Wheat].AboveGround.N*10 as WheatAboveGroundNKgha
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