Simulations: Version=189
  DataStore
  Experiment E3
    Memo Memo Surface BC
      See the "SetSurfaceBoundaryCondition" manager script for examples of how to change the surface boundary conditions.

      ## SetSurfaceBoundaryCondition(CurveNumber)

      The curve number approach for calculating runoff is the default surface boundary condition and is applicable to most 'open field' simulations. This option is ISBC = 0 in SWIM. This surface boundary condition relies on the value of **bare soil runoff curve number** in the SWIM3 component. Setting this surface boundary condition is done using a command in a Manager script:

      	SetSurfaceBCForCurveNumber();

      **NOTE: If bare soil runoff curve number is set to zero then SWIM will enable ponding and excess water at the surface will go into a pond instead of runoff.** This is equivalent to ISBC = 1 in SWIM.

      ## SetSurfaceBoundaryCondition(PowerFunction)

      A simple power-law function for calculating runoff can be defined. This option is ISBC = 2 in the SWIM manual. This function requires 6 arguments to be specified. The first three arguments define the minimum, maximum and initial size of the pond (mm). The last three arguments define the parameters (hrc, roff0, roff1) to the runoff equation as defined in the SWIM manual [verburg_methodology_1996].

      Setting this surface boundary condition is done using a command in a Manager script:

      	swim.SetSurfaceBCForPowerFunction(minimumSurfaceStorage: 10,
                          		  maximumSurfaceStorage: 20,
                          		  initialSurfaceStorage: 15,
                          		  precipitationConstant: 50,
                          		  runoffRateFactor: 0.2,
                          		  runoffRatePower: 2);

      ## Testing

      An experiment has been set up to show the impacts of using these two methods for setting the surface boundary condition. The first three experiment factors use the curve number approach with 3 different curve numbers (0, 50 and 90). The fouth factor uses the power-rate function.

      The graphs show the following characteristics:
      * When curve number is zero there is no runoff. Instead ponding occurs at serveral points during the simulation. The lack of runoff results in more water stored in the profile.
      * Using the power function (with the above arguments) results in the lowest rate of runoff.
      * As expected, using a curve number of 90 results in the highest rate of runoff.
      * Mass balance is maintained for all options.
    Factors
      CompositeFactor CurveNumber0
        Specifications:
          [SetSurfaceBoundaryCondition].Script.SurfaceBCType = CurveNumber
          [Swim3].CN2Bare = 0
      CompositeFactor CurveNumber50
        Specifications:
          [SetSurfaceBoundaryCondition].Script.SurfaceBCType = CurveNumber
          [Swim3].CN2Bare = 50
      CompositeFactor CurveNumber90
        Specifications:
          [SetSurfaceBoundaryCondition].Script.SurfaceBCType = CurveNumber
          [Swim3].CN2Bare = 90
      CompositeFactor PowerFunction
        Specifications=[SetSurfaceBoundaryCondition].Script.SurfaceBCType = PowerFunction
    Simulation Base_SurfaceBC
      Weather: FileName=../../../Examples/WeatherFiles/NZ_Lincoln.met; Latitude=-43.624; Tav=11.4; Amp=11.5
      Clock: Start=2000-01-01; End=2005-12-30
      Summary summaryfile
      SoilArbitrator
      MicroClimate: a_interception=0; b_interception=0; c_interception=0; d_interception=0; SoilHeatFluxFraction=0; MinimumHeightDiffForNewLayer=0; NightInterceptionFraction=0; ReferenceHeight=2
      Forages
        Parameters:
          Name                          LiveDigestibility  DeadDigestibility  LiveFractionConsumable  DeadFractionConsumable  LiveMinimumBiomass  DeadMinimumBiomass
          SurfaceOrganicMatter.Residue  0.7                0.3                0                       0                       100                 0
          AGPRyegrass.Leaf              0.7                0.3                1                       1                       100                 0
          AGPRyegrass.Stem              0.7                0.3                1                       1                       100                 0
          AGPRyegrass.Stolon            0.7                0.3                1                       1                       100                 0
          AGPWhiteClover.Leaf           0.7                0.3                1                       1                       100                 0
          AGPWhiteClover.Stem           0.7                0.3                1                       1                       100                 0
          AGPWhiteClover.Stolon         0.7                0.3                1                       1                       100                 0
      Zone paddock: Area=1; Slope=0; AspectAngle=0; Altitude=50
        Manager CalculateRollingWaterBalance
        Manager SetSurfaceBoundaryCondition
          SurfaceBCType = CurveNumber
```csharp
using Models.Climate;
using APSIM.Shared.Utilities;
using Models.Soils.Nutrients;
using Models.Soils;
using Models.PMF;
using Models.Core;
using System.Xml.Serialization;
using System;
using Models.AgPasture;
using Models.Interfaces;

namespace Models
{
    [Serializable] 
    [System.Xml.Serialization.XmlInclude(typeof(Model))]
    public class Script : Model
    {
        [Link] ISummary summary;
        [Link] private Swim3 swim;
        
        public enum SurfaceBCOptions { CurveNumber, PowerFunction };

        [Description("What surface boundary condition?")] 
        public SurfaceBCOptions SurfaceBCType { get; set; }

        [EventSubscribe("StartOfSimulation")]
        private void DoDailyInitialisation(object sender, EventArgs e)
        {
            summary.WriteMessage(this, "Script is setting surface boundary condition to " + SurfaceBCType, MessageType.Diagnostic);
            if (SurfaceBCType == SurfaceBCOptions.CurveNumber)
                swim.SetSurfaceBCForCurveNumber();
            else if (SurfaceBCType == SurfaceBCOptions.PowerFunction)
                swim.SetSurfaceBCForPowerFunction(minimumSurfaceStorage: 10, 
                                                    maximumSurfaceStorage: 20, 
                                                     initialSurfaceStorage: 15, 
                                                     precipitationConstant: 50, 
                                                     runoffRateFactor: 0.2, 
                                                     runoffRatePower: 2);
        }
    }
}
```
        Soil: Latitude=0; Longitude=0
          Physical
            Thickness  ParticleSizeSand  ParticleSizeSilt  ParticleSizeClay  Rocks  BD     AirDry  LL15   DUL    SAT   KS
            60         33.77             48.62             17.61             0      0.865  0.077   0.231  0.565  0.58  5
            110        33.77             48.62             17.61             0      0.865  0.077   0.231  0.565  0.58  5
            140        33.77             48.62             17.61             0      0.865  0.077   0.231  0.565  0.58  5
            240        33.77             48.62             17.61             0      0.865  0.077   0.231  0.565  0.58  5
            150        33.77             48.62             17.61             0      0.865  0.077   0.231  0.565  0.58  5
            SoilCrop AgPRyegrassSoil: LL=[0.231, 0.231, 0.231, 0.231, 0.231]; KL=[0.1, 0.1, 0.1, 0.1, 0]; XF=[1, 1, 1, 1, 0]
            SoilCrop AgPWhiteCloverSoil: LL=[0.231, 0.231, 0.231, 0, 0]; KL=[0.1, 0.1, 0.1, 0, 0]; XF=[1, 1, 1, 0, 0]
          Nutrient
          Organic: FOMCNRatio=40; CarbonUnits=Total
            Thickness  Carbon  SoilCNRatio  FBiom  FInert  FOM
            60         8.2     12.5         0.08   0.58    92.873
            110        5.5     12.5         0.02   0.7     57.963
            140        3.3     12.5         0.015  0.77    31.811
            240        1.7     12.5         0.01   0.9     11.373
            150        1.7     12.5         0.01   0.99    0
          Chemical: Thickness=[60, 110, 140, 240, 150]; PH=[6.5, 6.5, 6.5, 6.5, 6.5]; PHUnits=Water
          Water: Thickness=[60, 110, 140, 240, 150]; InitialValues=[0.565, 0.565, 0.565, 0.565, 0.565]; InitialPAWmm=233.8; RelativeTo=LL15; FilledFromTop=false
          Swim3: Salb=0.13; CN2Bare=50; CNRed=20; CNCov=0.8; KDul=1; PSIDul=-100; VC=true; DTMin=0; DTMax=60; MaxWaterIncrement=5; SpaceWeightingFactor=0; SoluteSpaceWeightingFactor=1; Dis=0; Disp=1; A=2; DTHC=0.1; DTHP=2; vcon1=7.28e-09; vcon2=7.26e-07; eo_time=06:00; eo_durn=720; Diagnostics=false
          Solute Cl: InitialValuesUnits=ppm; WaterTableConcentration=0; D0=0.05; DepthOfConstantSoluteAccessbility=0; MaxDepthSoluteAccessibility=0; RunoffEffectivenessAtMovingSolute=0; MaxEffectiveRunoff=0
            Thickness  InitialValues  Exco  FIP
            60         0              0     1
            110        0              0     1
            140        0              0     1
            240        0              0     1
            150        0              0     1
          LayerStructure: Thickness=[10, 20, 30, 40, 50, 50, 50, 50, 100, 100, 50, 50, 50, 50]
          SoilTemperature
          Solute NO3: InitialValuesUnits=ppm; WaterTableConcentration=0; D0=0.05; DepthOfConstantSoluteAccessbility=0; MaxDepthSoluteAccessibility=0; RunoffEffectivenessAtMovingSolute=0; MaxEffectiveRunoff=0
            Thickness  InitialValues  Exco  FIP
            60         6.503          0     1
            110        2.101          0     1
            140        2.101          0     1
            240        1.701          0     1
            150        1.701          0     1
          Solute NH4: InitialValuesUnits=ppm; WaterTableConcentration=0; D0=0.05; DepthOfConstantSoluteAccessbility=0; MaxDepthSoluteAccessibility=0; RunoffEffectivenessAtMovingSolute=0; MaxEffectiveRunoff=0
            Thickness  InitialValues  Exco  FIP
            60         0.599          1     1
            110        0.1            1     1
            140        0.1            1     1
            240        0.1            1     1
            150        0.1            1     1
          Solute Urea: InitialValuesUnits=kg/ha; WaterTableConcentration=0; D0=0.05; DepthOfConstantSoluteAccessbility=0; MaxDepthSoluteAccessibility=0; RunoffEffectivenessAtMovingSolute=0; MaxEffectiveRunoff=0
            Thickness  InitialValues  Exco  FIP
            60         0              0     1
            110        0              0     1
            140        0              0     1
            240        0              0     1
            150        0              0     1
          Erosion: ReduceSoilThickness=false; slope=6; slope_length=60; k_factor_bed=0.36; k_factor_susp=0.04; p_factor=0.1; MinimumDepth=100; BedDepth=700
            zero: soil_loss_bed, soil_loss_susp, ModelType, entrain_eff_bed, entrain_eff_susp, eros_rose_b2_bed, eros_rose_b2_susp, CumulativeDltDlayer, erosion_cover, ThresholdForWarningTopLayerEroded
        Irrigation
        Fertiliser
        SurfaceOrganicMatter: InitialResidueName=grass; InitialResidueType=grass; InitialResidueMass=2000; InitialStandingFraction=0; InitialCPR=0; InitialCNR=17
        SimpleGrazing: GrazingRotationType=0; SimpleGrazingFrequencyString=end of month; SimpleMinGrazable=0; SimpleGrazingResidual=1200; FlexibleGrazePostDM=0; FractionDefoliatedBiomassToSoil=[1]; FractionDefoliatedNToSoil=[90]; FractionExcretedNToDung=[0.4]; CNRatioDung=0; DepthUrineIsAdded=150; SendDungElsewhere=0; SendUrineElsewhere=0; FractionPopulationDecline=0; TramplingOn=false; MaximumPropLitterMovedToSoil=0.1; PastureConsumedAtMaximumRateOfLitterRemoval=1200
        PastureSpecies AGPRyegrass: doyGermination=275; daysEmergenceToAnthesis=120; daysAnthesisToMaturity=85; degreesDayForAnthesis=1100; degreesDayForMaturity=900; daysAnnualsFactor=45; CanopyType=PastureSpecies; InitialShootDM=2500; InitialRootDM=500; InitialRootDepth=350; initialDMFractionsGrasses=[0.15, 0.25, 0.25, 0.05, 0.05, 0.1, 0.1, 0.05, 0, 0, 0]; initialDMFractionsForbs=[0.2, 0.2, 0.15, 0.05, 0.1, 0.15, 0.1, 0.05, 0, 0, 0]; PhotosyntheticEfficiency=0.01; PhotosynthesisCurveFactor=0.8; FractionPAR=0.5; ReferenceCO2=380; CO2EffectScaleFactor=700; CO2EffectOffsetFactor=600; CO2EffectMinimum=0.7; CO2EffectExponent=2; ReproSeasonDurationCoeff=2; ReproSeasonShouldersLengthFactor=1; ReproSeasonOnsetDurationFactor=0.6; RelativeTurnoverEmerging=2; DetachmentDroughtCoefficient=3; DetachmentDroughtEffectMin=0.1; TurnoverStockFactor=0.01; TurnoverDefoliationEffectMin=0.025; MinimumGreenLeafProp=0.8; MinimumGreenRootProp=0.5
          initialDMFractionsLegumes=[0.16, 0.23, 0.22, 0.05, 0.03, 0.05, 0.05, 0.01, 0.04, 0.08, 0.08]
          LinearInterpolationFunction FVPDFunction
        PastureSpecies AGPWhiteClover: doyGermination=275; daysEmergenceToAnthesis=120; daysAnthesisToMaturity=85; degreesDayForAnthesis=1100; degreesDayForMaturity=900; daysAnnualsFactor=45; CanopyType=PastureSpecies; InitialShootDM=500; InitialRootDM=250; InitialRootDepth=300; initialDMFractionsGrasses=[0.15, 0.25, 0.25, 0.05, 0.05, 0.1, 0.1, 0.05, 0, 0, 0]; initialDMFractionsForbs=[0.2, 0.2, 0.15, 0.05, 0.1, 0.15, 0.1, 0.05, 0, 0, 0]; PhotosyntheticEfficiency=0.01; PhotosynthesisCurveFactor=0.8; FractionPAR=0.5; ReferenceCO2=380; CO2EffectScaleFactor=700; CO2EffectOffsetFactor=600; CO2EffectMinimum=0.7; CO2EffectExponent=2; ReproSeasonDurationCoeff=2; ReproSeasonShouldersLengthFactor=1; ReproSeasonOnsetDurationFactor=0.6; RelativeTurnoverEmerging=2; DetachmentDroughtCoefficient=3; DetachmentDroughtEffectMin=0.1; TurnoverStockFactor=0.01; TurnoverDefoliationEffectMin=0.025; MinimumGreenLeafProp=0.8; MinimumGreenRootProp=0.5
          initialDMFractionsLegumes=[0.16, 0.23, 0.22, 0.05, 0.03, 0.05, 0.05, 0.01, 0.04, 0.08, 0.08]
          LinearInterpolationFunction FVPDFunction
        Report: EventNames=[Clock].EndOfDay
          VariableNames:
            [SetSurfaceBoundaryCondition].Script.SurfaceBCType
            [Clock].Today as Date
            [CalculateRollingWaterBalance].Script.WaterAddedToday as WaterAddedToday
            [CalculateRollingWaterBalance].Script.WaterRemovedToday as WaterRemovedToday
            [Soil].Swim3.Drainage as Drainage
            [Soil].Swim3.Runoff as Runoff
            sum([Soil].Water.MM) as WaterStored
            [Soil].Swim3.Pond as PondDepth
            [CalculateRollingWaterBalance].Script.WaterBalanceCumulative
            [CalculateRollingWaterBalance].Script.WaterBalanceToday
            [CalculateRollingWaterBalance].Script.PlantWaterUptake
            [Soil].Swim3.PSI as Psi
            [Soil].Water.Volumetric as SW
            [Irrigation].IrrigationApplied as Irrigation
            sum([physical].Thickness)
            [Erosion].SoilLoss
            [Erosion].CumulativeDltDlayer
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